# AguaClara Water Treatment Plants -- 4 Communities
# Automated Design
# User Inputs:
HW_Sed := 1.55 m
# Design References
# [reference: UserInputs- 4 Communities.xmcd]
# [reference: DesignAssumptions- 4 Communities.xmcd]
# [reference: MathFunctions.xmcd]
# [reference: PipeDatabase.xmcd]
# [reference: MinorLossCoefficients.xmcd]
# [reference: FluidsFunctions.xmcd]
# Sed Tanks and Slopes:
# [reference: Sed. Inlet Slopes.xmcd]
N_SedTanks = 2
H_SedBetween = 0.0762 m
HW_Sed = 1.55 m
.
L_Sed = 2.61744 m
H_SedPort = 5.22225 cm
H_SedPort = 5.22225 cm
N_TrianglesperTank = 4
L_Sed = 2.61744 m
L_SedMax = 2.61744 m
B_SedPort = 5.14292 cm
W_Sed = 2.159 m
N_SedPorts*W_SedPort = 0.574448 m
N_SedPorts = 11
V_SedPort = 3.45253 cm/s
ND_SedPipeEntrance = 8 in
# Sedimentation Tank Sludge Drain:
# [reference: SludgeDrain.xmcd]
N_SedSludgeOrifices = 26
ND_SedSludge = 2 in
Q_SludgeDrainInitial = 291.971 L/min
D_SedSludgeOrifice = 0.1875 in
# Sedimentation Tank Dimensions:
# [reference: Sedimentation Dimensions.xmcd]
H_SedBottomSlope = 0.0951725 m
H_SedTopSlope = 0.643249 m
H_SlopeRectangle = 0.08 m
Z_SedSlopes = 0.86136 m
H_Sed = 1.65 m
W_Sed = 2.159 m
# Inlet Channel:
# [reference: Inlet Channel.xmcd]
W_InletChannel = 0.259075 m
L_Channel = 4.618 m
ND_SedPipeEntrance = 8 in
N_SedInletPipes = 2
H_InletChannel = 0.63864 m
Q_Plant = 100.385 gal/min
# Sedimentation Tank Effluent Launder:
# [reference: Launder.xmcd]
N_SedLaunderOrifices = 38
Q_SedLaunderOrifices = 2.5 L/min
# Exit Channel:
# [reference: Exit Channel.xmcd]
W_ExitChannel = 0.259075 m
ND_SedLaunder = 3 in
H_ExitChannel = 0.63864 m
L_SedLaunder = 1.94929 m
L_ExitChannel = 4.618 m
D_SedLaunderOrifice = 0.375 in
H_PltWeir = 0.460855 m
Z_SedLaunder = 1.46555 m
HW_ExitChannel = 0.49864 m
ZW_ExitChannel = 1.51 m
# Lamella:
# [reference: Lamella.xmcd]
L_SedPlate = 0.558344 m
B_SedPlate = 3.25453 cm
S_SedPlate = 2.95453 cm
N_SedPlates = 42
AN_SedPlate = 60 deg
V_SedC = 10.0391 m/day
V_SedUp = 48.4157 m/day
H_SedPlate = 0.48354 m
H_SedAbove = 0.1289 m
# Flow Controller:
# [reference: FCM.xmcd]
N_Fcm = 1
ID_FcmTube = 3.175 mm
ID_FcmTube = 0.125 in
L_FcmTube = 99.0625 cm
Q_FcmTubeMax = 285 mL/min
HL_FcmValve = 15.0907 cm
# Flocculator:
# [reference: Flocculation.xmcd]
W_FlocChannel = 1.0795 m
S_FlocBaffle = [0.0484193; 0.057922; 0.0767893; 0.139495] m
B_FlocBaffle = [0.0524193; 0.061922; 0.0807893; 0.143495] m
N_FlocBafflesMin = 75
HL_Floc = 9.04235 cm
X_FlocBaffles = [
    1.2295, 2.46295, 0.154495;
    1.28192, 2.40102, 0.297989;
    1.33434, 2.3391, 0.441484;
    1.38676, 2.27718, 0.584979;
    1.43918, 2.21526, 0.728473;
    1.4916, 2.15334, 0.871968;
    1.54402, 2.09141, 1.01546;
    1.59644, 2.02949, 1.15896;
    1.64885, 1.96757, 1.30245;
    1.70127, 1.90565, 1.44595
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] m
HW_FlocStart = 1.64042 m
L_FlocBaffles = [
    1.50158, 1.49208, 1.41051;
    1.60158, 1.59208, 1.51051;
    1.50158, 1.49208, 1.41051;
    1.60158, 1.59208, 1.51051;
    1.50158, 1.49208, 1.41051;
    1.60158, 1.59208, 1.51051;
    1.50158, 1.49208, 1.41051;
    1.60158, 1.59208, 1.51051;
    1.50158, 1.49208, 1.41051;
    1.60158, 1.59208, 1.51051
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] m
W_FlocPort = 0.139495 m
H_FlocPort = 1.0795 m
N_FlocBaffles = 70
Z_FlocBaffles = [
    0, 0, 0;
    0.0484193, 0.057922, 0.139495;
    0, 0, 0;
    0.0484193, 0.057922, 0.139495;
    0, 0, 0;
    0.0484193, 0.057922, 0.139495;
    0, 0, 0;
    0.0484193, 0.057922, 0.139495;
    0, 0, 0;
    0.0484193, 0.057922, 0.139495
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] m
Gt_FlocMinFlow = 6566.72
N_FlocChannels = 3
# Entrance Tank:
# [reference: EntranceTank.xmcd]
ND_Lfom = 6 in
HL_Rm = 0.911511 cm
N_Lfom = 1
D_LfomOrifices = 19.05 mm
Q_LfomErrorMax = 1.3255 %
N_LfomOrifices = [5; 4; 2; 2; 2; 2; 1; 2; 1; 1]
L_Et = 1.5 m
W_Et = 0.75 m
HW_EtMin = 0.2 m
HW_EtMax = 0.4 m
H_Et = 2.04042 m
ZW_Et = 1.94042 m
# Any additional needed elevations should be calculated in the files above.
# Elevations:
ZW_ExitChannel = 1.51 m  # Water Level at the end of the plant in the exit channel and exit channel box
HW_Sed = 1.55 m
HW_FlocStart = 1.64042 m  # Water level at the beginning of the floc tank
HL_Floc = 9.04235 cm  # just for ref. the head loss throught the floc tank
ZW_Et = 1.94042 m  # the height of the water in the entrance tank.
# AutoCAD References
# [reference: basics.xmcd]
# [reference: pipe.xmcd]
# [reference: tank.xmcd]
# [reference: lamina.xmcd]
# [reference: laminaplain.xmcd]
# [reference: cross.xmcd]
# [reference: Tee.xmcd]
# [reference: elbow.xmcd]
# [reference: Sludge.xmcd]
# [reference: Channel.xmcd]
# [reference: Manifold.xmcd]
# [reference: SedTankslopes.xmcd]
# [reference: inletslope.xmcd]
# [reference: inletslopetrapezoid.xmcd]
# [reference: chemicalstock.xmcd]
# [reference: Sedimentation Tank.xmcd]
# [component: inputs SedTank]
# [reference: Flocculation Tank.xmcd]
# [component: inputs FlocTank]
# [reference: Entrance Tank.xmcd]
# [component: inputs EntranceTank]
