# AguaClara Water Treatment Plants
# Automated Design
# User Inputs:
HW_Sed := 2 m
# Design References
# [reference: UserInputs- test.xmcd]
# [reference: DesignAssumptions-test.xmcd]
# [reference: MathFunctions.xmcd]
# [reference: PipeDatabase.xmcd]
# [reference: MinorLossCoefficients.xmcd]
# [reference: FluidsFunctions.xmcd]
# Inlet Channel:
# [reference: Inlet Channel.xmcd]
W_InletChannel = 0.73954 m
L_Channel = 7.377 m
ND_SedPipeEntrance = 12 in
N_SedInletPipes = 8
H_InletChannel = 1.08893 m
Q_Plant = 800 gal/min
# Sedimentation Tanks:
# [reference: Sedimentation-gracias 1W test.xmcd]
N_SedTanks = 6
H_SedBelowSlope = 1.38778 m
H_SedBetween = 0.0762 m
HW_Sed = 2 m
H_Sed = 2.1 m
H_SedBelow = 1.46398 m
L_Sed = 9.6182 m
ND_SedPipeEntrance = 12 in
# Sedimentation Tank Sludge Drain:
# [reference: SludgeDrain.xmcd]
N_SedSludgeOrifices = 96
ND_SedSludge = 6 in
Q_SludgeDrainInitial = 1384.38 L/min
D_SedSludgeOrifice = 0.1875 in
# Sedimentation Tank Inlet Slopes:
# [reference: Sed. Inlet Slopes- minV.xmcd]
B_SedInlet = 3.80249 cm
L_SedTopFilled = 0.211377 m
H_SedInlet = 11.1177 cm
W_SlopesFilled = 0.105688 m
L_SedBottomFilled = 0.137966 m
AN_SedTopInlet = 60 deg
L_SedTopInletTotal = 1.0795 m
AN_SedBottom = 40 deg
A_SedInlet = 841.203 cm^2
H_SedTopInletTotal = 0.934874 m
H_SedTopInlet = 75.1817 cm
L_SedBottomTotal = 0.704594 m
H_SedInletSlopes = 1.03487 m
L_SedTopInlet = 0.868123 m
W_SlopesV = 0.434062 m
H_SedBottom = 0.364221 m
# Sedimentation Tank Effluent Launder:
# [reference: Launder.xmcd]
N_SedLaunderOrifices = 158
Q_SedLaunderOrifices = 1.59722 L/min
# Exit Channel:
# [reference: Exit Channel.xmcd]
W_ExitChannel = 0.73954 m
ND_SedLaunder = 6 in
H_ExitChannel = 1.08893 m
L_SedLaunder = 7.98912 m
L_ExitChannel = 7.377 m
D_SedLaunderOrifice = 0.3125 in
H_PltWeir = 0.853957 m
Z_SedLaunder = 1.87586 m
HW_ExitChannel = 0.948926 m
# Lamella:
# [reference: Lamella.xmcd]
L_SedPlate = 0.873936 m
B_SedPlate = 4.63737 cm
S_SedPlate = 4.33737 cm
N_SedPlates = 140
AN_SedPlate = 60 deg
V_SedC = 10.0088 m/day
V_SedUp = 70 m/day
H_SedPlate = 0.756851 m
H_SedAbove = 0.208275 m
# Flow Controller:
# [reference: FCM.xmcd]
N_Fcm = 6
ID_FcmTube = 4.318 mm
ID_FcmTube = 0.17 in
L_FcmTube = 255.151 cm
Q_FcmTubeMax = 378.541 mL/min
HL_FcmValve = 26.6223 cm
# Flocculator:
# [reference: FlocculationGracias.xmcd]
W_FlocChannel = 1.0795 m
S_FlocBaffle = [0.229659; 0.274731; 0.364221; 0.935701] m
B_FlocBaffle = [0.233659; 0.278731; 0.368221; 0.939701] m
N_FlocBafflesMin = 27
HL_Floc = 8.31788 cm
X_FlocBaffles = [
    0.233659, 8.6675;
    0.467318, 7.72779;
    0.700977, 6.78809;
    0.934635, 5.84839;
    1.16829, 4.90869;
    1.40195, 3.96899;
    1.68068, 3.02929;
    1.95942, 2.08959;
    2.23815, 1.14989;
    2.51688, 0;
    2.79561, 0;
    3.16383, 0;
    3.53205, 0;
    3.90027, 0;
    4.26849, 0;
    4.63672, 0;
    5.57642, 0;
    6.51612, 0;
    7.45582, 0;
    8.39552, 0
] m
HW_FlocStart = 2.08318 m
L_FlocBaffles = [
    1.77034, 1.0643;
    1.87034, 1.1643;
    1.77034, 1.0643;
    1.87034, 1.1643;
    1.77034, 1.0643;
    1.87034, 1.1643;
    1.72527, 1.0643;
    1.82527, 1.1643;
    1.72527, 1.0643;
    1.82527, 0;
    1.72527, 0;
    1.73578, 0;
    1.63578, 0;
    1.73578, 0;
    1.63578, 0;
    1.73578, 0;
    1.0643, 0;
    1.1643, 0;
    1.0643, 0;
    1.1643, 0
] m
W_FlocPort = 0.935701 m
H_FlocPort = 1.0795 m
N_FlocBaffles = 29
Z_FlocBaffles = [
    0, 0;
    0.229659, 0.935701;
    0, 0;
    0.229659, 0.935701;
    0, 0;
    0.229659, 0.935701;
    0, 0;
    0.274731, 0.935701;
    0, 0;
    0.274731, 0;
    0, 0;
    0.364221, 0;
    0, 0;
    0.364221, 0;
    0, 0;
    0.364221, 0;
    0, 0;
    0.935701, 0;
    0, 0;
    0.935701, 0
] m
Gt_FlocMinFlow = 7679.95
N_FlocChannels = 2
# Entrance Tank:
# [reference: EntranceTank.xmcd]
ND_Lfom = 20 in
HL_Rm = 0.890191 cm
N_Lfom = 1
D_LfomOrifices = 52.3875 mm
Q_LfomErrorMax = 0.74575 %
N_LfomOrifices = [5; 4; 3; 2; 2; 2; 1; 2; 1; 1]
L_Et = 3 m
W_Et = 1.5 m
HW_EtMin = 0.2 m
HW_EtMax = 0.4 m
H_Et = 2.43318 m
ZW_Et = 2.33318 m
# Any additional needed elevations should be calculated in the files above.
# AutoCAD References
# [reference: basics.xmcd]
# [reference: pipe.xmcd]
# [reference: tank.xmcd]
# [reference: lamina.xmcd]
# [reference: cross.xmcd]
# [reference: Tee.xmcd]
# [reference: elbow.xmcd]
# [reference: Sludge.xmcd]
# [reference: Channel.xmcd]
# [reference: Manifold.xmcd]
# [reference: SedTankslopes.xmcd]
# [reference: Sed Tank Inlet Slope.xmcd]
# [reference: chemicalstock.xmcd]
# [reference: Sedimentation Tank.xmcd]
# [component: inputs SedTank]
# [reference: Flocculation Tank.xmcd]
# [component: inputs FlocTank]
# [reference: Entrance Tank.xmcd]
# [component: inputs EntranceTank]
