# AguaClara Water Treatment Plants
# Automated Design
# [reference: userinputs.xmcd]
# User Inputs:
# Engineer Entered Values: | Values used to Draw Plant:
tank_thick = 0.15 m
Q_plant := 50*gal/min
lvltank_thick = 0.15 m
# sed tank parameters
stockplat_thick := lvltank_thick
beta = 0.959931
grit_thick := lvltank_thick
SedTank_width = 1 m  # Width of the lamella
platform_thick = 0.3 m
L_lamella = 0.9 m  # length of the lamella
channel_thick = 0.15 m
lamella_spacing = 0.05 m  # lamella spacing
walkway_width = 1 m
PipeSpecification = 4
DrillSeries = 0
# Design References
# [reference: DesignAssumptions.xmcd]
# [reference: PipeDatabase.xmcd]
# [reference: FluidsFunctions.xmcd]
# [reference: Pipe Design and minor loss coefficients.xmcd]
# [reference: Channel design.xmcd]
# [reference: Chemical Feed.xmcd]
# [reference: Flocculation Function.xmcd]
# [reference: GritChamber.xmcd]
# [reference: Plant Elevation Design.xmcd]
# [reference: plantleveltank.xmcd]
# [reference: Sedimentation Function.xmcd]
# [reference: Sludge Drain Design Program.xmcd]
# [reference: Launder 2.xmcd]
r_drum = 0.3 m
# Calls Functions Here:
# Chemical Feed Design
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Q_alum := ChemicalFeed(Q_plant) = 94.6353 mL/min
# Channel Design
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Channel_dim := Channel(Q_plant, SedTank_width, tank_thick) = [3.3; 0.15972; 0.7] m
# Sedimentation Tank Design
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pipediameter := 6 in
SedTank := SedTankDesign(Q_plant, SedTank_width, lamella_spacing, L_lamella, beta, Channel_dim)
[sedtank_dim, N_lamella, water_depth, z_plat, v_c, spaceabove] := SedTank
SedTank = [[1.3585; 1; 2.12942], 12, 2.02942, 1.42942, 0.00013161, 0.25, 0.285926]
sedtank_dim := SedTank[:, 0][0]*m = [1.3585; 1; 2.12942] m
N_lamella := SedTank[0, 1] = 12
sedwater_level := SedTank[0, 2]*m = 2.02942 m
z_plat := SedTank[0, 3]*m = 1.42942 m
v_c := SedTank[0, 4]*m/s = 11.3711 m/day
spaceabove := SedTank[0, 5]*m = 0.25 m
# Flocculator Design
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# The baffle positions are reported in the following way:
# There is one matrix for each channel. The first column is the x position
# of the baffle. The 2nd column is the starting y position of a baffle (ie top of the tank (0),
# or bottom of tank), the 3rd column is the final position of the baffle.
# Therefore a baffle at position x extends between the two y coordinates.
Flocculator := flocculator(Q_plant, sedtank_dim) = [[2.717; 0.5; 2.18113], [0.05; 0.07; 0.15], 30, 0.0517103, [0.055; 1.36364], [[
    0.05, 2.18113, 0.22671;
    0.1, 0, 2.10613;
    0.15, 2.18113, 0.22671;
    0.2, 0, 2.10613;
    0.25, 2.18113, 0.22671;
    0.3, 0, 2.10613;
    0.35, 2.18113, 0.22671;
    0.4, 0, 2.10613;
    0.45, 2.18113, 0.22671;
    0.5, 0, 2.10613;
    0.55, 2.18113, 0.22671;
    0.6, 0, 2.10613;
    0.67, 2.18113, 0.25671;
    0.74, 0, 2.07613;
    0.81, 2.18113, 0.25671;
    0.88, 0, 2.07613;
    0.95, 2.18113, 0.25671;
    1.02, 0, 2.07613;
    1.09, 2.18113, 0.25671;
    1.16, 0, 2.07613;
    1.23, 2.18113, 0.25671
], [
    1.2885, 0, 2.07613;
    1.2185, 2.18113, 0.25671;
    1.1485, 0, 2.07613;
    0.998499, 2.18113, 0.37671;
    0.848499, 0, 1.95613;
    0.698499, 2.18113, 0.37671;
    0.548499, 0, 1.95613;
    0.398499, 2.18113, 0.37671;
    0.248499, 0, 1.95613
]], "Failure: Your Gθ for the flocculator is too low. It should not fall below 4500. Consider increasing the flowrate or flocculator length.", [12; 12; 6], 5.64]
floc_dim := Flocculator[0, 0]*m = [2.717; 0.5; 2.18113] m
baffle_spacing := Flocculator[0, 1]*m = [5; 7; 15] cm
tot_baffle := Flocculator[0, 2] = 30
floctotal_hl := Flocculator[0, 3]*m = 5.17103 cm
uturnhole_dim := Flocculator[0, 4]*m = [0.055; 1.36364] m
[floc_dim/m, baffle_spacing/m, tot_baffle, total_hl/m, uturnhole_dim/m, baffle_length/m, baffle_positions, Gθ_newmin, length_duetobaffles/m]  # disabled
# Grit Chamber Design
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Grit := gritchamber(Q_plant, PipeSpecification, DrillSeries, lamella_spacing, L_lamella, beta, Channel_dim, sedtank_dim, sedwater_level, floctotal_hl, z_plat) = [[0.85725; 0.9048; 1.21996], 3, [4; 0; 1; 1; 1; 0; 1; 1; 1; 0], 0.0762, [0.02], 1.21996]
Grit = [[0.85725; 0.9048; 1.21996], 3, [4; 0; 1; 1; 1; 0; 1; 1; 1; 0], 0.0762, [0.02], 1.21996]
# Launderer Design
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Laund := Launder(Q_plant, PipeSpecification, SedTank[:, 0][0][0]*m, SedTank[:, 2][0]*m, SedTank[:, 5][0]*m, Channel_dim[1], SedTank[:, 0][0][1]*m, platform_thick, walkway_width, n_sedtanks, Orifice_dist, hl_launder, Q_ratioLaunderOrf, ν, ε_pvc, Q_ratioLaunders, spacebelow_total) = [1.3585, 0.97962, 0.1, 1.90442, 0.0634568, 26, 0.0369857, 0.10668, 0.4111, 2.8]
# Sludge Pipe Design
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SludgePipe := Sludge(Q_plant, PipeSpecification, SedTank[:, 0][0][0]*m, SedTank_width, SedTank[:, 2][0]*m) = [2, 0.511865, 0.1, 1.3585, 13]
[D_sludgedrain/m, D_orifice/m, L_sludgeports/m]
# Plant Leveling Tank
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PLT := PlantLevelingTank(Q_plant, PipeSpecification, Laund[:, 4][0]*m, Laund[:, 6][0]*m) = [[0.21577; 0.663457; 0.7], 0.0254, 0.463014, 0.563014] m
# Plant Elevation Design
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Z_elevation := PlantElevations(Q_plant, Grit, Laund, SedTank, Q_alum, PLT[:, 2][0], PLT[:, 1][0], Flocculator[:, 3][0]*m, L_lamella, 10 cm) = [3.41575; 2.81575; 2.71575; 1.51575; 2.61575; 2.56575; 2.36575; 2.66575; 2.56575; 2.36575; 2.24145; 2.24145; 2.18113; 2.08113; 2.12942; 2.02942; -1.83971; -5.70885; -6.48827; 1.42942; 1.90988; 1.98828; 2.12942] m
# Constructing Tables of Parameters:
# Defining components of Output Arrays:
[sedtank_dim, N_lamella, water_depth, z_plat, v_c, spaceabove] := SedTank
[floc_dim, baffle_spacing, tot_baffle, floctotal_hl, uturnhole_dim, baffle_length, baffle_positions, Gθ_newmin, length_duetobaffles] := Flocculator
[SedPipe_length, D_laundOrf, laundOrf_dist, manifold_elevation, HL_laundertotal, n_laundOrf, h_laundOrf, offfloor_length, Pipe9_length, D_launder] := Laund
[waste_ind, D_sludgeOrf, sludgeOrf_dist] := SludgePipe
[lvltank_dim, D_weir, H_weir, HW_plantleveling] := PLT/m
[grit_dim, n_GritRisers, n_GritOrf, D_GritRiser, D_GritOrf] := Grit
D_GritOrf := D_GritOrf[0]
# Defining components of Table Arrays:
headerrow := ["Parameter"; "Value"; "Units"]
Parameters := [
    "Number of lamella in sedimentation tanks", N_lamella, " ";
    "critical velocity in sed tank", v_c, " meter per day";
    "number of baffles in flocculator", tot_baffle, " ";
    "total headloss through flocculator", floctotal_hl*m/cm, "centimeters";
    "length of the sedimentation inlet launder", SedPipe_length, "meters";
    "diameter of orifices in the launder", D_laundOrf*m/in, "inches";
    "distance between orifices in the launder", laundOrf_dist, "meters";
    "manifold elevation", manifold_elevation, "meters";
    "diameter of the sedimentation inlet launder", D_launder*m/in, "inches";
    "number of orifices in the launder", n_laundOrf, " ";
    "diameter of sedimentation outlet sludge pipe", waste_ind*m/in, "inches";
    "diameter of orifices in sludge pipe", D_sludgeOrf*m/cm, "centimeters";
    "distance between orifices in sludge pipe", sludgeOrf_dist, "meters";
    "Diameter of weir in Plant Leveling Tank", D_weir*m/in, "inches";
    "Height of weir in PLT", H_weir*m/in, "inches";
    "Height of the Water in the PLT", HW_plantleveling, "meters";
    "number of risers in grit chamber", n_GritRisers, " ";
    "diameter of risers in grit chamber", D_GritRiser*m/in, "inches";
    "diameter of orifices in grit chamber", D_GritOrf*m/cm, "centimeters"
]
headercolumn
Units := Parameters[:, 2]
headercolumn := Parameters[:, 0]
Z := Parameters[:, 1]
table(headerrow, headercolumn, Z) :=
    for i ∈ 0 .. length(headercolumn)
        for j ∈ 0 .. last(headerrow)
            table[i, j] ← headerrow[j] if i == 0
            otherwise
                table[i, j] ← headercolumn[i - 1] if j == 0
                table[i, j] ← Z[i - 1] if j == 1
                table[i, j] ← Units[i - 1] if j == 2
    return table
headercolumn_Dim := [" Sedimentation Tank"; "Dimensions of Flocculator"; "Dimensions of Grit Chamber"; "Dimensions of Leveling Tank"; "Dimensions of Channel"]
headerrow_Dim := ["Component"; "Length"; "Width"; "Height"; "Units"]
Dim_y := [sedtank_dim[1]; floc_dim[1]; grit_dim[1]; lvltank_dim[1]; Channel_dim[1]/m]
Dim_z := [sedtank_dim[2]; floc_dim[1]; grit_dim[2]; lvltank_dim[2]; Channel_dim[2]/m]
Dim_x := [sedtank_dim[0]; floc_dim[0]; grit_dim[0]; lvltank_dim[0]; Channel_dim[0]/m]
Units2 := ["meter"; "meter"; "meter"; "meter"; "meter"]
tableDim(headerrow_Dim, headercolumn_Dim, Dim_x, Dim_y, Dim_z, Units2) :=
    for i ∈ 0 .. length(headercolumn_Dim)
        for j ∈ 0 .. last(headerrow_Dim)
            tableDim[i, j] ← headerrow_Dim[j] if i == 0
            otherwise
                tableDim[i, j] ← headercolumn_Dim[i - 1] if j == 0
                tableDim[i, j] ← Dim_x[i - 1] if j == 1
                tableDim[i, j] ← Dim_y[i - 1] if j == 2
                tableDim[i, j] ← Dim_z[i - 1] if j == 3
                tableDim[i, j] ← Units2[i - 1] if j == 4
    return tableDim
# Constructing Plant Elevation Tables:
headerrow_elevation := ["Element"; "Elevation from bottom of the sed tank (m)"; "Elevation from platform (m)"]
# top of alum stock tank
# port on alum stock tank
# bottom of alum stock tank
# alum platform height
# valve level in the FCM
# water level in the FCM
# end of the FCM tube at maximum alum dose
# grit chamber wall
# grit chamber maximum water level
# orifice elevation in the grit chamber
# horizontal pipe centerline where it leaves the grit chamber
# water level in rapid mix
# wall height for beginning of flocculator
# water level at beginning of flocculator
# wall height for the sedimentation tank
# water level in the sedimentation tank and channel
# top of the effluent launder
# top of the plate settlers
# bottom of the plate settlers
# platform height
# weir height
# level control water height
headercolumn_elevation := [
    "top of alum stock tank";
    "port on alum stock tank";
    "bottom of alum stock tank";
    "alum platform height";
    "valve level in the FCM";
    "water level in the FCM";
    "end of the FCM tube at maximum alum dose";
    "grit chamber wall";
    "grit chamber maximum water level";
    "orifice elevation in the grit chamber";
    "horizontal pipe centerline where it leaves the grit chamber";
    "water level in rapid mix";
    "wall height for beginning of flocculator";
    "water level at beginning of flocculator";
    "wall height for the sedimentation tank";
    "water level in the sedimentation tank and channel";
    "centerline of the effluent launder";
    "top of the plate settlers";
    "bottom of the plate settlers";
    "platform height";
    "weir height";
    "level control water height";
    "level control wall height"
]
tableElevation(headerrow_elevation, headercolumn_elevation, Z_elevation) :=
    for i ∈ 0 .. length(headercolumn_elevation)
        for j ∈ 0 .. last(headerrow_elevation)
            table[i, j] ← headerrow_elevation[j] if i == 0
            otherwise
                table[i, j] ← headercolumn_elevation[i - 1] if j == 0
                table[i, j] ← Z_elevation[i - 1] if j == 1
                table[i, j] ← Z_elevation[i - 1] - Z_elevation[22] if j == 2
    return table
# Tables:
# top
# [component: inputs table(headerrow, headercolumn, Z)]
# [component: inputs tableDim(headerrow_Dim, headercolumn_Dim, Dim_x, Dim_y, Dim_z, Units2)]
# [component: inputs tableElevation(headerrow_elevation, headercolumn_elevation, Z_elevation)]
# the negative sign here for alum platform height shows that the height chosen
# for the height of the chemical platform column is larger than
# that calculated based on the headloss through the FCM and
# Grit Chamber, so that from the platform the height of the platform
# is actually below the platform to make up for the shorter height needed
