# AguaClara Design Tool
Q_Plant := 20*L/s
Mod := 0
method := "EtFlocSedFi"
## References
# MathCAD dimension calculations:
# [reference: ExpertInputs.xmcd]
# [reference: MathFunctions.xmcd]
# [reference: PipeDatabase.xmcd]
# [reference: MaterialsDatabase.xmcd]
# [reference: FluidsFunctions.xmcd]
# [reference: SedTankFunctions.xmcd]
# [reference: CdcFunctions.xmcd]
# [reference: LfomFunctions.xmcd]
# The sed tank files have been changed. Go back to revision 6721 for clean Sed Tank files (no dropped bottom or moved outlets to filter) mrf222
# [reference: SedimentationTank.xmcd]
# Reference changed for testing 7/2/14 by mrf222
# [reference: Flocculator.xmcd]
# [reference: LFOM.xmcd]
# [reference: EntranceTankmrf222TEST.xmcd]
# [reference: SRSFmrf222TEST.xmcd]
# [reference: LinearCdc.xmcd]
# [reference: ChemStorageTanks.xmcd]
# AutoCAD drawing programs:
# Translators:
# These are the codes that take MathCAD outputs and create AutoCAD scripts that are used to draw the plant (formerly Basics)
# [reference: MtoATranslators.xmcd]
# The wrapped MtoA translator contains the functions that the user will want to access. These functions will draw pieces with full functionality - specifying the location, dimension, and orientation of the object. Also, it contains layer control and subtraction capabilities for grouped objects.
# [reference: MtoATranslatorsWrapped.xmcd]
# Drawing functions:
# [reference: ChannelF.xmcd]
# [reference: PlumbingF.xmcd]
# [reference: TankF.xmcd]
# [reference: StairsF.xmcd]
# [reference: DrainChannelF.xmcd]
# AutoCAD Script Files:
# [reference: FlocculatorAC.xmcd]
# [reference: SedimentationTankAC.xmcd]
# [reference: EntranceTankACmrf222TEST.xmcd]
# [reference: ChemStockTanksAC.xmcd]
# [reference: SRSFACmrf222TEST.xmcd]
# [reference: CdcAC.xmcd]
# Reference changed for testing 7/2/14 by mrf222
# [reference: OperatorAccessAC.xmcd]
# [reference: MaterialsAC.xmcd]
# Materials List:
# [reference: MaterialsList.xmcd]
# Layouts:
# This file will execute at the very end to create multiple views of the entire plant in paperspace
# [reference: LayoutsAC.xmcd]
# Section Cuts:
# This file will create section cuts in paper space
## All variables displayed must have the standard SI units. They may not have units attached by the user.
# General
Q_Plant = 0.02 m^3/s
Pi_VenaContractaOrifice = 0.63
T_PlantWall = 0.15 m
W_SedPlate = 1.0668 m
T_ConcreteMin = 0.05 m
L_SedPlateSheet = 3 m
C_CoagStock = 200 kg/m^3
T_SedPlate = 0.002 m
Ti_CoagStock = 108000 s
T_SedWeir = 0.04 m
C_ChlorineStock = 15 kg/m^3
W_SedBay = 1.0668 m
Ti_ChlorineStock = 108000 s
HL_ChannelMax = 0.05 m  # Eliminate FCM variable from design specs
H_PlantFreeboard = 0.1 m
EN_DrillSeries = 0
W_HumanMin = 0.45 m
W_ChannelMin = 0.15 m
# Entrance Tank
# Tank
HW_Et = 1.03375 m
HW_EtMax = 1.5 m
H_Et = 1.13375 m
Z_EtTop = 2.50626 m
L_Et = 4.2398 m
Z_Et = 1.37251 m
ZW_Et = 2.40626 m
W_Et = 1.23818 m
H_EtTop = 0.3 m  # height of the top part of the entrance tank above the hoppers
# Hoppers
H_EtHopperBack = 0.636575 m
N_EtFullHopper = 1
H_EtHopper = 0.83375 m
Z_EtHopper = 2.20626 m  # elevation of top of slab.
T_EtHopperLedge = 0.15 m
L_EtHopper = 1.8691 m
AN_EtSlope = 0.785398
# Rapid Mix
# Drain Channel
ED_Tee =  # error: This variable is undefined.
ND_RMPipe = 0.254 m
W_EtDC = 0.43575 m  # drain channel under entrance tank dimensions
# Drains
L_EtDC = 3.83976 m
ND_EtDrain = 0.0762 m
H_EtDC = 0.300038 m  # Give heights of the channel at the beginning and end and change the design specs to explain that it's sloped.
L_EtDrainStopper = 1.12975 m
# Flow measurement
ND_LfomPipe = 0.254 m
HL_Flowmeasure = 0.2 m
Z_LfomOrifices = 2.22213 m  # elevation of the center of
HL_Lfom = 0.2 m
D_LfomOrifices = 0.03175 m
B_LfomRows = 0.0333333 m
N_LfomOrifices = [12; 3; 3; 3; 2; 3]
H_LfomOrifices = [0.015875; 0.0492083; 0.0825417; 0.115875; 0.149208; 0.182542] m
# Trash Rack
B_EtRebar = 0.0344939 m
# Flow Control Valve | Other Parameters
# Overflow Weir
ND_EtFlowControl = 0.1524 m
V_EtUp = 0.00504074 m/s
W_EtOverflowSlot = 0.0927049 m
Ti_Et = 274.932 s
ND_EtOverflowDrain = 0.1524 m
H_EtOverflowCutaway = 0.0154508 m
L_EtOverflowWeir = 2.0707 m
W_PlantDC = 1 m
# Maybe give the vertical distances below the bottom of the sed tank of the beginning and end of the channel? Calculate them, display, and add to the design specs.
H_PlantDC = 0.264093 m
L_PlantDC = 7.38857 m
H_HumanAccess = 1.5 m
# Plant Drain Channel
# Coag Dose Controller
# Coagulant | Chlorine
Z_CoagTank = 2.77396 m
C_CoagStockMax = 200 kg/m^3
C_ChlorineStockMax = 15 kg/m^3
Z_CoagTankOutlet = 2.87396 m
C_CoagDoseMax = 0.08 kg/m^3
C_ChlorineDoseMax = 0.002 kg/m^3
L_CdcFloatArm = 0.41275 m
N_CdcCoagTubes = 2
N_CdcChlorineTubes = 2
L_CdcScaleArm = 0.50165 m
L_CdcCoagTube = 3.91504 m
L_CdcChlorineTube = 1.78136 m
B_StockOutlet = 0.1 m
HL_CdcCoag = 0.2 m
HL_CdcChlorine = 0.1 m
Ti_CoagStock = 108000 s
Vol_CoagTank = 1100 L
Vol_ChlorineTank = 450 L
H_CoagTankAboveHeadTank = 0.3 m
D_CdcCoag = 0.0047625 m
K_CdcTube = 2
D_CdcChlorine = 0.003175 m
ND_EtFloat = 0.2032 m
Q_CoagStock = 8e-6 m^3/s
Q_ChlorineStock = 2.66667e-6 m^3/s
ND_CoagPiping = 0.0127 m
# Flocculator
# Tank
EN_FlocType :=
    "horizontal" if EN_FlocHoriz == 1
    "vertical" otherwise
EN_FlocType = "vertical"
H_Floc = 2.10174 m
HW_FlocEnd = 1.80523 m
HW_FlocStart = 2.00174 m
Z_FlocTank = 0 m
L_Floc = 7.48687 m
H_FlocPort = [0.729999; 0.729999] m
W_FlocChannel = 0.45 m
N_FlocChannels = 2
# Drains
ND_FlocValve = 0.0762 m
N_FlocValves = 1
H_FlocSlope = 0.04445 m
Ti_FlocDrain = 1800 s
# Parameters
ED_Floc = 0.01 m^2/s^3
CP_Floc = 75 m^(2/3)
Ti_Floc =  # error
G_Floc =  # error  # Look at Flocculator Positioning arrays
V_Floc = 0.167425 m/s
# Fill last channel with bafffles from last channel
ED_FlocMax =  # error  # Fix port width to be based on energy dissipation in that channel
# Adjust spacing after the number of baffles per channel is known.
ED_FlocAve =  # error
# Check the residence time of the flocculator should be at least 20minutes
HL_Floc = 0.196512 m
K_FlocBaffle = 2.5
CP_Floc = 75 m^(2/3)
# Baffles
S_FlocBaffle = [0.26546; 0.26546] m
B_FlocBaffle = [0.26746; 0.26746] m
N_FlocChannelBaffles = [27; 26]
W_FlocPort = [0.24546; 0.336537] m
L_FlocBaffleLower = 1.40704 m
L_FlocBaffleUpper = 1.65355 m
T_FlocBaffle = 0.002 m
S_FlocBaffleFirst = 0.26546 m
EN_FlocBaffle = 1
Z_FlocBaffles = [
    0, 0.398189;
    0.398189, 0;
    0, 0.398189;
    0.398189, 0;
    0, 0.398189;
    0.398189, 0;
    0, 0.398189;
    0.398189, 0;
    0, 0.398189;
    0.398189, 0;
    0, 0.398189;
    0.398189, 0;
    0, 0.398189;
    0.398189, 0;
    0, 0.398189;
    0.398189, 0;
    0, 0.398189;
    0.398189, 0;
    0, 0.398189;
    0.398189, 0;
    0, 0.398189;
    0.398189, 0;
    0, 0.398189;
    0.398189, 0;
    0, 0.398189;
    0.398189, 0;
    0, 0
] m
# Modules
ND_FlocModulesMain = 0.0127 m
ND_FlocModulesLarge = 0.0381 m
L_FlocModuleLong = [0.801696; 0.801696] m
L_FlocModuleShort = [0.534237; 0.266777] m
ND_SpacerPipe = 0.01905 m
L_FlocModuleLongOuter = [0.534237; 0.534237] m
# Sed Tanks
# Tanks
N_SedTanks = 3
Q_SedBay = 0.00666667 m^3/s
W_Sed = 1.0668 m  # Total tank wall height
HW_Sed = 1.80523 m
L_Sed = 7.48687 m
L_Sed = 7.48687 m  # Total tank length
N_SedBays = 1
H_Sed = 1.90523 m
W_SedSideSlopes = 0.511175 m
L_SedActive = 6.35778 m
AN_SedSlope = 0.872665
# Floc Hopper
AN_SedHopperSlope = 0.785398
# Parameters
V_SedUpBod = 0.001 m/s  # design constraints
V_SedCBod = 0.00012 m/s
V_SedUp = 0.000988514 m/s  # Actual values from this design
Ti_Sed = 1649.33 s
# sludge drain
N_SedSludgeOrifices = 62  # per cell
Ti_SludgeDrain = 1800 s  # Tank Drain time
W_SedSludge = 0.0818157 m  # Width of the sludge channel
H_SedSludge = 0.0818157 m  # Depth of the sludge channel
# Distance center to center between drain orifices
B_SedSludgeOrifices = 0.1019 m
W_SedDrainCover = 0.121816 m
D_SedSludgeOrifice = 0.00968008 m  # Diameter of drain orifices
N_SedSludgeOrifices = 62
ND_SedSludgePipe = 0.1016 m
Z_SedSludge = -0.132478 m  # Height from 0 of the top of the sludge drain
Z_SedSideSlopes = 0.73546 m
# inlet channel | exit channel
W_SedExitChannel = 0.3485 m
HW_SedInletChannel = 0.295281 m
H_SedExitChannel = 0.395281 m
W_SedInletChannel = 0.526537 m
EN_InletChannelGeom = 1
HW_SedExitChannel = 0.255281 m
# water height in exit channel from base of channel
L_SedChannel = 3.5004 m
H_SedWeirExit = 0.23415 m
H_SedInletChannel = 0.395281 m
Z_SedChannelBottom = 1.50995 m
W_SedInletChannelPreWeir = 0.336537 m
HL_SedWeirInlet = 0.0211312 m
H_SedWeirInlet = 0.315281 m
W_SedWeirInlet = 3.5004 m
# launder
N_SedLaunderOrifices = 62  # Number of orifices per launder
ND_SedLaunder = 0.1524 m
D_SedLaunderOrifice = 0.015875 m
Z_SedLaunder = 1.65202 m
L_SedLaunder = 6.40514 m
Q_SedLaunderOrifices = 0.000107527 m^3/s
HL_SedLaunderOrifice = 0.0379112 m
B_SedLaunderOrifices = 0.1 m  # Center to center launder spacing
# inlet manifold
ND_SedManifold = 0.2032 m
L_SedManifoldDiffuser = 0.0967643 m
Z_SedManifoldPipe = 0.323627 m
ND_SedDiffuser = 0.0254 m
D_SedManifoldPort = 0.0238125 m
B_SedManifoldPort = 0.05 m
N_SedManifoldPorts = 124
L_SedManifoldPipe = 7.00507 m
ED_SedInlet = 0.03 m^2/s^3
Q_SedManifoldPort = 5.37634e-5 m^3/s
# plate settlers
S_SedPlateMin = 0.025 m
L_SedPlate = 0.5 m
B_SedPlate = 0.027 m  # center to center distance between lamella
S_SedPlate = 0.025 m  # spacing between lamella
N_SedPlates = 204  # Number of Sed Plates per Sedimentation Tank Bay.
N_SedModules = 17  # Number of modules per bay
N_SedModulePlates = 12  # Number of plates per module
AN_SedPlate = 1.0472
# SRSF
# tank
Porosity_Sand := ε_FiSand
T_FiWall = 0.25 m
N_FiLayer = 6
Q_Fi = 0.02 m^3/s
Z_FiBottom = -2.90464 m
HL_FiTerminal = 0.455621 m
H_FiLayer = 0.2 m
H_Fi = 4.64517 m
D_FiSand60 = 0.000825 m
HL_FiBwInitiation = 1.48782 m
Z_FiTop = 1.74053 m
V_FiLayer = 0.00183333 m/s
L_Fi = 1.48239 m
N_Fi = 1
HL_FiBwSS = 1.28782 m
Porosity_Sand = 0.4
W_Fi = 1.49957 m
H_FiBottomLayer = 0.26 m
V_FiBw = 0.011 m/s
H_FiSand = 1.30083 m
# sand drain
# trunk lines
Ti_FiSand = 1048.86 s  # This is the time required to empty the filter of the sand.
ND_FiTrunk = 0.1524 m
ND_FiBwTrunk = 0.254 m
ND_FiSandOutlet = 0.0508 m
# siphon
ND_FiSiphonAirValve = 0.0254 m
Z_FiSiphonCoupling = 0.735925 m
ND_FiSiphon = 0.254 m
Z_FiSiphonInlet = -1.01356 m
B_FiSiphonManOrifices = 0.118236 m
N_FiSiphonManOrifices = 10
D_FiSiphonManOrifices = 0.0508 m
# Waste and drain pipes
ND_FiExitWaste = 0.1016 m
# branches
N_FiSlotRows = 2
B_FiManifoldBranch = 0.1 m
ND_FiManBranch = 0.0254 m
ND_FiBwManBranch = 0.0381 m
B_FiManSlot = 0.0047625 m
B_FiBwManSlot = 0.0047625 m
# Inlet Channel
HL_FiInletChannel = 0.000893459 m
L_FiInletChannel = 1.14744 m
Z_FiEntranceWeir = 1.59608 m
# Entrance Box
Z_FiEntranceBottom = 0.600086 m  # bottom of the entrance box
# Exit Box
Z_FiExitBottom = 0.600086 m  # bottom of the filtered water box
L_FiExit = 0.5183 m
L_SedLaunder = 6.40514 m
N_ValveCouplings = 3
N_SedPlatesTotal = 612
N_SedPlatesPerSheet = 6
N_SedPlateSheets = 102
N_Valves = 3
A_EtFloor = 6.98301 m^2
W_FlocWithWalls = 1.2 m
L_FlocWithWalls = 7.78687 m
Vol_FlocFloor = 1576.84 L
A_FlocFloor = 10.5123 m^2
A_SedFloor = 29.5932 m^2
# Materials List
# Plant Summary Calculations:
HL_PlantTotal := Z_EtTop - H_PlantFreeboard - Z_FiExitWeir
## Display AC variables
AC_EntranceTank =  # no stored result
AC_FlocTank =  # no stored result
AC_OperatorAccess = [
    "-layer m OpWalkwayCon"; "c t 132,132,132"; "OpWalkwayCon"; "  "; "_box 0.15,-0.15,1.30995 -13.92807,7.38857,1.50995"; "-group c OpWalkwayCon y "; "all "; "-layer s 0"; "  "; "-layer f OpWalkwayCon"
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]
AC_SedTank =  # no stored result
AC_ChemTanks =  # no stored result
AC_Filter =  # no stored result
AC_Cdc =  # no stored result  # AC_MatApply
AI_EtFlocSedFiSed = [
    "-group c * y "; "all "; "-layer s 0"; "  "; "-layer f *"; "  "; "-layer t *Sed*"; "  "; "-layer s *Sed*"; "  "
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]
AI_EtFlocSedFi = [
    "laythw"; "_-view o t"; "-plot y "; "PublishToWeb PNG.pc3"; "User 1 (824.00 x 583.00 Pixels)"; "l n e F"; ""; " ."; "y  [FILEPATH]EtFlocSedFi_t"; "n y"
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]
AI_EtFlocSedFiFloc = [
    "-group c * y "; "all "; "-layer s 0"; "  "; "-layer f *"; "  "; "-layer t *Floc*"; "  "; "-layer s *Floc*"; "  "
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]
AI_EtFlocSedFiFilter = [
    "-group c * y "; "all "; "-layer s 0"; "  "; "-layer f *"; "  "; "-layer t Fi*"; "  "; "-layer s Fi*"; "  "
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]
# Error Checking Code
# [reference: ExpertInputsComparisonCode_gs559_kas529.xmcd]
# [reference: ErrorCheckingCode_gs559_kas529.xmcd]
