# Low Flow AguaClara Design Tool
Q_Plant := □*L/s  # error: This placeholder is empty.  # This file should only be used for plant flow rates between 1L/s and 3L/s!
method := "EtFlocSedFiLow"
## References
# MathCAD dimension calculations:
# [reference: ExpertInputs.xmcd]
# [reference: MathFunctions.xmcd]
# [reference: PipeDatabase.xmcd]
# [reference: FluidsFunctions.xmcd]
# [reference: SedimentationTankjem384.xmcd]
# [reference: Flocculator_jem384.xmcd]
# [reference: LFOM.xmcd]
# [reference: EntranceTank.xmcd]
# [reference: StackedRapidSandFilter.xmcd]
# [reference: LinearCdc.xmcd]
# [reference: ChemStorageTanks.xmcd]
# AutoCAD drawing programs:
# Translators:
# These are the codes that take MathCAD outputs and create AutoCAD scripts that are used to draw the plant (formerly Basics)
# [reference: MtoATranslators.xmcd]
# The wrapped MtoA translator contains the functions that the user will want to access. These functions will draw pieces with full functionality - specifying the location, dimension, and orientation of the object. Also, it contains layer control and subtraction capabilities for grouped objects.
# [reference: MtoATranslatorsWrapped.xmcd]
# Drawing functions:
# [reference: ChannelF.xmcd]
# [reference: PlumbingF.xmcd]
# [reference: TankF.xmcd]
# [reference: StairsF.xmcd]
# [reference: DrainChannelF.xmcd]
# AutoCAD Script Files:
# [reference: FlocculatorACLow.xmcd]
# [reference: SedimentationTankACLow_jem384.xmcd]
# [reference: EntranceTankACher28.xmcd]
# [reference: ChemStockTanksACher28.xmcd]
# [reference: StackedRapidSandFilterAC.xmcd]
# [reference: CdcAC.xmcd]
# [reference: OperatorAccessAC.xmcd]
# [reference: MaterialsAC.xmcd]
# Materials List:
# [reference: MaterialsList.xmcd]
# Layouts:
# This file will execute at the very end to create multiple views of the entire plant in paperspace
# [reference: LayoutsAC.xmcd]
## All variables displayed must have the standard SI units. They may not have units attached by the user.
# General
Q_Plant = 0.002 m^3/s
Pi_VenaContractaOrifice = 0.62
T_PlantWall = 0.15 m
W_SedPlate = 1.0668 m
T_ConcreteMin = 0.05 m
L_SedPlateSheet = 3 m
C_CoagStock = 177.778 kg/m^3
T_SedPlate = 0.002 m
Ti_CoagStock = 108000 s
T_SedWeir = 0.04 m
C_ChlorStock = 3.63636 kg/m^3
W_SedBay = 1.0668 m
Ti_ChlorineStock = 108000 s
HL_ChannelMax = 0.05 m  # Eliminate FCM variable from design specs
H_PlantFreeboard = 0.1 m
EN_DrillSeries = 0
V_EtUp = 0.008 m/s
W_EtCapture = 0.158899 m
H_EtOverflowChannel =  # error: This variable is undefined.
H_Et = 0.590042 m
H_EtTop = 0.3 m  # height of the top part of the entrance tank above the hoppers
W_Et = 0.739738 m
L_Et = 2.06497 m
ND_EtDrain = 0.0762 m
HL_Lfom = 0.2 m
ZW_Et = 2.32725 m
Z_EtTop = 2.42725 m
Z_Et = 1.83721 m  # elevation of top of slab.
ND_RMPipe = 0.0762 m
Z_EtHopper = 2.12725 m
H_EtHopper = 0.290042 m
N_EtHoppers =  # error
ND_EtFlowControl = 0.0381 m
L_EtHopper = 0.781685 m
AN_EtSlope = 0.785398
W_EtDC = 0.388138 m  # drain channel under entrance tank dimensions
L_EtDC = 1.86337 m
H_EtDC = 0.128148 m  # Give heights of the channel at the beginning and end and change the design specs to explain that it's sloped.
# Flow measurement
D_LfomOrifices = 0.0111125 m
S_LfomRows =  # error
H_LfomOrifice =  # error
Q_LfomScale =  # error
N_LfomOrifices = [6; 3; 2; 2; 2; 1; 2; 1; 1; 1]
ND_Lfom =  # error
HL_Lfom = 0.2 m
# Rapid Mix
ED_Tee = 0.235103 m^2/s^3
Z_LfomOrifices = 2.13281 m  # elevation of the center of
Z_EtExit =  # error  # elevation of center of pipe exiting the entrance tank and heading toward the flocculator
# Entrance Tank
W_DC =  # error
# Maybe give the vertical distances below the bottom of the sed tank of the beginning and end of the channel? Calculate them, display, and add to the design specs.
H_DC =  # error
L_DC =  # error
# Plant Drain Channel
Z_CoagTank = 2.69495 m
Z_CoagTankOutlet = 2.79495 m
L_CdcFloatArm = 0.41275 m
Q_CdcMax =  # error
L_CdcScaleArm = 0.50165 m
C_CoagDoseMax = 0.08 kg/m^3
B_StockOutlet = 0.1 m
L_CoagCdcTube = 1.10042 m
D_CdcTube =  # error
N_CoagCdcTubes = 1
HL_Cdc =  # error
L_CdcFloatArm = 0.41275 m
L_CdcScaleArm = 0.50165 m
# Coag Dose Controller
H_Floc = 2.03444 m
Z_FlocTank = 0 m  # Look at Flocculator Positioning arrays
N_FlocValves = 6
W_FlocChannel = 0.110961 m
Ti_Floc = 560.242 s  # Fill last channel with bafffles from last channel
H_FlocSlope = 0.0301625 m  # Fix port width to be based on energy dissipation in that channel
ED_Floc = 0.0105 m^2/s^3
# Adjust spacing after the number of baffles per channel is known.
V_Floc = 0.0596799 m/s  # Check the residence time of the flocculator should be at least 20minutes
HW_FlocEnd = 1.63451 m
ND_FlocValve = 0.0508 m
CP_Floc = 75 m^(2/3)
ED_FlocAve = 0.00525 m^2/s^3
Ti_FlocDrain = 1800 s
CP_FlocTotal =  # error
ED_FlocMax = 0.00525 m^2/s^3
N_FlocChannels = 11
G_Floc = 72.4569 1/s
W_Floc = 1.72057 m
HL_Floc = 0.299926 m
ED_FlocChannelFirst =  # error
HW_FlocStart = 1.93444 m
S_FlocBaffle = [0.135; 0.135; 0.135; 0.135; 0.135; 0.135; 0.135; 0.135; 0.135; 0.135; 0.135] m
B_FlocBaffle = [0.137; 0.137; 0.137; 0.137; 0.137; 0.137; 0.137; 0.137; 0.137; 0.137; 0.137] m
N_FlocChannelBaffles = [3; 3; 3; 3; 3; 3; 3; 3; 3; 3; 3]
W_FlocPort = [0.115; 0.115; 0.115; 0.115; 0.115; 0.115; 0.115; 0.115; 0.115; 0.115; 0.28415] m
S_FlocBaffleFirst =  # error
HL_FlocChannels =  # error
L_FlocBaffleLower = 1.44935 m
L_FlocBaffleUpper = 1.80883 m
H_FlocPort = [0.252251; 0.252251; 0.252251; 0.252251; 0.252251; 0.252251; 0.252251; 0.252251; 0.252251; 0.252251; 0.252251] m
Ti_Floc = 560.242 s  # residence time of the flocculator
N_FlocBaffles =  # error
ND_FlocValve = 2 in
EN_FlocBaffle = 1
# Flocculator
# Sed Tanks
N_SedTanks = 1
L_Sed = 2.06497 m
N_SedBays = 1  # Number of bays of inlet manifolds in each sed tank
Q_SedBay = 0.002 m^3/s
V_SedUpBod = 0.001 m/s  # design constraints
V_SedCBod = 0.00012 m/s
V_SedUp = 0.00097392 m/s  # Actual values from this design
V_SedC =  # error
W_SedSideSlopes = 0.52505 m
AN_SedSlope = 0.872665
Ti_Sed = 1190.47 s
# Sedimentation Tank Sludge Drain:
N_SedSludgeOrifices = 18  # per cell
Ti_SludgeDrain = 1800 s  # Tank Drain time
W_SedSludge = 0.055574 m  # Width of the sludge channel
H_SedSludge = 0.055574 m  # Depth of the sludge channel
# Distance center to center between drain orifices
B_SedSludgeOrifices = 0.106721 m
W_SedDrainCover = 0.095574 m
D_SedSludgeOrifice = 0.00974959 m  # Diameter of drain orifices
N_SedSludgeOrifices = 18
ND_SedSludgePipe = 0.0508 m
# Sedimentation Tank Dimensions:
Z_SedSludge = 0.055574 m  # Height from 0 of the top of the sludge drain
Z_SedSideSlopes = 0.748004 m
W_Sed = 1.0668 m  # Total tank wall height
L_Sed = 2.06497 m  # Total tank length
H_Sed = 1.73451 m
# Sedimentation Tank Inlet Channel:
EN_InletChannelGeom = 0
HW_SedInletChannel = 0.20176 m
W_SedInletChannel = 0.28415 m
L_SedChannel = 1.0668 m
H_SedInletChannel = 0.30176 m
HL_SedWeirInlet = 0.0245436 m
W_SedInletChannelPreWeir = 0.28415 m
H_SedWeirInlet = 0.177217 m
W_SedWeirInlet = 0.28415 m
# Sedimentation Tank Effluent Launder:
N_SedLaunderOrifices = 18  # Number of orifices per launder
N_SedLaunderOrificesRow =  # error  # Number of orifices per row
Z_SedLaunder = 1.53355 m
Q_SedLaunderOrifices = 0.000111111 m^3/s
B_SedLaunderOrifices = 0.1 m  # Center to center launder spacing
# More Launder Dimensions
ND_SedLaunder = 0.0762 m
D_SedLaunderOrifice = 0.015875 m
L_SedLaunder = 1.96859 m
HL_SedLaunderOrifice = 0.0417971 m
# Sedimentation Tank Inlet Manifold:
ND_SedManifold = 0.1524 m
L_SedManifoldDiffuser = 0.157882 m
Z_SedManifoldPipe = 0.35741 m
ND_SedDiffuser = 0.0254 m
D_SedManifoldPort = 0.03175 m
B_SedManifoldPort = 0.05 m
N_SedManifoldPorts = 37
L_SedManifoldPipe = 1.63729 m
ED_SedInlet = 0.0105 m^2/s^3
Q_SedManifoldPort = 5.40541e-5 m^3/s
# Exit Channel:
W_SedExitChannel = 0.34 m
H_SedExitChannel = 0.30176 m
HW_SedExitChannel = 0.16176 m  # water height in exit channel from base of channel
H_SedWeirExit = 0.1516 m
# Lamella:
L_SedPlate = 0.5 m
B_SedPlate = 0.027 m  # center to center distance between lamella
S_SedPlate = 0.025 m  # spacing between lamella
N_SedPlates = 63  # Number of Sed Plates per Sedimentation Tank Bay.
N_SedModules = 7  # Number of modules per bay
N_SedModulePlates = 9  # Number of plates per module
AN_SedPlate = 1.0472
L_SedActive = 1.96184 m
Z_SedLaunder = 1.53355 m
HW_Sed = 1.63451 m
H_Sed = 1.73451 m
# SRSF
H_Fi = 4.19604 m
L_Fi = 0.482393 m
W_Fi = 0.465809 m
B_FiManifoldBranch = 0.1 m
ND_FiTrunk = 0.0381 m
ND_FiManBranch = 0.0254 m
ND_FiBwTrunk = 0.0762 m
ND_FiBwManBranch = 0.0381 m
ND_FiExitWaste = 0.0381 m
ND_FiBwWeirDrain =  # error
ND_FiBwDrain =  # error  # For the box that holds keeps the end of the siphon submerged
ND_FiSandOutlet = 0.0508 m
Ti_FiSand = 110.252 s  # This is the time required to empty the filter of the sand.
ND_FiSiphonAirValve = 0.0127 m
ND_FiSiphon = 0.0762 m
Q_FiSiphonMax =  # error
B_FiSiphonManOrifices = 0.190396 m
N_FiSiphonManOrifices = 2
D_FiSiphonManOrifices = 0.0508 m
Ti_FiBwInitiation =  # error
H_FiSand = 1.24083 m
N_FiLayer = 6
H_FiLayer = 0.2 m
V_FiLayer = 0.00183333 m/s
HL_FiTerminal = 0.455621 m
V_FiBw = 0.011 m/s
HL_FiBwInitiation = 1.42842 m
HL_FiBwSS = 1.22842 m
D_FiSand =  # error
N_Fi = 1
Q_Fi = 0.002 m^3/s
W_Slots =  # error
B_FiBwManSlot = 0.0047625 m
L_FiBwManSlot =  # error
B_FiManSlot = 0.0047625 m
L_FiManSlot =  # error
N_FiSlotRows = 2
Z_FiBottom = -2.58532 m
Z_FiTop = 1.61072 m
# Weirs
HL_FiWeir =  # error
L_FiWeir =  # error
Z_FiEntranceWeir = 1.49472 m
Z_FiBwWeir =  # error
Z_FiSiphonInlet = -0.772244 m  # This is the centerline elevation of the siphon orifices
Z_FiExitWeir =  # error
Z_FiExitBottom = 0.5415 m  # bottom of the filtered water box
Z_FiEntranceBottom = 0.5415 m  # bottom of the entrance box
Z_FiSiphonCoupling = 0.837019 m
Z_FiBwTop =  # error
W_FiBwDrain =  # error
H_FiBwDrain =  # error
N_Launders =  # error
L_LaunderPipeTotal =  # error
N_LaunderCouplings =  # error
N_ValveCouplings = 1
N_SedPlatesTotal = 63
N_SedPlatesPerSheet = 6
N_SedPlateSheets = 11
N_Valves = 1
A_EtFloor = 2.45895 m^2
W_FlocWithWalls = 2.87057 m
L_FlocWithWalls = 2.36497 m
Vol_FlocFloor = 1071.53 L
A_FlocFloor = 7.14356 m^2
Vol_SedSlopes =  # error
A_SedWalls =  # error
A_SedFloor = 3.23244 m^2
# Materials List
# Plant Summary Calculations:
HL_PlantTotal := Z_EtTop - H_PlantFreeboard - Z_FiExitWeir
HL_PlantTotal =  # error
## Display AC variables
AC_EntranceTank =  # no stored result
AC_FlocTank = [
    "-layer m FlocTankCon"; "c t 132,132,132"; "FlocTankCon"; "  "; "_-view o t _zoom w 0.16,1.0568,0 -0.7,3.09737,2.03444"; "_box 0,1.2168,0 -0.54,2.93737,2.03444 _box 0.15,1.0668,-0.15 -0.69,3.08737,2.03444"; "_subtract 0.15,1.0668,-0.15  0,1.2168,0 "; "-group c FlocTankCon y "; "all "; "-layer s 0"
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]
AC_OperatorAccess = [
    "-layer m OpWalkwayCon"; "c t 132,132,132"; "OpWalkwayCon"; "  "; "_box 0.15,-0.15,1.23275 -7.12865,6.12711,1.43275"; "-group c OpWalkwayCon y "; "all "; "-layer s 0"; "  "; "-layer f OpWalkwayCon"
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]
AC_SedTank =  # no stored result
AC_ChemTanks =  # no stored result
AC_Filter =  # no stored result
AC_ZZLayout := AC_Layout
AC_ZZMatApply
AC_Cdc = [
    "-layer m Cdc";
    "c t 125,0,160";
    "Cdc";
    "  ";
    "-insert https://confluence.cornell.edu/download/attachments/173604905/CdcLeverArm.dwg";
    "-1.79432,5.40564,2.45215 x 1 1  270";
    "-insert https://confluence.cornell.edu/download/attachments/173604905/CdcLeverArmBracket.dwg";
    "-2.20707,5.37364,2.42725 x 1 1  270";
    "-insert https://confluence.cornell.edu/download/attachments/173604905/CdcCht.dwg";
    "-3.14042,5.40564,2.54495 x 1 1  90"
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]
AC_ZZLayout =  # error
L_Sed = 2.06497 m
L_Floc = 0.54 m
TestPlantLow := stack(AC_EntranceTank, AC_FlocTank, AC_SedTank, AC_ChemTanks)
Q_Plant = 0.002 m^3/s
