# Flocculator Modular Design
Mod := 1
method := "Flocculator"
# User Inputs | To be left undefined and inputed online by the user
# for 20Lps design:
# L.Sed=4.397m
# H.Floc=2.059m
# CP.FlocUser=75m^(2/3)
# ED.FlocUser=0.011m^2/s^3
Q_Plant := 20*L/s
L_Sed := 4 m
H_Sed := 2.059 m
CP_FlocUserNoUnits := 75
ED_FlocUser := 0.011*m^2/s^3
HW_FlocEndDesign := 2 m
HW_FlocEndNoFlow := 1.8 m
Z_WaterExit := 1.9 m
ND_WaterEntrance := 4 in
CP_FlocUser := CP_FlocUserNoUnits*m^(2/3)
# From Expert Inputs
# [reference: ExpertInputs.xmcd]
CP_Floc := CP_FlocUser
ED_Floc := ED_FlocUser
HW_Sed := HW_FlocEndDesign
Z_SedWeirExit := HW_FlocEndNoFlow
W_SedInletChannelPreWeir := 0.5 m
Z_SedChannelBottom := Z_WaterExit
ND_RMPipe := ND_WaterEntrance
ND_SedManifold := 6 in
N_SedTanks := 1
W_Sed := 2 m
# Design References
# [reference: MathFunctions.xmcd]
# [reference: PipeDatabase.xmcd]
# [reference: FluidsFunctions.xmcd]
# From Flocculator Design Code
# [reference: Flocculator.xmcd]
# From Flocculator Drawing Code
# [reference: MtoATranslators.xmcd]
# [reference: MtoATranslatorsWrapped.xmcd]
# [reference: ChannelF.xmcd]
# [reference: PlumbingF.xmcd]
# [reference: TankF.xmcd]
# [reference: StairsF.xmcd]
# [reference: DrainChannelF.xmcd]
# [reference: FlocculatorAC.xmcd]
# Display Variables
EN_FlocType :=
    "horizontal" if EN_FlocHoriz == 1
    "vertical" otherwise
L_Sed = 4 m
HW_Sed = 2 m
Q_Plant = 0.02 m^3/s
# Tank
H_Floc = 2.16954 m
HW_FlocEnd = 2 m
HW_FlocStart = 2.06954 m
Z_FlocTank = 0 m
L_Floc = 4 m
H_FlocPort = [0.893933; 0.893933; 0.893933; 0.893933] m
W_FlocChannel = 0.56 m
N_FlocChannels = 4
# Drains
ND_FlocValve = 0.0762 m
N_FlocValves = 2
H_FlocSlope = 0.04445 m
Ti_FlocDrain = 1800 s
# Parameters
ED_Floc = 0.011 m^2/s^3
CP_Floc = 75 m^(2/3)
# Look at Flocculator Positioning arrays
V_Floc = 0.107735 m/s
# Fill last channel with bafffles from last channel
# Fix port width to be based on energy dissipation in that channel
# Adjust spacing after the number of baffles per channel is known.
# Check the residence time of the flocculator should be at least 20minutes
HL_Floc = 0.0695351 m
K_FlocBaffle = 2.5
CP_Floc = 75 m^(2/3)
# Baffles
S_FlocBaffle = [0.3315; 0.3315; 0.3315; 0.3315] m
B_FlocBaffle = [0.3335; 0.3335; 0.3335; 0.3335] m
N_FlocChannelBaffles = [11; 11; 11; 10]
W_FlocPort = [0.3115; 0.3115; 0.3115; 0.5] m
L_FlocBaffleLower = 1.4685 m
L_FlocBaffleUpper = 1.62229 m
T_FlocBaffle = 0.002 m
S_FlocBaffleFirst = 0.3315 m
EN_FlocBaffle = 1
Z_FlocBaffles = [
    0, 0, 0, 0.49725;
    0.49725, 0.49725, 0.49725, 0;
    0, 0, 0, 0.49725;
    0.49725, 0.49725, 0.49725, 0;
    0, 0, 0, 0.49725;
    0.49725, 0.49725, 0.49725, 0;
    0, 0, 0, 0.49725;
    0.49725, 0.49725, 0.49725, 0;
    0, 0, 0, 0.49725;
    0.49725, 0.49725, 0.49725, 0;
    0, 0, 0, 0
] m
# Modules
ND_FlocModulesMain = 0.0127 m
ND_FlocModulesLarge = 0.0381 m
L_FlocModuleLong = [0.999817; 0.999817; 0.999817; 0.999817] m
L_FlocModuleShort = [0.666317; 0.666317; 0.666317; 0.332817] m
ND_SpacerPipe = 0.01905 m
L_FlocModuleLongOuter = [0.666317; 0.666317; 0.666317; 0.666317] m
AC_FlocTank =  # no stored result
# Previews
# [reference: LayoutsAC.xmcd]
# [component: inputs AC_FlocTank]
AI_FlocTank = [
    "laythw"; "_-view o t"; "-plot y "; "PublishToWeb PNG.pc3"; "VGA (640.00 x 480.00 Pixels)"; "l n e F"; ""; " ."; "y  [FILEPATH]Flocculator_t"; "n y"
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]
