# LFOM Modular Design
# User Inputs
Q_Plant := □  # error: This placeholder is empty.
# To be left undefined and inputed online by the user
# From Expert Inputs
Country := 0
Language := 0
EN_DrillSeries := 0
Pi_VenaContractaOrifice := 0.63
Π_Lfomorifice := 10  # Number of rows in lfom.  note: execution time of the lfom file exponentially increases with this number.
Π_LfomSafety := 1.5  # sefety coefficient for lfom pipe diameter
Π_LfomSafetyMin := 1.15
HL_Nlfom := 40 cm  # head loss through nonlinear orifice meter (simple orifice)
HL_LfomMin := 20 cm
HL_LfomMax := 40 cm
HL_CdcCoag := HL_LfomMin
H_LfomSF := 5 cm
N_Lfom := 1
ND_LfomPipeMax := 12 in
S_LfomOrificesMin := 5 mm  # Difference between the height of the water in floc tank and the bottom set of holes on the linear flow orifice meter
H_LfomFreefall := 5 cm
# Both of these assumptions were tested over a range of flow rates and found to give reasonable Lfom configurations.
Pi_Sutro := 0.1
Pi_Lfomorifice := 20
HL_LfomArray := [20; 25; 30; 35; 40]*cm
D_DrillEng :=
    i ← 0
    D_DrillEng[0] ← 1/32*in
    while D_DrillEng[i] ≤ 3/16*in - 1/128*in
        i ← i + 1
        D_DrillEng[i] ← D_DrillEng[i - 1] + 1/128*in
    while D_DrillEng[i] < 1 in - 1/16*in
        i ← i + 1
        D_DrillEng[i] ← D_DrillEng[i - 1] + 1/16*in
    while D_DrillEng[i] < 2 in
        i ← i + 1
        D_DrillEng[i] ← D_DrillEng[i - 1] + 1/4*in
    return D_DrillEng
D_DrillMet :=
    i ← 0
    D_DrillMet[0] ← 0.5 mm
    while D_DrillMet[i] ≤ 5 mm - 0.1 mm
        i ← i + 1
        D_DrillMet[i] ← D_DrillMet[i - 1] + 0.1 mm
    while D_DrillMet[i] < 20 mm
        i ← i + 1
        D_DrillMet[i] ← D_DrillMet[i - 1] + 1 mm
    while D_DrillMet[i] < 50 mm
        i ← i + 1
        D_DrillMet[i] ← D_DrillMet[i - 1] + 2 mm
    return D_DrillMet
D_Drill :=
    D_Drill ← D_DrillEng if EN_DrillSeries == 0
    D_Drill ← D_DrillMet otherwise
EN_LinearFlow := 1
# Design References
# [reference: MathFunctions.xmcd]
# [reference: PipeDatabase.xmcd]
# [reference: FluidsFunctions.xmcd]
# [reference: LFOM.xmcd]
# LFOM Code
# [reference: MtoATranslators.xmcd]
# [reference: MtoATranslatorsWrapped.xmcd]
# [reference: PlumbingF.xmcd]
LFOM_Origin := [0 m; 0 m; 0 m]
L_RMVertPipeTop := 0 m
L_LfomPipe := HL_Lfom
L_RMVertPipeBottom := 0 m
# [reference: LfomAC.xmcd]
# Display Variables
HL_Lfom =  # error: This variable is undefined.
Q_Plant =  # error
HL_Flowmeasure =  # error
ND_LfomPipe =  # error
D_LfomOrifices =  # error
H_LfomOrifices =  # error
N_LfomOrifices =  # error
B_LfomRows =  # error
AC_LFOM =  # error
# Previews
# [reference: LayoutsAC.xmcd]
AI_Lfom = ["laythw"; "_-view o f"; "-plot y "; "PublishToWeb PNG.pc3"; "VGA (640.00 x 480.00 Pixels)"; "l n e F"; ""; " ."; "y  [FILEPATH]LFOM_f"; "n y"; "shademode x -view swiso"]
# Template
# [reference: LFOM Orifice Template.xmcd]
AC_LfomOrificesTemplate =  # error
AI_LfomTemplate = ["laythw"; "_-view o t"; "-plot y "; "PublishToWeb PNG.pc3"; "VGA (480.00 x 640.00 Pixels)"; "l n e F"; ""; " ."; "y  [FILEPATH]LFOMTemplate_t"; "n y"; "shademode x -view swiso"]
