# AguaClara Design Tool
Country =  # error: This variable is undefined.
Language =  # error
Country := 0
C_ChlorineDoseMax := 2*mg/L
C_ChlorineStock := 50*gm/L
Ti_ChlorineStock := 30 hr
# Design References
# MathCAD dimension calculations:
# [reference: BasicClientInputs.xmcd]
# [reference: ExpertInputs.xmcd]
# [reference: DesignAssumptions.xmcd]
# [reference: MathFunctions.xmcd]
# [reference: PipeDatabase.xmcd]
# [reference: MinorLossCoefficients.xmcd]
# [reference: FluidsFunctions.xmcd]
# [reference: Sedimentation Tank.xmcd]
# [reference: Flocculator.xmcd]
# [reference: LFOM.xmcd]
# [reference: EntranceTankDim.xmcd]
# [reference: LinearCdc_app37.xmcd]
# [reference: ChemStorageCylinders.xmcd]
# [reference: Stacked Rapid Sand Filter.xmcd]
# [reference: Materials List.xmcd]
# AutoCAD drawing programs:
# Translators:
# These are the codes that take MathCAD outputs and create AutoCAD scripts that are used to draw the plant (formerly Basics)
# [reference: MtoATranslators.xmcd]
# The wrapped MtoA translator contains the functions that the user will want to access. These functions will draw pieces with full functionality - specifying the location, dimension, and orientation of the object. Also, it contains layer control and subtraction capabilities for grouped objects.
# [reference: MtoATranslators Wrapped.xmcd]
# Plant Elements:
# These are all of the files that draw the fundamental parts of the plants (tees, elbows, tanks, pipes, etc)
# [reference: Channel.xmcd]
# [reference: cross.xmcd]
# [reference: Sludge.xmcd]
# [reference: Manifold.xmcd]
# [reference: pipe.xmcd]
# [reference: elbow.xmcd]
# [reference: tank.xmcd]
# [reference: adapter.xmcd]
# [reference: Tee.xmcd]
# [reference: pvccap.xmcd]
# [reference: LaunderCap.xmcd]
# [reference: ChimneyStops.xmcd]
# [reference: laminaplain.xmcd]
# [reference: Stairs.xmcd]
# [reference: DrainChannel.xmcd]
# [reference: Manifold.xmcd]
# Specific Pieces:
# These are the codes that draw the bigger pieces of the plant (the sed tank, floc tank, etc)
# [reference: floctank.xmcd]
# [reference: SedTank- with pieces.xmcd]
# [reference: Entrance Tank.xmcd]
# [reference: Plant Drain Channel.xmcd]
# [reference: ChemStockCylinders.xmcd]
# [reference: SRSF.xmcd]
# [reference: Operator Access.xmcd]
# Layouts:
# This file will execute at the very end to create multiple views of the entire plant in paperspace
# [reference: Layouts.xmcd]
## All variables displayed must have the standard SI units. They may not have units attached by the user.
# General:
Q_Plant = 0.012 m^3/s
T_PlantWall = 0.15 m
W_SedPlate = 1.08 m
T_ConcreteMin = 0.05 m
L_SedPlateSheet = 3.658 m
C_CoagStock = 120 kg/m^3
T_SedPlate = 0.002 m
Ti_CoagStock = 108000 s
T_SedWeir = 0.05 m
C_ChlorineStock = 50 kg/m^3
W_SedBay = 1.08 m
Ti_ChlorineStock = 108000 s
EN_FcmTube = 0
H_PlantFreeboard = 0.1 m
EN_DrillSeries = 1
# Sed Tanks and Slopes:
N_SedTanks = 4
H_SedBetween = 0 m  # Distance from the top of the inlet manifold to the bottom of the ledge supporting the lamella frame
L_Sed = 3.50731 m
N_SedBays = 1  # Number of bays of inlet manifolds in each sed tank
# Length of the port through which water exits the inlet manifold
# Width of ferrous cement plates in whice one manifold port is cut
Q_SedBay = 0.003 m^3/s
ND_FlocValve =  # error
V_SedCBod = 0.00012 m/s
V_SedUpBod = 0.0008 m/s
W_SedSlope = 0.416818 m
AN_SedSlope = 1.0472
H_SedBayDivider = 0.820132 m
# Sedimentation Tank Sludge Drain:
N_SedSludgeOrifices = 35  # per cell
Ti_SludgeDrain = 1800 s  # Tank Drain time
W_SedSludge = 0.0963644 m  # Width of the sludge channel
B_SedSludgeOrifices = 0.1 m  # Distance center to center between drain orifices
H_SedSludge = 0.0481822 m  # Depth of the sludge channel
T_SedSludge = 0.05 m
T_SedSludge = 0.05 m
# Thickness of the plate topping the sludge channel
# through which drain holes are formed
W_SedDrainCover = 0.196364 m
D_SedSludgeOrifice = 0.011 m  # Diameter of drain orifices
W_SedInletBottom = 0.441818 m
N_SedSludgeOrifices = 35
ND_SedSludgeValve = 0.0508 m
# Sedimentation Tank Dimensions:
Z_SedSludge = 0.0981822 m  # Height from 0 of the top of the sludge drain
Z_SedSlopes = 0.820132 m  # Height from 0 of the top of the inlet manifold
W_Sed = 1.08 m  # Total tank wall height
L_Sed = 3.50731 m  # Total tank length
H_Sed = 1.75242 m
# Inlet Channel:
HW_InletChannel = 0.255898 m  # Width of the drop chimneys connecting channel to sed inlet manifolds
W_InletChannel = 0.405898 m  # length of drop chimmneys
L_Channel = 5.07 m
N_SedInletPipes = 2  # per sed bay
H_InletChannel = 0.355898 m
HL_SedWeirInlet = 0.0117426 m
W_SedInletchannelPreweir = 0.255898 m
H_SedWeirInlet = 0.244155 m
# Sedimentation Tank Effluent Launder:
N_SedLaunderOrifices = 44  # Number of orifices per launder
Z_SedLaunder = 1.54353 m
Q_SedLaunderOrifices = 7.12816e-5 m^3/s  # More Launder Dimensions
L_SedLaunder = 2.39027 m
ND_SedLaunder = 0.1016 m
B_SedLaunderOrifices = 0.102122 m  # Center to center launder spacing
D_SedLaunderOrifice = 0.013 m
# Sedimentation Tank Inlet Manifold:
ND_SedManifold = 0.1524 m
L_Diffuser = 0.176174 m
Z_SedManifoldLift = 0.264262 m
D_Diffuser = 0.0381 m
D_SedManifoldPort = 0.036 m
B_SedManifoldPort = 0.1 m
N_SedManifoldPorts = 29
L_SedManifoldPipe = 3.37937 m
S_SedManifoldBetween = 0.009 m
# Exit Channel:
W_ExitChannel = 0.3532 m
H_ExitChannel = 0.355898 m
L_ExitChannel = 5.07 m
H_PltWeir = 0.265898 m  # height of the weir carrying water to the distribution tank
HW_ExitChannel = 0.215898 m  # water height in exit channel from 0
# Lamella:
L_SedPlate = 0.609667 m
N_SedModules = 7
B_SedPlate = 0.0287774 m  # center to center distance between lamella
N_SedModulePlates = 10
S_SedPlate = 0.0267774 m  # spacing between lamella
N_SedPlates = 70  # Number of Sed Plates per Sedimentation Tank Bay.
AN_SedPlate = 1.0472
V_SedC = 0.00011819 m/s
L_SedActive = 2.32605 m
V_SedUp = 0.000791996 m/s
Z_SedLaunder = 1.54353 m
H_SedPlate = 0.527987 m
H_SedAbove = 0.166043 m  # Height of water needed above the lamella
N_SedPlates = 70
HW_Sed = 1.65242 m
H_Sed = 1.75242 m
Z_Mp = 1.39652 m
H_SedBayDivider = 0.820132 m
# Flocculator: | Look at Flocculator Positioning arrays
H_Floc =  # error
Z_FlocTank =  # error
N_FlocValves =  # error
W_FlocChannel =  # error
Ti_Floc =  # error  # Fill last channel with bafffles from last channel
H_FlocSlope =  # error  # Fix port width to be based on energy dissipation in that channel
ED_Floc = 0.006 m^2/s^3
# Adjust spacing after the number of baffles per channel is known.
V_Floc =  # error  # Check the residence time of the flocculator should be at least 20minutes
HW_FlocEnd =  # error
ND_FlocValve =  # error
CP_Floc = 100 m^(2/3)
Ti_FlocDrain = 1800 s
CP_FlocTotal =  # error
X_FlocBaffles =  # error
L_FlocBaffles =  # error
Z_FlocBaffles =  # error
N_FlocChannels =  # error
L_FlocTank =  # error
HL_Floc =  # error
HW_FlocStart =  # error
S_FlocBaffle =  # error
B_FlocBaffle =  # error
N_FlocChannelBaffles =  # error
W_FlocPort =  # error
HL_FlocChannels =  # error
L_FlocBaffleLower =  # error
L_FlocBaffleUpper =  # error
H_FlocPort =  # error
Ti_Floc =  # error  # residence time of the flocculator
N_FlocBaffles =  # error
# Entrance Tank:
Z_Et =  # error  # elevation of the entrance tank
H_EtTop =  # error  # height of the top part of the entrance tank above the hoppers
H_Et =  # error
L_Et =  # error
W_Et =  # error
N_EtHoppers =  # error
AN_EtSlope = 1.0472
ND_EtDrain = 0.0762 m
ND_EtOverflow =  # error
ND_RMPipe =  # error
H_EtHopper =  # error
L_EtHopper =  # error
# Chem Dose Controller:
Z_CoagTank =  # error
D_CdcTubeDesign =  # error
L_CdcFloatArm = 0.41275 m
L_CdcScaleArm = 0.50165 m
# Materials List:
N_Launders = 4
L_LaunderPipeTotal = 9.56109 m
N_LaunderCouplings = 4
N_ValveCouplings = 4
N_SedPlatesTotal = 280
N_SedPlatesPerSheet = 6
N_SedPlateSheets = 47
N_Valves = 4
AC_SedTankA :=
    AC_SedTank if last(AC_SedTank) < 598
    submatrix(AC_SedTank, 0, 598, 0, 0) otherwise
AC_FilterA :=
    AC_Filter if last(AC_Filter) < 598
    submatrix(AC_Filter, 0, 598, 0, 0) otherwise
AC_SedTankB :=
    submatrix(AC_SedTank, 599, last(AC_SedTank), 0, 0) if last(AC_SedTank) < 1197
    submatrix(AC_SedTank, 599, 1197, 0, 0) otherwise
AC_FilterB :=
    submatrix(AC_Filter, 599, last(AC_Filter), 0, 0) if last(AC_Filter) < 1197
    submatrix(AC_Filter, 599, 1197, 0, 0) otherwise
AC_SedTankC :=
    submatrix(AC_SedTank, 1198, last(AC_SedTank), 0, 0) if last(AC_SedTank) < 1796
    submatrix(AC_SedTank, 1198, 1796, 0, 0) otherwise  # error: This array has an incorrect number of rows and columns.
AC_FilterC :=
    submatrix(AC_Filter, 1198, last(AC_Filter), 0, 0) if last(AC_Filter) < 1796
    submatrix(AC_Filter, 1198, 1796, 0, 0) otherwise
AC_ChemTanksA :=
    AC_ChemTanks if last(AC_ChemTanks) < 598
    submatrix(AC_ChemTanks, 0, 598, 0, 0) otherwise
AC_FlocTankA :=
    AC_FlocTank if last(AC_FlocTank) < 598
    submatrix(AC_FlocTank, 0, 598, 0, 0) otherwise
AC_ChemTanksB :=
    submatrix(AC_ChemTanks, 1198, last(AC_ChemTanks), 0, 0) if last(AC_ChemTanks) < 1197
    submatrix(AC_ChemTanks, 1198, 1796, 0, 0) otherwise
AC_FlocTankB :=
    submatrix(AC_FlocTank, 599, last(AC_Filter), 0, 0) if last(AC_Filter) < 1197
    submatrix(AC_FlocTank, 599, 1197, 0, 0) otherwise
AC_ChemTanksC :=
    submatrix(AC_ChemTanks, 1198, last(AC_ChemTanks), 0, 0) if last(AC_ChemTanks) < 1796
    submatrix(AC_ChemTanks, 1198, 1796, 0, 0) otherwise
AC_FlocTankC :=
    submatrix(AC_FlocTank, 1198, last(AC_FlocTank), 0, 0) if last(AC_FlocTank) < 1796
    submatrix(AC_FlocTank, 1198, 1796, 0, 0) otherwise
AC_DrainChannelA :=
    AC_DrainChannel if last(AC_DrainChannel) < 598
    submatrix(AC_DrainChannel, 0, 598, 0, 0) otherwise
AC_EntranceTankA :=
    AC_EntranceTank if last(AC_EntranceTank) < 598
    submatrix(AC_EntranceTank, 0, 598, 0, 0) otherwise
AC_DrainChannelB :=
    submatrix(AC_DrainChannel, 1198, last(AC_DrainChannel), 0, 0) if last(AC_DrainChannel) < 1197
    submatrix(AC_DrainChannel, 1198, 1796, 0, 0) otherwise
AC_EntranceTankB :=
    submatrix(AC_EntranceTank, 599, last(AC_EntranceTank), 0, 0) if last(AC_EntranceTank) < 1197
    submatrix(AC_EntranceTank, 599, 1197, 0, 0) otherwise
AC_DrainChannelC :=
    submatrix(AC_DrainChannel, 1198, last(AC_DrainChannel), 0, 0) if last(AC_DrainChannel) < 1796
    submatrix(AC_DrainChannel, 1198, 1796, 0, 0) otherwise
AC_EntranceTankC :=
    submatrix(AC_EntranceTank, 1198, last(AC_EntranceTank), 0, 0) if last(AC_EntranceTank) < 1796
    submatrix(AC_EntranceTank, 1198, 1796, 0, 0) otherwise
AC_LayoutA :=
    AC_Layout if last(AC_Layout) < 598
    submatrix(AC_Layout, 0, 598, 0, 0) otherwise
AC_OperatorAccessA :=
    AC_OperatorAccess if last(AC_OperatorAccess) < 598
    submatrix(AC_OperatorAccess, 0, 598, 0, 0) otherwise
AC_OperatorAccessB :=
    submatrix(AC_OperatorAccess, 599, last(AC_OperatorAccess), 0, 0) if last(AC_OperatorAccess) < 1197
    submatrix(AC_OperatorAccess, 599, 1197, 0, 0) otherwise
AC_LayoutB :=
    submatrix(AC_Layout, 1198, last(AC_Layout), 0, 0) if last(AC_Layout) < 1197
    submatrix(AC_Layout, 1198, 1796, 0, 0) otherwise
AC_OperatorAccessC :=
    submatrix(AC_OperatorAccess, 1198, last(AC_OperatorAccess), 0, 0) if last(AC_OperatorAccess) < 1796
    submatrix(AC_OperatorAccess, 1198, 1796, 0, 0) otherwise
AC_LayoutC :=
    submatrix(AC_Layout, 1198, last(AC_Layout), 0, 0) if last(AC_Layout) < 1796
    submatrix(AC_Layout, 1198, 1796, 0, 0) otherwise
AC_EntranceTankA =  # error
AC_EntranceTankB =  # error
AC_EntranceTankC =  # error
AC_FlocTankA =  # error
AC_FlocTankB =  # error
AC_FlocTankC =  # error
AC_OperatorAccessA =  # error
AC_OperatorAccessB =  # error
AC_OperatorAccessC =  # error
AC_SedTankA = [
    "_-view o t";
    "-layer m tank";
    "c t 132,132,132";
    "tank";
    "  ";
    "_-view o t _zoom w 0.16,-0.16,0 -3.66731,1.24,1.75242 _box 0,0,0 -3.50731,1.08,1.75242 _box 0.15,-0.15,-0.15 -3.65731,1.23,1.75242 _subtract 0.15,-0.15,-0.15  0,0,0 ";
    "_box -2.95142,0,1.47923 -2.90142,1.08,1.42923";
    "_box 0,0,0.36351 -0.05,1.08,0.31351";
    "_box -3.50731,0,1.39652 -3.10142,1.08,1.24652";
    "_box -3.10142,0,1.24652 -2.95142,1.08,1.75242"
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]
AC_SedTankB = [
    "_cylinder 0.54,1.54353,-0.28097 0.06429 0.00714"; "_union all "; "-group c laundercouplingcap y "; "all "; "-layer s 0"; "  "; "-layer f laundercouplingcap"; "  "; "-layer m launderorificecap"; "c t 0,255,0"
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]
AC_SedTankC =  # error
AC_FilterA = [
    "-layer m FiInletChannel"; "c t 214,214,214"; "FiInletChannel"; "  "; "_zoom w -0.01,-1.11376,1.24478 0.01,-0.80376,1.24478"; "_box -0.01,-0.95376,1.24478 0.81376,-0.85376,1.60068"; "_box 0,-1.10376,1.09478 0.80376,-0.70376,1.60068"; "_subtract 0,-1.10376,1.09478  -0.01,-0.95376,1.24478 "; "rotate3d l  z 0,-0.95376,1.24478 90"; "_box -0.25,-1.10376,1.09478 0.15,-0.95376,1.60068"
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]
AC_FilterB = [
    "_cylinder -3.13677,-0.24208,-1.61319 0.05715 c -3.13171,-0.24208,-1.61319";
    "_cylinder -3.14677,-0.24208,-1.61319 0.0525 c -3.12171,-0.24208,-1.61319";
    "_subtract -3.13677,-0.29923,-1.61319  -3.14677,-0.29458,-1.61319 ";
    "_union -3.07471,-0.30637,-1.61319 -3.19377,-0.30637,-1.61319 -3.13171,-0.29923,-1.61319 ";
    "_zoom w -3.26077,-0.31637,-1.34889 -3.00265,-0.16778,-1.47748";
    "_cylinder -3.13171,-0.24208,-1.41319 0.06429 c -3.07471,-0.24208,-1.41319";
    "_cylinder -3.19377,-0.24208,-1.41319 0.06429 c -3.13677,-0.24208,-1.41319";
    "_cylinder -3.13677,-0.24208,-1.41319 0.05715 c -3.13171,-0.24208,-1.41319";
    "_union -3.07471,-0.30637,-1.41319 -3.19377,-0.30637,-1.41319 -3.13171,-0.29923,-1.41319 ";
    "-group c DeleteMe y "
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]
AC_FilterC = [
    "_cylinder -1.84699,-0.85296,0.7683 0.0508 c -1.80099,-0.85296,0.7683";
    "_cylinder -1.85699,-0.85296,0.7683 0.04445 c -1.79099,-0.85296,0.7683";
    "_subtract -1.84699,-0.90376,0.7683  -1.85699,-0.89741,0.7683 ";
    "_cylinder -1.80099,-0.85296,0.7683 0.04445 c -1.79298,-0.85296,0.7683";
    "_cylinder -1.81099,-0.85296,0.7683 0.04077 c -1.78298,-0.85296,0.7683";
    "_subtract -1.80099,-0.89741,0.7683  -1.81099,-0.89372,0.7683 ";
    "_union -1.74698,-0.90376,0.7683 -1.84699,-0.90376,0.7683 -1.79298,-0.89741,0.7683 ";
    "rotate3d l  y -1.79298,-0.85296,0.7683 90";
    "_zoom w -0.56082,-0.34415,0.81263 -0.22332,-0.14,0.62848";
    "_cylinder -0.39207,-0.24208,0.72056 0.09207 c -0.33507,-0.24208,0.72056"
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]
AC_ChemTanksA =  # error
AC_ChemTanksB =  # error
AC_ChemTanksC =  # error
AC_DrainChannelA =  # error
AC_DrainChannelB =  # error
AC_DrainChannelC =  # error
# AC_LayoutA | AC_LayoutB | AC_LayoutC
