Q_Plant := 0.8*L/s
# [reference: ExpertInputs.xmcd]
# [reference: MathFunctions.xmcd]
# [reference: PipeDatabase.xmcd]
# [reference: MaterialsDatabase.xmcd]
# [reference: FluidsFunctions.xmcd]
# [reference: CdcFunctions.xmcd]
# [reference: SedimentationTankjem384.xmcd]
# [reference: Flocculator.xmcd]
# [reference: LFOM.xmcd]
# [reference: EntranceTank.xmcd]
# [reference: StackedRapidSandFilter.xmcd]
# [reference: LinearCdc.xmcd]
# [reference: ChemStorageTanks.xmcd]
# AutoCAD drawing programs:
# Translators:
# These are the codes that take MathCAD outputs and create AutoCAD scripts that are used to draw the plant (formerly Basics)
# [reference: MtoATranslators.xmcd]
# The wrapped MtoA translator contains the functions that the user will want to access. These functions will draw pieces with full functionality - specifying the location, dimension, and orientation of the object. Also, it contains layer control and subtraction capabilities for grouped objects.
# [reference: MtoATranslatorsWrapped.xmcd]
# Drawing functions:
# [reference: ChannelF.xmcd]
# [reference: PlumbingF.xmcd]
# [reference: TankF.xmcd]
# [reference: StairsF.xmcd]
# [reference: DrainChannelF.xmcd]
# AutoCAD Script Files:
# [reference: FlocculatorACLow.xmcd]
# [reference: SedimentationTankACLow_jem384.xmcd]
# [reference: EntranceTankACLow.xmcd]
# [reference: ChemStockTanksAC.xmcd]
# Low Flow Stacked Rapid Sand Filter
# Dimesions and Origins
L_FiBodyPipe := 6 ft
ND_FiBodyPipe := 12 in
S_FiInletMan := 40 cm
# Internal Manifold
L_FiManIntMain := 8.5 in
ND_FiManIntMain := 1 in
ND_FiManIntBranch := .5 in
L_FiManIntBranchSm := 4 in
L_FiManIntBranchLg := 5 in
S_FiManIntBranch := 3 in
L_FiManIntBranchStart := 1.75 in
B_FiManSlot := 1/8*in = 0.003175 m
L_FiManSlot := .5 in = 0.0127 m
W_FiManSlot := 2 mm = 0.002 m
FiPipe_Origin := [0 m; 0 m; 0 m]
FiIntManIn_Origin := [L_FiManIntBranchStart + S_FiManIntBranch; 0 m; 3 cm]
FiIntManOut_Origin := [L_FiManIntBranchStart + S_FiManIntBranch; 0 m; 23 cm]
N_FiManSlotsPerRowSm := floor((L_FiManIntBranchSm - B_FiManSlot)/(B_FiManSlot + W_FiManSlot)) = 19
N_FiManSlotsPerRowSm := floor((L_FiManIntBranchLg - B_FiManSlot)/(B_FiManSlot + W_FiManSlot))
LayerFiBody := layer_new("FiBodyPlu", blue3)
DrawFiBody := PipeF(FiPipe_Origin, L_FiBodyPipe, [0; 90]*deg, ND_FiBodyPipe, PS_FiBranch)
FreezeFiBody := FreezeLayer("FiBodyPlu")
FiBodyPipe := stack(LayerFiBody, DrawFiBody, FreezeFiBody)
# Manifold Branches
# Piping
LayerMan := layer_new("FiManIntPlu", blue3)
FiManIntMain :=
    Script ← LayerMan
    for i ∈ 0 .. 2
        PipeOut ← PipeF(FiIntManOut_Origin + [0 m; 0 m; i*S_FiInletMan], L_FiManIntMain, [0; 0]*deg, ND_FiManIntMain, PS_FiBranch)
        Mirror ← Mirror3dLast("yz", [FiPipe_Origin[0]; FiPipe_Origin[1]], "n")
        Move ← MoveLast(FiIntManOut_Origin, FiIntManOut_Origin - [0 m; 0 m; S_FiInletMan/2])
        Script ← stack(Script, PipeOut, Mirror, Move)
    return Script
FreezeFiManLayer := FreezeLayer("FiManIntPlu")
FiIntManOut_Origin + [-L_FiManIntBranchStart; innerR(ND_FiManIntBranch, PS_Default); S_FiInletMan] = [0.0762; 0; 0.63] m
LayerBranch := layer_new("FiManBranchPlu", blue3)
innerR(ND_FiManIntBranch, PS_FiBranch) = 0.0078994 m
innerdiameter(ND_FiManIntBranch, PS_FiBranch) = 0.0157988 m
FreezeFiBranchLayer := FreezeLayer("FiManBranchPlu")
ND_FiManIntBranch = 0.0127 m
FiManIntSmBranch :=
    Script ← LayerBranch
    for i ∈ 0 .. 2
        PipeOut1 ← PipeF(FiIntManOut_Origin + [-L_FiManIntBranchStart; -innerdiameter(ND_FiManIntMain, PS_FiBranch)/2; i*S_FiInletMan], L_FiManIntBranchSm, [90; 0]*deg, ND_FiManIntBranch, PS_FiBranch)
        MirrorOut1 ← MirrorLast([FiIntManOut_Origin[0]; FiIntManOut_Origin[1]], [FiIntManOut_Origin[0] + zc; FiIntManOut_Origin[1]], "n")
        Slots ← BoxF(FiIntManOut_Origin + [
            -L_FiManIntBranchStart - outerradius(ND_FiManBranch);
            B_FiManSlot/2 + outerdiameter(ND_FiManIntMain)/2;
            outerradius(ND_FiBwManBranch) + zc + i*S_FiInletMan
        ], FiIntManOut_Origin + [
            -L_FiManIntBranchStart + outerradius(ND_FiManBranch);
            (B_FiManSlot/2 + W_FiManSlots) + outerdiameter(ND_FiManIntMain)/2;
            i*S_FiInletMan
        ], [0; 0; 0]*deg)
        ArraySlots ← ArrayLast(N_FiManSlotsPerRowSm, 1, B_FiManSlot)
        PipeOut2 ← PipeF(FiIntManOut_Origin + [
            -L_FiManIntBranchStart - 2*S_FiManIntBranch;
            -innerdiameter(ND_FiManIntMain, PS_FiBranch)/2;
            i*S_FiInletMan
        ], L_FiManIntBranchSm, [90; 0]*deg, ND_FiManIntBranch, PS_FiBranch)
        MirrorOut2 ← MirrorLast([FiIntManOut_Origin[0]; FiIntManOut_Origin[1]], [FiIntManOut_Origin[0] + zc; FiIntManOut_Origin[1]], "n")
        PipeIn1 ← PipeF(FiIntManIn_Origin + [-L_FiManIntBranchStart; -innerdiameter(ND_FiManIntMain, PS_FiBranch)/2; i*S_FiInletMan], L_FiManIntBranchSm, [90; 0]*deg, ND_FiManIntBranch, PS_FiBranch)
        MirrorIn1 ← MirrorLast([FiIntManOut_Origin[0]; FiIntManOut_Origin[1]], [FiIntManOut_Origin[0] + zc; FiIntManOut_Origin[1]], "n")
        PipeIn2 ← PipeF(FiIntManIn_Origin + [
            -L_FiManIntBranchStart - 2*S_FiManIntBranch;
            -innerdiameter(ND_FiManIntMain, PS_FiBranch)/2;
            i*S_FiInletMan
        ], L_FiManIntBranchSm, [90; 0]*deg, ND_FiManIntBranch, PS_FiBranch)
        MirrorIn2 ← MirrorLast([FiIntManOut_Origin[0]; FiIntManOut_Origin[1]], [FiIntManOut_Origin[0] + zc; FiIntManOut_Origin[1]], "n")
        Script ← stack(Script, PipeOut1, MirrorOut1, Slots, ArraySlots, PipeOut2, MirrorOut2, PipeIn1, MirrorIn1, PipeIn2, MirrorIn2)
    return Script
Subtract ← SubtractF(["FiManBranchPlu"], "DeleteMe")
FiManIntLgBranch :=
    Script ← LayerMan
    for i ∈ 0 .. 2
        PipeOut ← PipeF(FiIntManOut_Origin + [-L_FiManIntBranchStart - S_FiManIntBranch; 0 m; i*S_FiInletMan], L_FiManIntBranchLg, [90; 0]*deg, ND_FiManIntBranch, PS_FiBranch)
        MirrorOut ← MirrorLast([0 m; 0 m], [zc; 0 m], "n")
        PipeIn ← PipeF(FiIntManIn_Origin + [-L_FiManIntBranchStart - S_FiManIntBranch; 0 m; i*S_FiInletMan], L_FiManIntBranchLg, [90; 0]*deg, ND_FiManIntBranch, PS_FiBranch)
        MirrorIn ← MirrorLast([0 m; 0 m], [zc; 0 m], "n")
        Script ← stack(Script, PipeOut, MirrorOut, PipeIn, MirrorIn)
    return Script
# Fittings
FiFittingLayer := layer_new("FiFittingPlu", green)
FiManBranchCoupling := CouplingSUBF(FiIntManOut_Origin, [180; 0; 0]*deg, ND_FiManIntMain, PS_Default, ["FiPipePlu"])
FiManBranchCoupling :=
    Script ← FiFittingLayer
    for i ∈ 0 .. 2
        CoupOut ← CouplingSUBF(FiIntManOut_Origin + [0 m; 0 m; i*S_FiInletMan], [180; 0; 0]*deg, ND_FiManIntMain, PS_Default, ["FiPipePlu"])
        Mirror ← Mirror3dLast("yz", [FiPipe_Origin[0]; FiPipe_Origin[1]], "n")
        Move ← MoveLast(FiIntManOut_Origin, FiIntManOut_Origin - [0 m; 0 m; S_FiInletMan/2])
        Script ← stack(Script, CoupOut, Mirror, Move)
    return Script
FreezeFittingLayer := FreezeLayer("FiFittingPlu")
FiManInt := stack(FiManIntMain, FreezeFiManLayer, FiManIntSmBranch, FiManIntLgBranch, FreezeFiBranchLayer, FiManBranchCoupling, FreezeFittingLayer)
# [component: inputs stack(FiBodyPipe, FiManInt)]
FiManBranchSlot := BoxF(FiIntManOut_Origin + [outerradius(ND_FiManBranch); B_FiManSlot/2; outerradius(ND_FiBwManBranch)], FiIntManOut_Origin + [-outerradius(ND_FiManBranch); B_FiManSlot/2 + W_FiManSlots; outerradius(ND_FiBwManBranch)], [0; 0; 0]*deg)
MirrorFiManBranchSlot := MirrorLast([FiIntManOut_Origin[1] + 0 m; FiIntManOut_Origin[2] + outerradius(ND_FiBwManBranch)], [FiIntManOut_Origin[1] + zc; FiIntManOut_Origin[2] + outerradius(ND_FiBwManBranch)], "N")
ArrayFiManBranchSlot := array_all(N_FiManSlotsPerRow, 1, B_FiManSlot)
SubtractFiManSlots := SubtractF(["FiManBranchPlu"], "DeleteMe")
SelectFiManBranch := SelectLayer("FiManBranchPlu")
ArrayFiMan := array_all(N_FiLayer, 1, H_FiLayer)
# Do not stack unless you are drawing only the slotted pipes. The slots make the 3D model unmanagable.
FiBranchScriptSlots := stack(LayerMan, FiManBranch, FreezeFiManLayer, FiManBranchSlot, view("r"), MirrorFiManBranchSlot, view("t"), ArrayFiManBranchSlot, GroupDelete, SubtractFiManSlots, SelectFiManBranch, BrepAll, view("f"), ArrayFiMan, view("t"))
FiBranchScript := stack(LayerMan, FiManBranch, view("f"), ArrayFiMan, view("t"))
BwManBranch := PipeF(Fi_origin + [
    -L_FiManFerncoCoupling - B_FiManifoldBranch/2;
    S_FiManAssembly + ConRadius(ND_FiBwBranchHolder) + outerradius(ND_FiBwBranchHolder) - L_FiManBranchExt;
    outerradius(ND_FiBwManBranch)
], L_FiBwManBranch, [-90; 0]*deg, ND_FiBwManBranch, PS_FiBranch)
FiBwManBranchSlot := BoxF(Fi_origin + [
    -L_FiManFerncoCoupling - B_FiManifoldBranch/2 - outerradius(ND_FiBwManBranch);
    S_FiManAssembly + ConRadius(ND_FiBwBranchHolder) + outerradius(ND_FiBwBranchHolder) + B_FiBwManSlot/2;
    outerradius(ND_FiBwManBranch) + H_FiBwManCenterToSlot
], Fi_origin + [
    -L_FiManFerncoCoupling - B_FiManifoldBranch/2 + outerradius(ND_FiBwManBranch);
    S_FiManAssembly + ConRadius(ND_FiBwBranchHolder) + outerradius(ND_FiBwBranchHolder) + B_FiBwManSlot/2 + W_FiManSlots;
    outerdiameter(ND_FiBwManBranch)
], [0; 0; 0]*deg)
ArrayFiBwManBranchSlot := ArrayLast(N_FiBwManSlotsPerRow, 1, B_FiBwManSlot)
MirrorFiManBranches := Mirror3dAll("zx", [Fi_origin[0]; Fi_origin[1] + W_Fi/2], "n")
ArrayManBranches := array_all(1, N_FiManBranch/2, -B_FiManifoldBranch)
# Do not stack unless you are drawing only the slotted pipes. The slots make the 3D model unmanagable.
FiBwBranchScriptSlots := stack(BwManBranch, FreezeFiManLayer, FiBwManBranchSlot, ArrayFiBwManBranchSlot, GroupDelete, SubtractFiManSlots, SelectFiManBranch, BrepAll, ArrayManBranches, MirrorFiManBranches, FreezeFiManLayer)
FiBwBranchScript := stack(BwManBranch, ArrayManBranches, MirrorFiManBranches, FreezeFiManLayer)
FiManBranchScript := stack(FiBranchScript, FiBwBranchScript)
FiManifoldScript := stack(FiManWallScript, FiTrunkReceiverScript, FiManBranchScript)
