# Operator Access
# Main Floor
Floor_Origin :=
    [Plant_Origin[0] + T_PlantWall; Plant_Origin[1] - T_PlantWall; Z_Walkway - T_Floor] if EN_DoubleTrain == 0
    otherwise
        [
            Et_Origin[0] + T_PlantWall + (Et_Origin[0] - Plant_Origin[0]);
            (Et_Origin[1] + W_Et + T_PlantWall) + W_DCWalkway + W_EtWalkway;
            Z_Walkway - T_Floor
        ]
Floor_Dim :=
    if EN_DoubleTrain == 0
        [
            -(Plant_Origin[0] + T_PlantWall - (Fi_origin[0] - L_Fi - T_FiWall));
            N_SedTanks*(N_SedBays*W_SedBay + T_SedWallDivider) + T_PlantWall - T_SedWallDivider + N_FlocChannels*(W_FlocChannel + T_FlocChannelWall) + 2*T_PlantWall - T_FlocChannelWall + W_EtWalkway + W_Et + 2*T_PlantWall;
            T_Floor
        ]
    otherwise
        [
            max(T_PlantWall + (Et_Origin[0] - Plant_Origin[0]) + (L_Et + 2*W_DCWalkway - T_ChannelWall + T_ConcreteMin + L_ChemStairs + W_EtChemPlatform), 3*T_PlantWall + (Et_Origin[0] - Plant_Origin[0]) + 2*L_Floc + 2*W_DCWalkway);
            N_SedTanks*(N_SedBays*W_SedBay + T_SedWallDivider) + 5*T_PlantWall - T_SedWallDivider + N_FlocChannels*(W_FlocChannel + T_FlocChannelWall) - T_FlocChannelWall + 3*W_EtWalkway + W_Et + W_Fi + T_FiWall;
            T_Floor
        ]
SedDrainBoxes_Dimensions := [
    -(L_SedSludgeValvePipe - 2*SocketDepth(ND_SedSludgePipe) + 2*MaleAdapterLength(ND_SedSludgePipe) + ValveLength(ND_SedSludgePipe) - ValveSocket(ND_SedSludgePipe));
    2*ND_SedSludgePipe;
    T_Floor
]
FlocDrainBoxes_Dimensions := [
    -(2*MaleAdapterLength(ND_FlocValve) + ValveLength(ND_FlocValve) - ValveSocket(ND_FlocValve));
    2*ND_FlocValve;
    T_Floor
]
OpAccessLayer := layer_new("OpWalkwayCon", grey)
# Draw the Floor
FloorBox := BoxF(Floor_Origin, {
    (Floor_Origin + Floor_Dim) if EN_DoubleTrain == 0
    [Floor_Origin[0] - Floor_Dim[0]; Floor_Origin[1] - Floor_Dim[1]; Floor_Origin[2] + Floor_Dim[2]] otherwise
}, [0; 0; 0]*deg)
ChemPlatformExtension := BoxF(Floor_Origin, [Floor_Origin[0] - Floor_Dim[0]; Floor_Origin[1] - Floor_Dim[1]; Floor_Origin[2] + Floor_Dim[2]], [0; 0; 0]*deg)
ChemDrainSubBox := BoxF([
    ChemPlatformWall_Origin[0] + T_PlantWall;
    CoagTank_Origin[1] + R_CoagTank + T_ChemTankWall + S_ChemTankBorder - 0.5*W_EtChemPlatform - L_PlatformDrainHole;
    ChemPlatformWall_Origin[2] - T_Floor
], [
    ChemPlatformWall_Origin[0] + T_PlantWall + W_PlatformHole + zc;
    CoagTank_Origin[1] + R_CoagTank + T_ChemTankWall + S_ChemTankBorder - 0.5*W_EtChemPlatform + L_PlatformDrainHole;
    ChemPlatformWall_Origin[2]
], [0; 0; 0]*deg)
# Subtract the Sed Tanks
SedSubBox_Origin := Plant_Origin + [T_PlantWall; -T_PlantWall; H_Sed - H_WalkwayToTankWall - T_Floor - zc]
SedSubBox_Dim := [
    -2*T_PlantWall - L_Sed;
    N_SedTanks*(N_SedBays*W_SedBay + T_SedWallDivider) - T_SedWallDivider + 2*T_PlantWall;
    T_Floor + 2*zc
]
SedSubBox := BoxF(SedSubBox_Origin, SedSubBox_Origin + SedSubBox_Dim, [0; 0; 0]*deg)
MirrorSedBox := Mirror3dLast("yz", [Floc_Origin[0] - L_Floc - W_PlantDC/2 - T_PlantWall; 0 m], "n")
# Subtract the Flocculator
FlocSubBox_Origin := [
    Floc_Origin[0] + T_PlantWall;
    Floc_Origin[1] - T_PlantWall;
    H_Sed - H_WalkwayToTankWall - T_Floor - zc
]
FlocSubBox_Dim := [
    -2*T_PlantWall - L_Sed;
    N_FlocChannels*(T_FlocChannelWall + W_FlocChannel) + 2*T_PlantWall - T_FlocChannelWall;
    T_Floor + zc
]
FlocSubBox := BoxF(FlocSubBox_Origin, FlocSubBox_Origin + FlocSubBox_Dim, [0; 0; 0]*deg)
MirrorFlocBox := Mirror3dAll("yz", [Floc_Origin[0] - L_Floc - W_PlantDC/2 - T_PlantWall; 0 m], "n")
# Subtract Entrance Tank
EtSubBox_Origin := [
    Et_Origin[0] + T_PlantWall;
    Et_Origin[1] - T_PlantWall;
    Plant_Origin[2] + H_Sed - H_WalkwayToTankWall - T_Floor - zc
]
EtSubBox_Dim := [-2*T_PlantWall - L_Et; 2*T_PlantWall + W_Et; T_Floor + zc]
EtSubBox := BoxF(EtSubBox_Origin, EtSubBox_Origin + EtSubBox_Dim, [0; 0; 0]*deg)
EtSubFlowControl := BoxF([
    EtFlowControlVertPipe_Origin[0] + ConRadius(ND_EtFlowControl);
    EtFlowControlVertPipe_Origin[1] + (-3*ConRadius(ND_EtFlowControl));
    Z_Walkway - T_Floor
], [
    EtFlowControlVertPipe_Origin[0] - ElbowRadius(ND_EtFlowControl);
    EtFlowControlVertPipe_Origin[1] - ConRadius(ND_EtFlowControl);
    Z_Walkway
], [0; 0; 0]*deg)
# y coordinate of box changed by mrf222 10/16/2014
# Subtract the Filters
RMAirReleaseCylinder := CylinderF([
    RMElbow_Origin[0];
    Floc_Origin[1] + (N_FlocChannels*(W_FlocChannel + T_FlocChannelWall)) + T_PlantWall - T_FlocChannelWall + S_Fitting;
    Z_Walkway - T_Floor
], 1.2*ConRadius(ND_RMAirRelease), T_Floor, [0; 90]*deg)
FilterSubBox_Origin := [Fi_origin[0] + T_FiWall; Fi_origin[1] + W_Fi + T_FiWall; Z_Walkway - T_Floor]
FilterSubBox_Dim := [-2*T_FiWall - L_Fi; -T_FiWall - N_Fi*(W_Fi + T_FiWall); T_Floor]
FilterSubBox := BoxF(FilterSubBox_Origin, FilterSubBox_Origin + FilterSubBox_Dim, [0; 0; 0]*deg)
FiSiphonSubBox_Origin := [Fi_origin[0] + T_FiWall; Fi_origin[1]; Z_Walkway - T_Floor]
FiSiphonSubBox_Dim := [
    ShortTeeLength(ND_FiSiphon) + ConRadius(ND_FiSiphon) + S_Fitting;
    2*S_Fitting + OuterDiameterFittingPVC(ND_FiSiphon);
    T_Floor
]
FiSiphonSubBox := BoxF(FiSiphonSubBox_Origin, FiSiphonSubBox_Origin + FiSiphonSubBox_Dim, [0; 0; 0]*deg)
ArrayFiSiphonSubBox := ArrayLast(N_Fi, 1, -W_Fi - T_FiWall)
FiInletChannelSubBox_Origin := [
    FiInletChannel_Origin[0] + T_PlantWall;
    FiInletChannel_Origin[1] - T_PlantWall;
    Z_Walkway - T_Floor
]
FiInletChannelSubBox_Dim := [-T_PlantWall - W_FiInletChannel; 2*T_PlantWall + L_FiInletChannel; T_Floor]
FiInletChannelSubBox := BoxF(FiInletChannelSubBox_Origin, FiInletChannelSubBox_Origin + FiInletChannelSubBox_Dim, [0; 0; 0]*deg)
FiAuxSubBox_Origin := [
    FiEntranceBox_origin[0] + T_PlantWall;
    FiEntranceBox_origin[1] + W_FiEntrance + T_ChannelWall;
    Z_Walkway - T_Floor
]
FiAuxSubBox_Dim := [
    -2*T_PlantWall - L_FiEntrance - L_FiExit - T_ChannelWall;
    -2*T_PlantWall - N_Fi*(W_FiEntrance + T_ChannelWall) - ((N_Fi - (N_Fi > 1))*(W_FiOverflow + T_ChannelWall)) + T_ChannelWall;
    T_Floor
]
FiAuxSubBox := BoxF(FiAuxSubBox_Origin, FiAuxSubBox_Origin + FiAuxSubBox_Dim, [0; 0; 0]*deg)
FiSouthSubBox_Origin := [Fi_origin[0] - L_Fi - T_FiWall; Plant_Origin[1] - T_PlantWall; Z_Walkway - T_Floor]
FiSouthSubBox_FarCorner := [
    FiInletChannel_Origin[0] + T_PlantWall;
    FiEntranceBox_origin[1] + (-2*T_PlantWall) - (N_Fi - 1)*(W_FiEntrance + T_ChannelWall) - ((N_Fi - (N_Fi > 1))*(W_FiOverflow + T_ChannelWall)) + T_ChannelWall;
    Z_Walkway + zc
]
FiSouthSubBox := BoxF(FiSouthSubBox_Origin, FiSouthSubBox_FarCorner, [0; 0; 0]*deg)
MirrorFilterBox := Mirror3dLast("yz", [Floc_Origin[0] - L_Floc - W_PlantDC/2 - T_PlantWall; 0 m], "n")
# Subtract Box for the Cdc
DosingSubBox_Dim := [-L_CdcLever - S_Fitting; S_EtFloat/2 + ConRadius(ND_EtFloat) + 2*S_Fitting; T_Floor + zc]
DosingSubBox_Origin :=
    if EN_DoubleTrain == 0
        [
            Et_Origin[0] - L_Et - T_PlantWall;
            Et_Origin[1] - S_Fitting;
            Plant_Origin[2] + H_Sed - H_WalkwayToTankWall - T_Floor - zc
        ]
    otherwise
        [
            Et_Origin[0] - L_Et - T_PlantWall - (W_DCWalkway + 3*T_PlantWall + L_LfomChannel - T_ChannelWall + T_ConcreteMin);
            Et_Origin[1] - .5*S_Fitting + 1.5*W_LfomChannel;
            Plant_Origin[2] + H_Sed - H_WalkwayToTankWall - T_Floor - zc
        ]
DosingSubBox := BoxF(DosingSubBox_Origin, DosingSubBox_Origin + DosingSubBox_Dim, [0; 0; 0]*deg)
DrainBoxes :=
    SedDrainBox ← BoxF([
        Plant_Origin[0] - L_Sed - T_PlantWall;
        Plant_Origin[1] + W_SedBay - 0.5*W_SedBay - ND_SedSludgePipe;
        Floor_Origin[2]
    ], [
        Plant_Origin[0] - L_Sed - T_PlantWall;
        Plant_Origin[1] + W_SedBay - 0.5*W_SedBay - ND_SedSludgePipe;
        Floor_Origin[2]
    ] + SedDrainBoxes_Dimensions, [0; 0; 0]*deg)
    SedBoxArrayBay ← ArrayLast(N_SedBays, 1, W_SedBay)
    SedBoxArrayTank ← array_all(N_SedTanks, 1, W_SedBay*N_SedBays + T_SedWallDivider)
    SedDrains ←
        SedDrainBox if N_SedBays == 1 and N_SedTanks == 1
        stack(SedDrainBox, SedBoxArrayBay) if N_SedBays > 1 and N_SedTanks == 1
        stack(SedDrainBox, SedBoxArrayTank) if N_SedBays == 1 and N_SedTanks > 1
        stack(SedDrainBox, SedBoxArrayBay, SedBoxArrayTank) otherwise
    FlocDrainBox ← BoxF([Plant_Origin[0] - L_Sed - T_PlantWall; Y_FlocDrainValves[0] - ND_FlocValve; Floor_Origin[2]], [Plant_Origin[0] - L_Sed - T_PlantWall; Y_FlocDrainValves[0] - ND_FlocValve; Floor_Origin[2]] + FlocDrainBoxes_Dimensions, [0; 0; 0]*deg)
    FlocBoxArray ← ArrayLast(last(Y_FlocDrainValves) + 1, 1, 2*(W_FlocChannel + T_FlocChannelWall))
    FlocDrains ←
        FlocDrainBox if last(Y_FlocDrainValves) == 0
        stack(FlocDrainBox, FlocBoxArray) otherwise
    return stack(SedDrains, FlocDrains)
SubtractBoxes := SubtractF(["OpWalkwayCon"], "DeleteMe")
# Drain Boxes for both Flocculator and Sed Tank
DrainBoxesLayer := layer_new("DrainBoxesCon", grey)
SedDrainBoxes_Dimensions := [
    -(L_SedSludgeValvePipe - 2*SocketDepth(ND_SedSludgePipe) + 2*MaleAdapterLength(ND_SedSludgePipe) + ValveLength(ND_SedSludgePipe) - ValveSocket(ND_SedSludgePipe));
    2*ND_SedSludgePipe;
    T_Floor
]
FlocDrainBoxes_Dimensions := [
    -(2*MaleAdapterLength(ND_FlocValve) + ValveLength(ND_FlocValve) - ValveSocket(ND_FlocValve));
    2*ND_FlocValve;
    T_Floor
]
MirrorDrains := Mirror3dAll("yz", [Floc_Origin[0] - L_Floc - W_PlantDC/2 - T_PlantWall; 0 m], "n")
SubtractDrains := SubtractF(["OpWalkwayCon"], "DrainBoxesCon")
PlantFloorScript :=
    stack(OpAccessLayer, FloorBox, FreezeLayer("OpWalkwayCon"), ChemDrainSubBox, SedSubBox, FlocSubBox, EtSubBox, EtSubFlowControl, RMAirReleaseCylinder, FilterSubBox, FiSiphonSubBox, ArrayFiSiphonSubBox, FiAuxSubBox, FiInletChannelSubBox, FiSouthSubBox, DosingSubBox, GroupDelete, SubtractBoxes, DrainBoxes, GroupDelete, SubtractBoxes) if EN_DoubleTrain == 0
    stack(OpAccessLayer, FloorBox, FreezeLayer("OpWalkwayCon"), ChemDrainSubBox, SedSubBox, MirrorSedBox, FlocSubBox, MirrorFlocBox, EtSubBox, EtSubFlowControl, FiSouthSubBox, MirrorFilterBox, FilterSubBox, GroupDelete, SubtractBoxes, FreezeLayer("OpWalkwayCon"), DrainBoxes, MirrorDrains, GroupDelete, SubtractBoxes) otherwise
AC_OperatorAccess := PlantFloorScript
