# Origin Points
# This can be removed when added to MP
GroupDelete := GroupAll("DeleteMe")
# Entrance Exit Filter
FiEntranceBox_origin := [
    Plant_Origin[0] - W_FiInletChannel - T_PlantWall;
    min(Plant_Origin[1] - T_FiWall - W_Fi, Plant_Origin[1] - 2*T_PlantWall - W_FiEntrance - W_FiOverflow/2 + T_FiWall/2) - T_FiWall/2 + W_FiOverflow/2 + T_PlantWall;
    Z_FiEntranceBottom
]
Fi_origin := [
    Plant_Origin[0] - W_FiInletChannel - 3*T_PlantWall - T_FiWall - L_FiEntrance - L_FiExit - W_MpWalkway;
    FiEntranceBox_origin[1] + W_FiEntrance - W_Fi;
    Z_FiBottom
]
FiExitBox_origin := [
    Plant_Origin[0] - W_FiInletChannel - 2*T_PlantWall - L_FiEntrance;
    FiEntranceBox_origin[1];
    Z_FiExitBottom
]
# Manifolds
FiManTee_Origin := Fi_origin + [
    -3/2*B_FiManifoldBranch;
    ConRadius(ND_FiManBranch) + ShortTeeLength(ND_FiManBranch);
    H_FiLayer + ConRadius(ND_FiBwManBranch)
]
BwManTee_Origin := Fi_origin + [
    -3/2*B_FiManifoldBranch;
    ConRadius(ND_FiBwManBranch) + ShortTeeLength(ND_FiBwManBranch);
    ConRadius(ND_FiBwManBranch)
]
# Couplings
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# This will be the pipe layout in the entrance and exit boxes to allow for 2 90 degree elbows in  Pipes 2 and 3 coming from the entrance box (on the right)
FiInletCoupling1_origin := [
    FiEntranceBox_origin[0] - L_FiEntrance + T_ConcreteMin + ConRadius(ND_FiTrunk);
    FiEntranceBox_origin[1] + W_FiEntrance - ConRadius(ND_FiBwTrunk);
    FiEntranceBox_origin[2] - CouplingLength(ND_FiTrunk) + SocketDepth(ND_FiTrunk)
]
FiBwInletCoupling_origin := [
    FiInletCoupling1_origin[0] + L_FiOverflowWeir - S_Fitting - 2*ConRadius(ND_FiBwTrunk);
    FiInletCoupling1_origin[1];
    FiEntranceBox_origin[2] - CouplingLength(ND_FiBwTrunk) + SocketDepth(ND_FiBwTrunk)
]
FiInletCoupling2_origin := [
    FiEntranceBox_origin[0] - L_FiEntrance + L_FiOverflowWeir - (ConRadius(ND_FiTrunk) + S_Fitting);
    FiEntranceBox_origin[1] + 2*T_ConcreteMin + 3*ConRadius(ND_FiTrunk);
    FiInletCoupling1_origin[2]
]
FiInletCoupling3_origin := [
    FiEntranceBox_origin[0] - L_FiEntrance + T_ConcreteMin + ConRadius(ND_FiTrunk);
    FiEntranceBox_origin[1] + 2*T_ConcreteMin + 3*ConRadius(ND_FiTrunk);
    FiEntranceBox_origin[2] - CouplingLength(ND_FiTrunk) + SocketDepth(ND_FiTrunk)
]
FiExitCoupling0_origin := [
    FiExitBox_origin[0] - T_ConcreteMin - ConRadius(ND_FiTrunk);
    FiExitBox_origin[1] + W_FiExit - ConRadius(ND_FiBwTrunk);
    FiExitBox_origin[2] - CouplingLength(ND_FiTrunk) + SocketDepth(ND_FiTrunk)
]
FiExitCoupling1_origin := [
    (FiExitBox_origin[0] - L_FiExit + T_ConcreteMin) + ConRadius(ND_FiTrunk);
    FiExitBox_origin[1] + W_FiExit - ConRadius(ND_FiBwTrunk);
    FiExitBox_origin[2] - CouplingLength(ND_FiTrunk) + SocketDepth(ND_FiTrunk)
]
FiExitCoupling3_origin := [
    FiExitBox_origin[0] - T_ConcreteMin - ConRadius(ND_FiTrunk);
    FiExitBox_origin[1] + T_ConcreteMin + ConRadius(ND_FiTrunk);
    FiExitBox_origin[2] - CouplingLength(ND_FiExitWaste) + SocketDepth(ND_FiExitWaste)
]
FiExitCoupling2_origin := [
    (FiExitBox_origin[0] - L_FiExit + T_ConcreteMin) + ConRadius(ND_FiExitWaste);
    FiExitBox_origin[1] + T_ConcreteMin + ConRadius(ND_FiExitWaste);
    FiExitBox_origin[2] - CouplingLength(ND_FiTrunk) + SocketDepth(ND_FiTrunk)
]
FiTankBwCoupling_origin := [
    Fi_origin[0] + CouplingLength(ND_FiBwTrunk) - SocketDepth(ND_FiBwTrunk);
    FiBwInletCoupling_origin[1];
    Fi_origin[2] + ConRadius(ND_FiBwManBranch)
]
FiTankCouplings_origin := [
    Fi_origin[0] + CouplingLength(ND_FiTrunk) - SocketDepth(ND_FiTrunk);
    FiTankBwCoupling_origin[1];
    FiTankBwCoupling_origin[2] + H_FiLayer
]
L_FiInletChannel :=
    W_FiEntrance if N_Fi == 1
    (2*(FiEntranceBox_origin[1] - min(Fi_origin[1] - T_FiWall/2, FiEntranceBox_origin[1] - T_PlantWall - W_FiOverflow/2) + W_FiEntrance)) if N_Fi == 2
    (max(2*(Fi_origin[1] - min(Fi_origin[1] - T_FiWall/2, FiEntranceBox_origin[1] - T_PlantWall - W_FiOverflow/2) + W_Fi) + 1.5*T_FiWall, 2*(FiEntranceBox_origin[1] - min(Fi_origin[1] - T_FiWall/2, FiEntranceBox_origin[1] - T_PlantWall - W_FiOverflow/2) + W_FiEntrance) + 1.5*T_PlantWall) + W_FiOverflow + 2*(W_FiEntrance + T_PlantWall)) otherwise
FiChannelCoupling_Origin :=
    if L_FiInletChannel ≥ Et_Origin[1] - T_PlantWall - W_EtWalkway - SedOutletCoupling_Origin[1] - ConRadius(ND_FiEntrancePipe) - S_Fitting
        [
            Plant_Origin[0] + CouplingLength(ND_FiEntrancePipe) - SocketDepth(ND_FiEntrancePipe);
            SedOutletCoupling_Origin[1] - (Et_Origin[1] - W_Fi - T_PlantWall - W_EtWalkway - T_FiWall - Fi_origin[1]);
            SedOutletElbow1_Origin[2] - ElbowRadius(ND_FiEntrancePipe)
        ]
    otherwise
        [
            Plant_Origin[0] - ConRadius(ND_FiEntrancePipe) - S_Fitting;
            -SocketDepth(ND_FiEntrancePipe) + FiEntranceBox_origin[1] + W_FiEntrance - L_FiInletChannel;
            SedOutletElbow1_Origin[2] - ElbowRadius(ND_FiEntrancePipe)
        ]
# Weirs
FiEntranceWeir_origin := [FiEntranceBox_origin[0] + T_PlantWall; FiEntranceBox_origin[1]; Z_FiEntranceWeir]
# Dimension Points
FiEntranceBox_dim := [L_FiEntrance; W_FiEntrance; H_FiEntrance]
FiExitBox_dim := [L_FiExit; W_FiExit; H_FiExit]
Fi_dim := [L_Fi; W_Fi; H_Fi]
FiEntranceWeir_dim := [-T_PlantWall; W_FiEntrance; ZW_FiInletChannel + zc - Z_FiEntranceWeir + H_PlantFreeboard]
# Script Variables
# Inlet Channel
LayerFiInletChannel := layer_new("FiInletchannelCon", ltgrey)
# The H.Sed-Z.SedWeirExit term can come out once we are not setting the top of the filter at Z=0
FiInletChannel := Tank([Plant_Origin[0]; FiEntranceBox_origin[1] + W_FiEntrance - L_FiInletChannel; Z_FiInletChannelBottom], [W_FiInletChannel; L_FiInletChannel; H_FiInletChannel], T_ChannelWall)
FreezeFiInletChannel := FreezeLayer("FiInletchannelCon")
FiEntWeir :=
    BoxF(FiEntranceWeir_origin, FiEntranceWeir_origin + FiEntranceWeir_dim, [0; 0; 0]*deg)
    stack(BoxF(FiEntranceWeir_origin, FiEntranceWeir_origin + FiEntranceWeir_dim, [0; 0; 0]*deg), ArrayLast(2, 1, -(FiEntranceWeir_dim[1] + 2*T_PlantWall + W_FiOverflow)))
MirrorWeirs := Mirror3dAll("zx", [0 m; min(Fi_origin[1] - T_FiWall/2, FiEntranceBox_origin[1] - T_PlantWall - W_FiOverflow/2)], "n")
ArrayFiWeirs := array_all(N_Fi/2, 1, -max((W_Fi + T_FiWall)*2, 2*W_FiEntrance + W_FiOverflow + 3*T_PlantWall))
SubtractEntWeir := SubtractF(["FiInletchannelCon"], "DeleteMe")
FiInletChannelScript :=
    stack(LayerFiInletChannel, FiInletChannel, FreezeFiInletChannel, FiEntWeir, GroupDelete, SubtractEntWeir) if N_Fi == 1
    stack(LayerFiInletChannel, FiInletChannel, FreezeFiInletChannel, FiEntWeir, MirrorWeirs, GroupDelete, SubtractEntWeir) if N_Fi == 2
    stack(LayerFiInletChannel, FiInletChannel, FreezeFiInletChannel, FiEntWeir, MirrorWeirs, ArrayFiWeirs, GroupDelete, SubtractEntWeir) otherwise
# Filter Auxilary Script
# (BW Box, BW Overflow, Distribution Box, Overflow Box)
# Tanks
LayerFiOverflow := layer_new("FiOverflowCon", ltgrey)
FiOverflowTank := Tank([
    FiEntranceBox_origin[0];
    min(Fi_origin[1] - T_FiWall/2, FiEntranceBox_origin[1] - T_PlantWall - W_FiOverflow/2) - W_FiOverflow/2;
    Z_FiOverflowBottom
], [L_FiOverflow; W_FiOverflow; H_FiOverflow], T_PlantWall)
FiDistTank := Tank([
    FiExitBox_origin[0];
    min(Fi_origin[1] - T_FiWall/2, FiEntranceBox_origin[1] - T_PlantWall - W_FiOverflow/2) - W_FiOverflow/2;
    Z_FiOverflowBottom
], [L_FiExit; W_FiOverflow; H_FiExit], T_PlantWall)
LayerFiOverflowFreeze := FreezeLayer("FiOverflowCon")
FiOverflowWeir := BoxF([
    FiEntranceBox_origin[0] - L_FiEntrance;
    FiEntranceBox_origin[1] - 2*T_PlantWall - zc;
    Z_FiOverflowWeir
], [
    FiEntranceBox_origin[0] - L_FiEntrance + L_FiOverflowWeir;
    FiEntranceBox_origin[1] + zc;
    Z_FiEntranceBottom + H_FiEntrance + zc + H_PlantFreeboard
], [0; 0; 0]*deg)
FiDistWeir := BoxF([FiExitBox_origin[0]; FiEntranceBox_origin[1] - 2*T_PlantWall - zc; Z_FiExitWeir], [
    FiExitBox_origin[0] - L_FiDistWeir;
    FiEntranceBox_origin[1] + zc;
    FiEntranceBox_origin[2] + FiExitBox_dim[2]
], [0; 0; 0]*deg)
# MirrorWeirs
FiSubtractOverDistWeirs := SubtractF(["FiOverflowCon"], "DeleteMe")
FiBwBoxLayer := layer_new("FiBwBoxCon", grey)
FiBwTank := Tank([
    Plant_Origin[0];
    {
        (min(Fi_origin[1] - T_FiWall/2, FiEntranceBox_origin[1] - T_PlantWall - W_FiOverflow/2) - L_FiBwWeir/2) if N_Fi > 1
        (0.5*(max(Fi_origin[1] + 2*(T_ConcreteMin + ConRadius(ND_FiSiphon)), FiEntranceBox_origin[1] + 2*(T_ConcreteMin + ConRadius(ND_FiTrunk))) + min(Fi_origin[1] - T_FiWall/2, FiEntranceBox_origin[1] - T_PlantWall - W_FiOverflow/2)) - L_FiBwWeir/2) otherwise
    };
    Z_FiBwBottom
], [W_FiBw; L_FiBwWeir; H_FiBw], T_PlantWall)
FreezeFiBwBox := FreezeLayer("FiBwBoxCon")
FiBwWeir := BoxF([
    Plant_Origin[0];
    {
        (min(Fi_origin[1] - T_FiWall/2, FiEntranceBox_origin[1] - T_PlantWall - W_FiOverflow/2) - L_FiBwWeir/2) if N_Fi > 1
        (0.5*(max(Fi_origin[1] + 2*(T_ConcreteMin + ConRadius(ND_FiSiphon)), FiEntranceBox_origin[1] + 2*(T_ConcreteMin + ConRadius(ND_FiTrunk))) + min(Fi_origin[1] - T_FiWall/2, FiEntranceBox_origin[1] - T_PlantWall - W_FiOverflow/2)) - L_FiBwWeir/2) otherwise
    };
    Z_FiBwWeir
], [
    Plant_Origin[0] + T_PlantWall;
    {
        (min(Fi_origin[1] - T_FiWall/2, FiEntranceBox_origin[1] - T_PlantWall - W_FiOverflow/2) + L_FiBwWeir/2) if N_Fi > 1
        (0.5*(max(Fi_origin[1] + 2*(T_ConcreteMin + ConRadius(ND_FiSiphon)), FiEntranceBox_origin[1] + 2*(T_ConcreteMin + ConRadius(ND_FiTrunk))) + min(Fi_origin[1] - T_FiWall/2, FiEntranceBox_origin[1] - T_PlantWall - W_FiOverflow/2)) + L_FiBwWeir/2) otherwise
    };
    Z_FiBwTop
], [0; 0; 0]*deg)
FiBwHalfBox := BoxF([
    Plant_Origin[0] + T_ChannelWall + zc;
    min(Fi_origin[1] - T_FiWall/2, FiEntranceBox_origin[1] - T_PlantWall - W_FiOverflow/2) - L_FiBwWeir/2 - T_ChannelWall - zc;
    Z_FiBwBottom - zc - T_ChannelWall
], [
    Plant_Origin[0] - W_DC - T_ChannelWall - zc;
    min(Fi_origin[1] - T_FiWall/2, FiEntranceBox_origin[1] - T_PlantWall - W_FiOverflow/2);
    Z_FiBwBottom + H_FiBw + zc
], [0; 0; 0]*deg)
# GroupDelete
SubtractBwWeir := SubtractF(["FiBwBoxCon"], "DeleteMe")
FiBw :=
    stack(FiBwBoxLayer, FiBwTank, FreezeFiBwBox, FiBwWeir, GroupDelete, SubtractBwWeir) if N_Fi == 1
    stack(FiBwBoxLayer, FiBwTank, FreezeFiBwBox, FiBwHalfBox, FiBwWeir, GroupDelete, SubtractBwWeir) otherwise
FiAuxTanksScript :=
    stack(LayerFiOverflow, FiOverflowTank, FiDistTank, Union_All, LayerFiOverflowFreeze, FiOverflowWeir, FiDistWeir, GroupDelete, FiSubtractOverDistWeirs, FiBw) if N_Fi == 1
    stack(LayerFiOverflow, FiOverflowTank, FiDistTank, Union_All, LayerFiOverflowFreeze, FiOverflowWeir, FiDistWeir, MirrorWeirs, GroupDelete, FiSubtractOverDistWeirs, FiBw) otherwise
# Couplings
LayerFiCoupling := layer_new("FiCouplingPlu", green)
FiOverflowToDistCoupling := CouplingSUBF([
    FiExitBox_origin[0] + T_PlantWall - SocketDepth(ND_DistPipe);
    min(Fi_origin[1] - T_FiWall/2, FiEntranceBox_origin[1] - T_PlantWall - W_FiOverflow/2);
    Z_FiOverflowBottom - 2*T_ConcreteMin - ConRadius(ND_DistPipe) + H_FiEntrance
], [0; 0]*deg, ND_DistPipe, PS_Default, ["FiOverflowCon"])
FiOverflowCoupling := CouplingSUBF([
    Plant_Origin[0] - W_FiBw - T_ChannelWall - SocketDepth(ND_FiEntranceOverflow) - ElbowRadius(ND_FiEntranceOverflow);
    min(Fi_origin[1] - T_FiWall/2, FiEntranceBox_origin[1] - T_PlantWall - W_FiOverflow/2);
    Z_FiOverflowBottom - CouplingLength(ND_FiEntranceOverflow) + SocketDepth(ND_FiEntranceOverflow)
], [0; 90]*deg, ND_FiEntranceOverflow, PS_Default, ["FiOverflowCon"])
FiOverflowDrainCouplingHoriz := CouplingSUBF([
    Plant_Origin[0] - W_FiBw - SocketDepth(ND_FiEntranceOverflow);
    min(Fi_origin[1] - T_FiWall/2, FiEntranceBox_origin[1] - T_PlantWall - W_FiOverflow/2);
    Z_FiBwBottom + S_Fitting + ConRadius(ND_FiEntranceOverflow)
], [0; 0], ND_FiEntranceOverflow, PS_Default, ["FiBwBoxCon"])
DistCoupling := CouplingSUBF([
    FiExitBox_origin[0] - L_FiExit/2;
    min(Fi_origin[1] - T_FiWall/2, FiEntranceBox_origin[1] - T_PlantWall - W_FiOverflow/2);
    Z_FiOverflowBottom - CouplingLength(ND_DistPipe) + SocketDepth(ND_DistPipe)
], [0; 90]*deg, ND_DistPipe, PS_Default, ["FiOverflowCon"])
LayerFiCouplingFreeze := FreezeLayer("FiCouplingPlu")
FiAuxCouplingScript := stack(LayerFiCoupling, FiOverflowToDistCoupling, FiOverflowCoupling, FiOverflowDrainCouplingHoriz, DistCoupling, LayerFiCouplingFreeze)
# Piping
# For all pipes, if the coupling does not extend out of the concrete floor, the pipe needs to extend 1 socket depth out of the concrete for the subsequent fitting.  If it does extend out of the concrete, we only want to the pipe length to be 2 socket depths: 1 for the coupling, 1 for the other fitting
LayerFiAuxPiping := layer_new("FiAuxPlu", blue)
FiOverflowConnectingPipe := PipeSUBF([
    FiExitBox_origin[0] + T_PlantWall + SocketDepth(ND_DistPipe) - CouplingLength(ND_DistPipe);
    min(Fi_origin[1] - T_FiWall/2, FiEntranceBox_origin[1] - T_PlantWall - W_FiOverflow/2);
    Z_FiOverflowBottom - 2*T_ConcreteMin - ConRadius(ND_DistPipe) + H_FiEntrance
], max((T_PlantWall - CouplingLength(ND_DistPipe)) + 2*SocketDepth(ND_DistPipe), 2*SocketDepth(ND_DistPipe)), [0; 0]*deg, ND_DistPipe, PS_Default, ["FiOverflow"])
FiOverflowToDistElbow := ElbowF([
    FiExitBox_origin[0] + T_PlantWall - SocketDepth(ND_DistPipe) - CouplingLength(ND_DistPipe);
    min(Fi_origin[1] - T_FiWall/2, FiEntranceBox_origin[1] - T_PlantWall - W_FiOverflow/2);
    Z_FiOverflowBottom - 2*T_ConcreteMin - ConRadius(ND_DistPipe) + H_FiEntrance
], [90; 0; 90]*deg, ND_DistPipe, PS_Default)
FiOverflowConnectingPipe2 := PipeF([
    FiExitBox_origin[0] - ElbowRadius(ND_DistPipe) + T_PlantWall - SocketDepth(ND_DistPipe) - CouplingLength(ND_DistPipe);
    min(Fi_origin[1] - T_FiWall/2, FiEntranceBox_origin[1] - T_PlantWall - W_FiOverflow/2);
    Z_FiOverflowBottom - 2*T_ConcreteMin - ConRadius(ND_DistPipe) + H_FiEntrance - ElbowRadius(ND_DistPipe)
], H_FiExit - (ConRadius(ND_DistPipe) + ElbowRadius(ND_DistPipe) + 2*T_ConcreteMin + S_Fitting), [0; 270]*deg, ND_DistPipe, PS_Default)
Z_FiOverflowDrainPipeStart := Z_FiOverflowBottom - CouplingLength(ND_FiEntranceOverflow) + SocketDepth(ND_FiEntranceOverflow)
Z_FiOverflowDrainPipeEnd := Z_FiBwBottom + S_Fitting + ElbowRadius(ND_FiEntranceOverflow) + ConRadius(ND_FiEntranceOverflow)
FiOverflowDrainPipe := PipeSUBF([
    Plant_Origin[0] - W_FiBw - T_ChannelWall - SocketDepth(ND_FiEntranceOverflow) - ElbowRadius(ND_FiEntranceOverflow);
    min(Fi_origin[1] - T_FiWall/2, FiEntranceBox_origin[1] - T_PlantWall - W_FiOverflow/2);
    Z_FiOverflowDrainPipeStart
], Z_FiOverflowDrainPipeStart - Z_FiOverflowDrainPipeEnd, [0; 270]*deg, ND_FiEntranceOverflow, PS_Default, ["FiOverflowCon"])
FiOverflowDrainElbow := ElbowF([
    Plant_Origin[0] - W_FiBw - T_ChannelWall - SocketDepth(ND_FiEntranceOverflow) - ElbowRadius(ND_FiEntranceOverflow);
    min(Fi_origin[1] - T_FiWall/2, FiEntranceBox_origin[1] - T_PlantWall - W_FiOverflow/2);
    Z_FiOverflowDrainPipeEnd
], [180; 0; 90]*deg, ND_FiEntranceOverflow, PS_Default)
Z_FiOverflowHorizDrainPipeStart := Plant_Origin[0] - W_FiBw - CouplingLength(ND_FiEntranceOverflow) + SocketDepth(ND_FiEntranceOverflow)
Z_FiOverflowHorizDrainPipeEnd := Plant_Origin[0] - W_FiBw - T_ChannelWall - SocketDepth(ND_FiEntranceOverflow)
FiOverflowDrainPipeHoriz := PipeSUBF([
    Plant_Origin[0] - W_FiBw - CouplingLength(ND_FiEntranceOverflow) + SocketDepth(ND_FiEntranceOverflow);
    min(Fi_origin[1] - T_FiWall/2, FiEntranceBox_origin[1] - T_PlantWall - W_FiOverflow/2);
    Z_FiOverflowDrainPipeEnd - ElbowRadius(ND_FiEntranceOverflow)
], Z_FiOverflowHorizDrainPipeStart - Z_FiOverflowHorizDrainPipeEnd, [0; 0], ND_FiEntranceOverflow, PS_Default, ["FiBwBoxCon"])
Z_FiBwOverflowPipeStart := Z_FiBwWeirDrainBottom - CouplingLength(ND_FiBwWeirDrain) + SocketDepth(ND_FiBwWeirDrain)
Z_FiBwOverflowPipeEnd := Z_FiBwBottom - T_PlantWall - (10 cm + ConRadius(ND_FiBwWeirDrain)) + ElbowRadius(ND_FiBwWeirDrain)
# This does not require a start/end because the elbow extends deeper than 10 cm and is under the Bw box so splashing shouldn't be a concern
LayerFiPipingFreeze := FreezeLayer("FiAuxPlu")
FiAuxPipeScript := stack(LayerFiAuxPiping, FiOverflowConnectingPipe, FiOverflowToDistElbow, FiOverflowConnectingPipe2, FiOverflowDrainPipe, FiOverflowDrainElbow, FiOverflowDrainPipeHoriz, LayerFiPipingFreeze)
FiAuxScript := stack(FiAuxTanksScript, FiAuxCouplingScript, FiAuxPipeScript)
# Filter Script
# Tank
LayerFiTank := layer_new("FiTankCon", ltgrey)
FiTank := Tank(Fi_origin, Fi_dim, T_FiWall)
FiBwManLedge := BoxF([Fi_origin[0]; Fi_origin[1]; Fi_origin[2] + 2*ConRadius(ND_FiBwManBranch)], [Fi_origin[0]; Fi_origin[1]; Fi_origin[2] + ConRadius(ND_FiBwManBranch)] + [-L_Fi; 5 cm; H_FiLayer - ConRadius(ND_FiManBranch)], [0; 0; 0]*deg)
FiManLedge := BoxF([
    Fi_origin[0];
    Fi_origin[1];
    Fi_origin[2] + ConRadius(ND_FiBwManBranch) + H_FiLayer + ConRadius(ND_FiManBranch)
], [
    Fi_origin[0];
    Fi_origin[1];
    Fi_origin[2] + ConRadius(ND_FiBwManBranch) + H_FiLayer + ConRadius(ND_FiManBranch)
] + [-L_Fi; 5 cm; H_FiLayer - 2*ConRadius(ND_FiManBranch)], [0; 0; 0]*deg)
ArrayManLedges := ArrayLast(N_FiLayer, 1, H_FiLayer)
FiSiphonManLedgeL := BoxF([
    Fi_origin[0];
    Fi_origin[1] + T_ConcreteMin + ConRadius(ND_FiSiphon) - 2*S_Fitting;
    Z_FiSiphonInlet - ConRadius(ND_FiSiphon)
], [
    Fi_origin[0] - T_ConcreteMin;
    Fi_origin[1] + T_ConcreteMin + ConRadius(ND_FiSiphon) + 2*S_Fitting;
    Z_FiSiphonInlet - ConRadius(ND_FiSiphon) - T_ConcreteMin
], [0; 0; 0]*deg)
FiSiphonManLedgeR := BoxF([
    Fi_origin[0] - L_Fi;
    Fi_origin[1] + T_ConcreteMin + ConRadius(ND_FiSiphon) - 2*S_Fitting;
    Z_FiSiphonInlet - ConRadius(ND_FiSiphon)
], [
    Fi_origin[0] - L_Fi + T_ConcreteMin;
    Fi_origin[1] + T_ConcreteMin + ConRadius(ND_FiSiphon) + 2*S_Fitting;
    Z_FiSiphonInlet - ConRadius(ND_FiSiphon) - T_ConcreteMin
], [0; 0; 0]*deg)
LayerFiTankFreeze := FreezeLayer("FiTankCon")
FiBwTrunkSlot := BoxF(Fi_origin + [0 m; -W_Fi; 0 m], [-L_Fi; 0 m; -ConRadius(ND_FiBwTrunk) + ConRadius(ND_FiBwManBranch)] + Fi_origin, [0; 0; 0]*deg)
# GroupDelete
DeleteFiSlots := SubtractF(["FiTankCon"], "DeleteMe")
FiTankScript := stack(LayerFiTank, FiTank, FiBwManLedge, FiManLedge, view("f"), ArrayManLedges, view("t"), FiSiphonManLedgeL, FiSiphonManLedgeR, Union_All, LayerFiTankFreeze, FiBwTrunkSlot, GroupDelete, DeleteFiSlots)
# Manifold Key Pipe
FiKeyPipeLayer := layer_new("FiKeypipePlu", blue)
DrawFiKeyPipeCap := CapSUBF([
    -L_Fi + ConRadius(ND_FiKeyPipe);
    W_Fi - ConRadius(ND_FiBwTrunk);
    -CapHeight(ND_FiKeyPipe) + ConRadius(ND_FiKeyPipe) - outerradius(ND_FiKeyPipe) - ConRadius(ND_FiBwTrunk) + ConRadius(ND_FiBwManBranch)
] + Fi_origin, [0; 90; 0]*deg, ND_FiKeyPipe, ["FiTankCon"])
DrawFiKeyPipeBottom := PipeF([
    -L_Fi + ConRadius(ND_FiKeyPipe);
    W_Fi - ConRadius(ND_FiBwTrunk);
    -CapHeight(ND_FiKeyPipe) + ConRadius(ND_FiKeyPipe) - outerradius(ND_FiKeyPipe) - ConRadius(ND_FiBwTrunk) + ConRadius(ND_FiBwManBranch)
] + Fi_origin, ConRadius(ND_FiBwTrunk) - ConRadius(ND_FiBwManBranch) + N_FiLayer*H_FiLayer + ConRadius(ND_FiBwManBranch) + ConRadius(ND_FiTrunk) + CapHeight(ND_FiKeyPipe) + outerradius(ND_FiKeyPipe) - ShortTeeLength(ND_FiKeyPipe), [0; 90]*deg, ND_FiKeyPipe, PS_Default)
DrawFiKeyPipeTee := TeeF([
    -L_Fi + ConRadius(ND_FiKeyPipe) + ShortTeeLength(ND_FiKeyPipe);
    W_Fi - ConRadius(ND_FiBwTrunk);
    N_FiLayer*H_FiLayer + ConRadius(ND_FiBwManBranch) + ConRadius(ND_FiTrunk) + ConRadius(ND_FiKeyPipe)
] + Fi_origin, [270; 0; 90]*deg, ND_FiKeyPipe, PS_Default)
DrawFiKeyPipeTop := PipeF([
    -L_Fi + ConRadius(ND_FiKeyPipe);
    W_Fi - ConRadius(ND_FiBwTrunk);
    N_FiLayer*H_FiLayer + ConRadius(ND_FiBwManBranch) + ConRadius(ND_FiTrunk) + ConRadius(ND_FiKeyPipe) + ShortTeeLength(ND_FiKeyPipe)
] + Fi_origin, H_Fi - (N_FiLayer*H_FiLayer + ConRadius(ND_FiBwManBranch) + ConRadius(ND_FiTrunk) + ConRadius(ND_FiKeyPipe) + ShortTeeLength(ND_FiKeyPipe)), [0; 90]*deg, ND_FiKeyPipe, PS_Default)
FreezeFiKeyPipe := FreezeLayer("FiKeypipePlu")
FiKeyPipeScript := stack(FiKeyPipeLayer, DrawFiKeyPipeCap, DrawFiKeyPipeBottom, DrawFiKeyPipeTee, DrawFiKeyPipeTop, FreezeFiKeyPipe)
# Manifold Spacers
ND_FiSpacerRod := 1.5 in
# http://www.spearsmfg.com/prod_dimensions_spec/40-4-0511_0511_web.pdf
# schedule 40 spacers
# schedule 40 saddles are available in 6x1.5 and 4x1.5
# 6x2 and 4x2 saddles don't fit between the trunk lines
# maybe eventually we will need a database for this
# these are the US dimensions:
L_FiSaddleTopUS := 6.25 in
L_FiSaddleOutletTopUS := 3.75 in - ConRadius(ND_FiTrunk)  # for the 4" pipe
L_FiSaddleBottomUS := (6 + 5/16)*in
L_FiSaddleOutletBottomUS := (4 + 5/16)*in - ConRadius(ND_FiBwTrunk)  # for the 6" pipe
# these are the Honduras dimensions:
L_FiSaddleOutletTop := (20 cm - 13.5 cm)/2
L_FiSaddleTop := 7 cm
L_FiSaddleOutletBottom := L_FiSaddleOutletTop
L_FiSaddleBottom := 9 cm
ManSpacerLayer := layer_new("FiManspacerPlu", yellow)
TopFiSaddleOuterCylinder := CylinderF([
    -L_FiBwTrunk + SocketDepth(ND_FiBwTrunk) + CapHeight(ND_FiBwTrunk) + (L_FiSaddleTop + L_FiSaddleBottom)/2;
    W_Fi - ConRadius(ND_FiBwTrunk);
    N_FiLayer*H_FiLayer + ConRadius(ND_FiBwManBranch)
] + Fi_origin, ConRadius(ND_FiTrunk), L_FiSaddleTop, [0; 0]*deg)
TopFiSaddleOuterCylinderOutlet := CylinderF([
    -L_FiBwTrunk + SocketDepth(ND_FiBwTrunk) + CapHeight(ND_FiBwTrunk) + L_FiSaddleBottom/2;
    W_Fi - ConRadius(ND_FiBwTrunk);
    N_FiLayer*H_FiLayer + ConRadius(ND_FiBwManBranch)
] + Fi_origin, ConRadius(ND_FiSpacerRod), ConRadius(ND_FiTrunk) + L_FiSaddleOutletTop, [0; 270]*deg)
TopFiSaddleInnerCyl := CylinderF([
    -L_FiBwTrunk + SocketDepth(ND_FiBwTrunk) + CapHeight(ND_FiBwTrunk) + (L_FiSaddleTop + L_FiSaddleBottom)/2 + zc;
    W_Fi - ConRadius(ND_FiBwTrunk);
    N_FiLayer*H_FiLayer + ConRadius(ND_FiBwManBranch)
] + Fi_origin, outerradius(ND_FiTrunk), L_FiSaddleTop + 2*zc, [0; 0]*deg)
TopFiSaddleInnerCylinderOutlet := CylinderF([
    -L_FiBwTrunk + SocketDepth(ND_FiBwTrunk) + CapHeight(ND_FiBwTrunk) + L_FiSaddleBottom/2;
    W_Fi - ConRadius(ND_FiBwTrunk);
    N_FiLayer*H_FiLayer + ConRadius(ND_FiBwManBranch)
] + Fi_origin, outerradius(ND_FiSpacerRod), zc + ConRadius(ND_FiTrunk) + L_FiSaddleOutletTop, [0; 270]*deg)
SliceTopFiSaddle := BoxF([
    -L_FiBwTrunk + SocketDepth(ND_FiBwTrunk) + CapHeight(ND_FiBwTrunk) + (L_FiSaddleTop + L_FiSaddleBottom)/2 + zc;
    W_Fi - ConRadius(ND_FiBwTrunk) - ConRadius(ND_FiTrunk) - zc;
    N_FiLayer*H_FiLayer + ConRadius(ND_FiBwManBranch)
] + Fi_origin, [
    -L_FiBwTrunk + SocketDepth(ND_FiBwTrunk) + CapHeight(ND_FiBwTrunk) - zc;
    W_Fi - ConRadius(ND_FiBwTrunk) + ConRadius(ND_FiTrunk) + zc;
    N_FiLayer*H_FiLayer + ConRadius(ND_FiBwManBranch) + ConRadius(ND_FiTrunk) + zc
] + Fi_origin, [0; 0; 0]*deg)
ZoomFiSpacer := ZoomWindow([
    -L_FiBwTrunk + SocketDepth(ND_FiBwTrunk) + CapHeight(ND_FiBwTrunk) + (L_FiSaddleTop + L_FiSaddleBottom)/2 + 2*zc;
    W_Fi - ConRadius(ND_FiBwTrunk) - ConRadius(ND_FiTrunk) - 2*zc;
    N_FiLayer*H_FiLayer + ConRadius(ND_FiBwManBranch)
] + Fi_origin, [
    -L_FiBwTrunk + SocketDepth(ND_FiBwTrunk) + CapHeight(ND_FiBwTrunk) - 2*zc;
    W_Fi - ConRadius(ND_FiBwTrunk) + ConRadius(ND_FiTrunk) + 2*zc;
    N_FiLayer*H_FiLayer + ConRadius(ND_FiBwManBranch) + ConRadius(ND_FiTrunk) + zc
] + Fi_origin)
SubtractInnerFiSaddleTop := SubtractGeneral([
    [
        -L_FiBwTrunk + SocketDepth(ND_FiBwTrunk) + CapHeight(ND_FiBwTrunk) + (L_FiSaddleTop + L_FiSaddleBottom)/2;
        W_Fi - ConRadius(ND_FiBwTrunk) + ConRadius(ND_FiTrunk);
        N_FiLayer*H_FiLayer + ConRadius(ND_FiBwManBranch)
    ] + Fi_origin;
    [
        -L_FiBwTrunk + SocketDepth(ND_FiBwTrunk) + CapHeight(ND_FiBwTrunk) + L_FiSaddleBottom/2;
        W_Fi - ConRadius(ND_FiBwTrunk) + ConRadius(ND_FiSpacerRod);
        N_FiLayer*H_FiLayer + ConRadius(ND_FiBwManBranch)
    ] + Fi_origin
], [
    [
        -L_FiBwTrunk + SocketDepth(ND_FiBwTrunk) + CapHeight(ND_FiBwTrunk) + (L_FiSaddleTop + L_FiSaddleBottom)/2 + zc;
        W_Fi - ConRadius(ND_FiBwTrunk) - ConRadius(ND_FiTrunk) - zc;
        N_FiLayer*H_FiLayer + ConRadius(ND_FiBwManBranch)
    ] + Fi_origin;
    [
        -L_FiBwTrunk + SocketDepth(ND_FiBwTrunk) + CapHeight(ND_FiBwTrunk) + (L_FiSaddleTop + L_FiSaddleBottom)/2 + zc/2;
        W_Fi - ConRadius(ND_FiBwTrunk) + outerradius(ND_FiTrunk);
        N_FiLayer*H_FiLayer + ConRadius(ND_FiBwManBranch)
    ] + Fi_origin;
    [
        -L_FiBwTrunk + SocketDepth(ND_FiBwTrunk) + CapHeight(ND_FiBwTrunk) + L_FiSaddleBottom/2;
        W_Fi - ConRadius(ND_FiBwTrunk) + outerradius(ND_FiSpacerRod);
        N_FiLayer*H_FiLayer + ConRadius(ND_FiBwManBranch)
    ] + Fi_origin
])
DrawFiSaddles := stack(TopFiSaddleOuterCylinder, TopFiSaddleOuterCylinderOutlet, TopFiSaddleInnerCyl, TopFiSaddleInnerCylinderOutlet, SliceTopFiSaddle, ZoomFiSpacer, SubtractInnerFiSaddleTop)
# viewfront
ArrayFiSaddleDown := ArrayLast(N_FiLayer, 1, -H_FiLayer)
MirrorFiSaddle := MirrorLast([Fi_origin[0] - L_Fi/2; Fi_origin[2] + ConRadius(ND_FiBwManBranch) + H_FiLayer], [Fi_origin[0] - L_Fi/2 + zc; Fi_origin[2] + ConRadius(ND_FiBwManBranch) + H_FiLayer], "n")
ArrayInvertedFiSaddle := ArrayLast(N_FiLayer - 1, 1, H_FiLayer)
# viewtop
FiSpacerPipe := PipeF([
    -L_FiBwTrunk + SocketDepth(ND_FiBwTrunk) + CapHeight(ND_FiBwTrunk) + L_FiSaddleBottom/2;
    W_Fi - ConRadius(ND_FiBwTrunk);
    N_FiLayer*H_FiLayer + ConRadius(ND_FiBwManBranch) - outerradius(ND_FiTrunk)
] + Fi_origin, H_FiLayer - 2*outerradius(ND_FiTrunk), [0; 270]*deg, ND_FiSpacerRod, PS_Default)
# viewfront
ArrayFiSpacerPipe := ArrayLast(N_FiLayer - 1, 1, -H_FiLayer)
# viewtop
BottomFiSaddleOuterCylinder := CylinderF([
    -L_FiBwTrunk + SocketDepth(ND_FiBwTrunk) + CapHeight(ND_FiBwTrunk) + L_FiSaddleBottom;
    W_Fi - ConRadius(ND_FiBwTrunk);
    ConRadius(ND_FiBwManBranch)
] + Fi_origin, ConRadius(ND_FiBwTrunk), L_FiSaddleBottom, [0; 0]*deg)
BottomFiSaddleOuterCylinderOutlet := CylinderF([
    -L_FiBwTrunk + SocketDepth(ND_FiBwTrunk) + CapHeight(ND_FiBwTrunk) + L_FiSaddleBottom/2;
    W_Fi - ConRadius(ND_FiBwTrunk);
    ConRadius(ND_FiBwManBranch)
] + Fi_origin, ConRadius(ND_FiSpacerRod), ConRadius(ND_FiBwTrunk) + L_FiSaddleOutletBottom, [0; 90]*deg)
BottomFiSaddleInnerCyl := CylinderF([
    -L_FiBwTrunk + SocketDepth(ND_FiBwTrunk) + CapHeight(ND_FiBwTrunk) + L_FiSaddleBottom + zc;
    W_Fi - ConRadius(ND_FiBwTrunk);
    ConRadius(ND_FiBwManBranch)
] + Fi_origin, outerradius(ND_FiBwTrunk), L_FiSaddleBottom + 2*zc, [0; 0]*deg)
BottomFiSaddleInnerCylinderOutlet := CylinderF([
    -L_FiBwTrunk + SocketDepth(ND_FiBwTrunk) + CapHeight(ND_FiBwTrunk) + L_FiSaddleBottom/2;
    W_Fi - ConRadius(ND_FiBwTrunk);
    ConRadius(ND_FiBwManBranch)
] + Fi_origin, outerradius(ND_FiSpacerRod), zc + ConRadius(ND_FiBwTrunk) + L_FiSaddleOutletBottom, [0; 90]*deg)
SliceBottomFiSaddle := BoxF([
    -L_FiBwTrunk + SocketDepth(ND_FiBwTrunk) + CapHeight(ND_FiBwTrunk) + L_FiSaddleBottom + zc;
    W_Fi - 2*ConRadius(ND_FiBwTrunk) - zc;
    ConRadius(ND_FiBwManBranch)
] + Fi_origin, [
    -L_FiBwTrunk + SocketDepth(ND_FiBwTrunk) + CapHeight(ND_FiBwTrunk) - zc;
    W_Fi + zc;
    ConRadius(ND_FiBwManBranch) - ConRadius(ND_FiBwTrunk) - zc
] + Fi_origin, [0; 0; 0]*deg)
ZoomFiBottomSpacer := ZoomWindow([
    -L_FiBwTrunk + SocketDepth(ND_FiBwTrunk) + CapHeight(ND_FiBwTrunk) + L_FiSaddleBottom + 2*zc;
    W_Fi - ConRadius(ND_FiBwTrunk) - ConRadius(ND_FiTrunk) - 2*zc;
    ConRadius(ND_FiBwManBranch) + zc
] + Fi_origin, [
    -L_FiBwTrunk + SocketDepth(ND_FiBwTrunk) + CapHeight(ND_FiBwTrunk) - 2*zc;
    W_Fi - ConRadius(ND_FiBwTrunk) + ConRadius(ND_FiTrunk) + 2*zc;
    -ConRadius(ND_FiBwManBranch) - 2*zc
] + Fi_origin)
SubtractInnerFiSaddleBottom := SubtractGeneral([
    [
        -L_FiBwTrunk + SocketDepth(ND_FiBwTrunk) + CapHeight(ND_FiBwTrunk) + L_FiSaddleBottom;
        W_Fi - ConRadius(ND_FiBwTrunk) + ConRadius(ND_FiTrunk);
        ConRadius(ND_FiBwManBranch)
    ] + Fi_origin;
    [
        -L_FiBwTrunk + SocketDepth(ND_FiBwTrunk) + CapHeight(ND_FiBwTrunk) + L_FiSaddleBottom/2;
        W_Fi - ConRadius(ND_FiBwTrunk) + ConRadius(ND_FiSpacerRod);
        ConRadius(ND_FiBwManBranch)
    ] + Fi_origin
], [
    [
        -L_FiBwTrunk + SocketDepth(ND_FiBwTrunk) + CapHeight(ND_FiBwTrunk) + L_FiSaddleBottom + zc;
        W_Fi - 2*ConRadius(ND_FiBwTrunk) - zc;
        ConRadius(ND_FiBwManBranch)
    ] + Fi_origin;
    [
        -L_FiBwTrunk + SocketDepth(ND_FiBwTrunk) + CapHeight(ND_FiBwTrunk) + L_FiSaddleBottom + zc/2;
        W_Fi - ConRadius(ND_FiBwTrunk) + outerradius(ND_FiBwTrunk);
        ConRadius(ND_FiBwManBranch)
    ] + Fi_origin;
    [
        -L_FiBwTrunk + SocketDepth(ND_FiBwTrunk) + CapHeight(ND_FiBwTrunk) + L_FiSaddleBottom/2;
        W_Fi - ConRadius(ND_FiBwTrunk) + outerradius(ND_FiSpacerRod);
        ConRadius(ND_FiBwManBranch)
    ] + Fi_origin
])
DrawBottomFiSaddle := stack(BottomFiSaddleOuterCylinder, BottomFiSaddleOuterCylinderOutlet, BottomFiSaddleInnerCyl, BottomFiSaddleInnerCylinderOutlet, SliceBottomFiSaddle, ZoomFiBottomSpacer, SubtractInnerFiSaddleBottom)
FiBottomSpacerPipe := PipeF([
    -L_FiBwTrunk + SocketDepth(ND_FiBwTrunk) + CapHeight(ND_FiBwTrunk) + L_FiSaddleBottom/2;
    W_Fi - ConRadius(ND_FiBwTrunk);
    ConRadius(ND_FiBwManBranch) + outerradius(ND_FiBwTrunk)
] + Fi_origin, H_FiLayer - outerradius(ND_FiBwTrunk) - outerradius(ND_FiTrunk), [0; 90]*deg, ND_FiSpacerRod, PS_Default)
FreezeFiManSpacers := FreezeLayer("FiManspacerPlu")
FiManSpacerScript := stack(ManSpacerLayer, DrawFiSaddles, view("f"), ArrayFiSaddleDown, view("f"), MirrorFiSaddle, ArrayInvertedFiSaddle, view("t"), FiSpacerPipe, view("f"), ArrayFiSpacerPipe, view("t"), DrawBottomFiSaddle, FiBottomSpacerPipe, FreezeFiManSpacers)
# Couplings
LayerFiCouplings := layer_new("FiCouplingsPlu", green)
FiTankBwCoupling := CouplingSUBF(FiTankBwCoupling_origin, [0; 0]*deg, ND_FiBwTrunk, PS_Default, ["FiTankCon"])
FiTankCoupling1 := CouplingSUBF(FiTankCouplings_origin, [0; 0]*deg, ND_FiTrunk, PS_Default, ["FiTankCon"])
FiTankCoupling2 := CouplingSUBF([FiTankCouplings_origin[0]; FiTankCouplings_origin[1]; FiTankCouplings_origin[2] + H_FiLayer], [0; 0]*deg, ND_FiTrunk, PS_Default, ["FiTankCon"])
FiTankCoupling3 := CouplingSUBF([FiTankCouplings_origin[0]; FiTankCouplings_origin[1]; FiTankCouplings_origin[2] + 2*H_FiLayer], [0; 0]*deg, ND_FiTrunk, PS_Default, ["FiTankCon"])
FiTankCoupling4 := CouplingSUBF([FiTankCouplings_origin[0]; FiTankCouplings_origin[1]; FiTankCouplings_origin[2] + 3*H_FiLayer], [0; 0]*deg, ND_FiTrunk, PS_Default, ["FiTankCon"])
FiTankCoupling5 := CouplingSUBF([FiTankCouplings_origin[0]; FiTankCouplings_origin[1]; FiTankCouplings_origin[2] + 4*H_FiLayer], [0; 0]*deg, ND_FiTrunk, PS_Default, ["FiTankCon"])
FiTankCoupling6 := CouplingSUBF([FiTankCouplings_origin[0]; FiTankCouplings_origin[1]; FiTankCouplings_origin[2] + 5*H_FiLayer], [0; 0]*deg, ND_FiTrunk, PS_Default, ["FiTankCon"])
FiExitDrainCoupling := CouplingSUBF([
    Plant_Origin[0] - W_FiBw - SocketDepth(ND_FiExitWaste);
    FiExitCoupling3_origin[1];
    Z_FiBwBottom + S_Fitting + ConRadius(ND_FiEntranceOverflow)
], [0; 0], ND_FiExitWaste, PS_Default, ["FiBwBoxCon"])
LayerFiCouplingsFreeze := FreezeLayer("FiCouplingsPlu")
mirror1 := Mirror3dGroup("filtercouplings", "y", [Fi_origin[0]; Fi_origin[1] - T_PlantWall; Fi_origin[2]], "n")
FiTankCouplingScript := stack(LayerFiCouplings, FiTankBwCoupling, FiTankCoupling1, FiTankCoupling2, FiTankCoupling3, FiTankCoupling4, FiTankCoupling5, FiTankCoupling6, FiExitDrainCoupling, LayerFiCouplingsFreeze)
# Filter manifold
# Trunks
LayerTrunks := layer_new("FiTrunksPlu", blue)
FiTrunk := PipeF([
    Fi_origin[0] + min(2*ConRadius(ND_FiKeyPipe), SocketDepth(ND_FiTrunk));
    FiBwInletCoupling_origin[1];
    Fi_origin[2] + H_FiLayer + ConRadius(ND_FiBwManBranch)
], L_FiTrunk, [0; 0]*deg, ND_FiTrunk, PS_Default)
FiTrunkCap := CapF([
    Fi_origin[0] + min(2*ConRadius(ND_FiKeyPipe), SocketDepth(ND_FiTrunk)) - L_FiTrunk;
    FiBwInletCoupling_origin[1];
    Fi_origin[2] + H_FiLayer + ConRadius(ND_FiBwManBranch)
], [180; 0]*deg, ND_FiTrunk)
FreezeFiTrunkLayer := FreezeLayer("FiTrunksPlu")
FiTrunkOrifice := CylinderF([
    Fi_origin[0] - B_FiManifoldBranch/2;
    FiBwInletCoupling_origin[1];
    Fi_origin[2] + H_FiLayer + ConRadius(ND_FiBwManBranch)
], outerradius(ND_FiManBranch), ND_FiTrunk, [90; 0]*deg)
ArrayFiTrunkOrifice := ArrayLast(1, N_FiManBranch, -B_FiManifoldBranch)
# GroupAll
SubtractFiTrunkOrifices := SubtractF(["FiTrunksPlu"], "DeleteMe")
SelectFiTrunk := SelectLayer("FiTrunksPlu")
ArrayFiTrunks := array_all(N_FiLayer, 1, H_FiLayer)
# FreezeFiTrunkLayer
LayerBwTrunk := layer_new("FiBwtrunkPlu", blue)
BwTrunk := PipeF([
    Fi_origin[0] + min(2*ConRadius(ND_FiKeyPipe), SocketDepth(ND_FiBwTrunk));
    FiBwInletCoupling_origin[1];
    Fi_origin[2] + ConRadius(ND_FiBwManBranch)
], L_FiBwTrunk, [0; 0]*deg, ND_FiBwTrunk, PS_Default)
FiBwTrunkCap := CapF([
    Fi_origin[0] + min(2*ConRadius(ND_FiKeyPipe), SocketDepth(ND_FiBwTrunk)) - L_FiBwTrunk;
    FiBwInletCoupling_origin[1];
    Fi_origin[2] + ConRadius(ND_FiBwManBranch)
], [180; 0]*deg, ND_FiBwTrunk)
FreezeBwTrunkLayer := FreezeLayer("FiBwtrunkPlu")
FiBwTrunkOrifice := CylinderF([
    Fi_origin[0] - B_FiManifoldBranch/2;
    FiBwInletCoupling_origin[1];
    Fi_origin[2] + ConRadius(ND_FiBwManBranch)
], outerradius(ND_FiBwManBranch), ND_FiTrunk, [90; 0]*deg)
ArrayFiBwTrunkOrifice := ArrayLast(1, N_FiManBranch, -B_FiManifoldBranch)
# GroupAll
SubtractFiBwTrunkOrifices := SubtractF(["FiBwtrunkPlu"], "DeleteMe")
FiTrunks := stack(LayerTrunks, FiTrunk, FiTrunkCap, FreezeFiTrunkLayer, FiTrunkOrifice, ArrayFiTrunkOrifice, GroupDelete, SubtractFiTrunkOrifices, SelectFiTrunk, view("f"), ArrayFiTrunks, view("t"), FreezeFiTrunkLayer)
FiBwTrunk := stack(LayerBwTrunk, BwTrunk, FiBwTrunkCap, FreezeBwTrunkLayer, FiBwTrunkOrifice, ArrayFiBwTrunkOrifice, GroupDelete, SubtractFiBwTrunkOrifices)
FiTrunkScript := stack(FiTrunks, FiBwTrunk)
# Filter Branches
LayerMan := layer_new("FiManPlu", red)
FiManBranch := PipeF(FiManTee_Origin, L_FiManBranch, [-90; 0]*deg, ND_FiManBranch, PS_FiBranch)
FiManTee := TeeF(FiManTee_Origin, [0; 0; 0]*deg, ND_FiManBranch, PS_FiBranch)
ArrayManBranches := array_all(1, N_FiManBranch - 2, -B_FiManifoldBranch)
FiManBranchRight := PipeF(FiManTee_Origin + [B_FiManifoldBranch; ElbowRadius(ND_FiManBranch) - ShortTeeLength(ND_FiManBranch); 0 m], L_FiManBranch, [-90; 0]*deg, ND_FiManBranch, PS_FiBranch)
FiManBranchLeft := PipeF(FiManTee_Origin + [
    -B_FiManifoldBranch*(N_FiManBranch - 2);
    ElbowRadius(ND_FiManBranch) - ShortTeeLength(ND_FiManBranch);
    0 m
], L_FiManBranch, [-90; 0]*deg, ND_FiManBranch, PS_FiBranch)
FiManBranchRightElbow := ElbowF(FiManTee_Origin + [B_FiManifoldBranch; ElbowRadius(ND_FiManBranch) - ShortTeeLength(ND_FiManBranch); 0 m], [0; 0; 180]*deg, ND_FiManBranch, PS_FiBranch)
FiManBranchLeftElbow := ElbowF(FiManTee_Origin + [
    -B_FiManifoldBranch*(N_FiManBranch - 2);
    ElbowRadius(ND_FiManBranch) - ShortTeeLength(ND_FiManBranch);
    0 m
], [180; 0; 0]*deg, ND_FiManBranch, PS_FiBranch)
ArrayFiMan := array_all(N_FiLayer, 1, H_FiLayer)
FiManScript := stack(LayerMan, FiManBranch, FiManTee, ArrayManBranches, FiManBranchRight, FiManBranchLeft, FiManBranchRightElbow, FiManBranchLeftElbow, view("f"), ArrayFiMan, view("t"))
# Backwash branches
BwManBranch := PipeF(BwManTee_Origin, L_FiBwManBranch, [-90; 0]*deg, ND_FiBwManBranch, PS_FiBranch)
ArrayBwManBranches := ArrayLast(1, N_FiManBranch - 2, -B_FiManifoldBranch)
BwManTee := TeeF(BwManTee_Origin, [0; 0; 0]*deg, ND_FiBwManBranch, PS_FiBranch)
BwManBranchRight := PipeF(BwManTee_Origin + [B_FiManifoldBranch; ElbowRadius(ND_FiBwManBranch) - ShortTeeLength(ND_FiBwManBranch); 0 m], L_FiBwManBranch, [-90; 0]*deg, ND_FiBwManBranch, PS_FiBranch)
BwManBranchLeft := PipeF(BwManTee_Origin + [
    -B_FiManifoldBranch*(N_FiManBranch - 2);
    ElbowRadius(ND_FiManBranch) - ShortTeeLength(ND_FiManBranch);
    0 m
], L_FiBwManBranch, [-90; 0]*deg, ND_FiBwManBranch, PS_FiBranch)
BwManBranchRightElbow := ElbowF(BwManTee_Origin + [B_FiManifoldBranch; ElbowRadius(ND_FiManBranch) - ShortTeeLength(ND_FiManBranch); 0 m], [0; 0; 180]*deg, ND_FiBwManBranch, PS_FiBranch)
BwManBranchLeftElbow := ElbowF(BwManTee_Origin + [
    -B_FiManifoldBranch*(N_FiManBranch - 2);
    ElbowRadius(ND_FiManBranch) - ShortTeeLength(ND_FiManBranch);
    0 m
], [180; 0; 0]*deg, ND_FiBwManBranch, PS_FiBranch)
FreezeFiManLayer := FreezeLayer("FiManPlu")
BwManScript := stack(BwManBranch, ArrayBwManBranches, BwManTee, ArrayBwManBranches, BwManBranchRight, BwManBranchLeft, BwManBranchRightElbow, BwManBranchLeftElbow, FreezeFiManLayer)
FiManifoldScript := stack(FiTrunkScript, FiManScript, BwManScript)
mirror2 := Mirror3dGroup("filter manifolds", "y", [Fi_origin[0]; Fi_origin[1] - T_PlantWall; Fi_origin[2]], "n")
mirrormanbranch := Mirror3dGroup("manifold branches", "y", [Fi_origin[0]; Fi_origin[1] - T_PlantWall; Fi_origin[2]], "n")
# Siphon
# Coupling
LayerFiCoulingsThaw := SelectLayer("FiCouplingsPlu")
FiSiphonCoupling := CouplingSUBF([
    Fi_origin[0] + T_FiWall - SocketDepth(ND_FiSiphon);
    Fi_origin[1] + T_ConcreteMin + ConRadius(ND_FiSiphon);
    Z_FiSiphonCoupling
], [0; 0]*deg, ND_FiSiphon, PS_Default, ["FiTankCon"])
L_FiSiphonPipeBottom := Plant_Origin[1] - 2*T_PlantWall - S_Fitting - ConRadius(ND_FiSiphon) - (Fi_origin[0] + T_FiWall + SocketDepth(ND_FiSiphon) + ShortTeeLength(ND_FiSiphon) + ElbowRadius(ND_FiSiphon))
FiSiphonChannelCoupling := CouplingSUBF([
    Fi_origin[0] + T_FiWall + SocketDepth(ND_FiSiphon) + ShortTeeLength(ND_FiSiphon) + 2*ElbowRadius(ND_FiSiphon) + L_FiSiphonPipeBottom;
    Fi_origin[1] + T_ConcreteMin + ConRadius(ND_FiSiphon);
    Z_FiBwBottom - SocketDepth(ND_FiSiphon)
], [0; 270]*deg, ND_FiSiphon, PS_Default, ["FiBwBoxCon"])
# Pipes
LayerFiSiphon := layer_new("FiSiphonPlu", blue)
# Starting from the coupling going into the filter
X_FiSiphonPipe1End := Fi_origin[0] + T_FiWall - CouplingLength(ND_FiSiphon) + SocketDepth(ND_FiSiphon) - max((T_FiWall - CouplingLength(ND_FiSiphon)) + 2*SocketDepth(ND_FiSiphon), 2*SocketDepth(ND_FiSiphon))
FiSiphonPipe1 := PipeSUBF([
    Fi_origin[0] + T_FiWall - CouplingLength(ND_FiSiphon) + SocketDepth(ND_FiSiphon);
    Fi_origin[1] + T_ConcreteMin + ConRadius(ND_FiSiphon);
    Z_FiSiphonCoupling
], L_Fi/2 - ElbowRadius(ND_FiSiphon) + T_FiWall - CouplingLength(ND_FiSiphon) + SocketDepth(ND_FiSiphon), [0; 0]*deg, ND_FiSiphon, PS_Default, ["FiTankCon"])
FiSiphonElbow1 := ElbowF([
    Fi_origin[0] - L_Fi/2 + ElbowRadius(ND_FiSiphon);
    Fi_origin[1] + T_ConcreteMin + ConRadius(ND_FiSiphon);
    Z_FiSiphonCoupling
], [90; 0; 90]*deg, ND_FiSiphon, PS_Default)
FiSiphonPipe2 := PipeF([
    Fi_origin[0] - L_Fi/2;
    Fi_origin[1] + T_ConcreteMin + ConRadius(ND_FiSiphon);
    Z_FiSiphonCoupling - ElbowRadius(ND_FiSiphon)
], Z_FiSiphonCoupling - ElbowRadius(ND_FiSiphon) - (Z_FiSiphonInlet + ShortTeeLength(ND_FiSiphon)), [0; -90]*deg, ND_FiSiphon, PS_Default)
FiSiphonTee := TeeF([
    Fi_origin[0] - L_Fi/2;
    Fi_origin[1] + T_ConcreteMin + ConRadius(ND_FiSiphon);
    Z_FiSiphonInlet + ShortTeeLength(ND_FiSiphon)
], [0; 0; 90]*deg, ND_FiSiphon, PS_Default)
X_FiSiphonManifoldStart := X_FiSiphonPipe1End - ElbowRadius(ND_FiSiphon) - ShortTeeLength(ND_FiSiphon)
X_FiSiphonManifoldEnd := Fi_origin[0] - L_Fi
FiSiphonManifold1 := PipeF([
    Fi_origin[0] - L_Fi/2 - ShortTeeLength(ND_FiSiphon);
    Fi_origin[1] + T_ConcreteMin + ConRadius(ND_FiSiphon);
    Z_FiSiphonInlet
], L_Fi/2 - ShortTeeLength(ND_FiSiphon) - ConRadius(ND_FiSiphon) + outerradius(ND_FiSiphon), [0; 0]*deg, ND_FiSiphon, PS_Default)
FiSiphonManifold2 := PipeF([
    Fi_origin[0] - ConRadius(ND_FiSiphon) + outerradius(ND_FiSiphon);
    Fi_origin[1] + T_ConcreteMin + ConRadius(ND_FiSiphon);
    Z_FiSiphonInlet
], L_Fi/2 - ShortTeeLength(ND_FiSiphon) - ConRadius(ND_FiSiphon) + outerradius(ND_FiSiphon), [0; 0]*deg, ND_FiSiphon, PS_Default)
FiSiphonManifoldCap1 := CapF([
    X_FiSiphonManifoldEnd + ConRadius(ND_FiSiphon) - outerradius(ND_FiSiphon);
    Fi_origin[1] + T_ConcreteMin + ConRadius(ND_FiSiphon);
    Z_FiSiphonInlet
], [180; 0]*deg, ND_FiSiphon)
FiSiphonManifoldCap2 := CapF([
    Fi_origin[0] - ConRadius(ND_FiSiphon) + outerradius(ND_FiSiphon);
    Fi_origin[1] + T_ConcreteMin + ConRadius(ND_FiSiphon);
    Z_FiSiphonInlet
], [0; 0]*deg, ND_FiSiphon)
FreezeFiSiphon := FreezeLayer("FiSiphonPlu")
FirstFiSiphonManOrifice := CylinderF([
    Fi_origin[0] - B_FiSiphonManOrifices/2 - ConRadius(ND_FiSiphon) + outerradius(ND_FiSiphon);
    Fi_origin[1] + T_ConcreteMin + ConRadius(ND_FiSiphon);
    Z_FiSiphonInlet
], D_FiSiphonManOrifices/2, 1.2*ConRadius(ND_FiSiphon), [0; 90]*deg)
ArrayFiSiphonManOrifices := array_all(1, N_FiSiphonManOrifices/2, -B_FiSiphonManOrifices)
MirrorFiSiphonManOrifices := Mirror3dAll("yz", [Fi_origin[0] - L_Fi/2; 0 m], "n")
FiSiphonOrifices := stack(FirstFiSiphonManOrifice, ArrayFiSiphonManOrifices, MirrorFiSiphonManOrifices)
# GroupAll
SubtractFiSiphonManOrifices := SubtractF(["FiSiphonPlu"], "DeleteMe")
SelectFiSiphon := SelectLayer("FiSiphonPlu")
# Starting from the coupling going out of the filter
FiSiphonPipe3 := PipeF([
    Fi_origin[0] + T_FiWall - SocketDepth(ND_FiSiphon);
    Fi_origin[1] + T_ConcreteMin + ConRadius(ND_FiSiphon);
    Z_FiSiphonCoupling
], 2*SocketDepth(ND_FiSiphon), [180; 0]*deg, ND_FiSiphon, PS_Default)
FiSiphonTee2 := TeeF([
    Fi_origin[0] + T_FiWall + SocketDepth(ND_FiSiphon);
    Fi_origin[1] + T_ConcreteMin + ConRadius(ND_FiSiphon);
    Z_FiSiphonCoupling
], [90; 0; 90]*deg, ND_FiSiphon, PS_Default)
Z_FiSiphonPipe4End := Z_FiBwBottom + 10 cm
FiSiphonPipe4 := PipeF([
    Fi_origin[0] + T_FiWall + SocketDepth(ND_FiSiphon) + ShortTeeLength(ND_FiSiphon);
    Fi_origin[1] + T_ConcreteMin + ConRadius(ND_FiSiphon);
    Z_FiSiphonCoupling - ShortTeeLength(ND_FiSiphon)
], Z_FiSiphonCoupling - ElbowRadius(ND_FiSiphon) - ShortTeeLength(ND_FiSiphon) - Fi_origin[2], [0; -90]*deg, ND_FiSiphon, PS_Default)
FiSiphonElbow0 := ElbowF([
    Fi_origin[0] + T_FiWall + SocketDepth(ND_FiSiphon) + ShortTeeLength(ND_FiSiphon) + ElbowRadius(ND_FiSiphon);
    Fi_origin[1] + T_ConcreteMin + ConRadius(ND_FiSiphon);
    Fi_origin[2]
], [90; 0; 270]*deg, ND_FiSiphon, PS_Default)
FiSiphonPipe5 := PipeF([
    Fi_origin[0] + T_FiWall + SocketDepth(ND_FiSiphon) + ShortTeeLength(ND_FiSiphon) + ElbowRadius(ND_FiSiphon) + L_FiSiphonPipeBottom;
    Fi_origin[1] + T_ConcreteMin + ConRadius(ND_FiSiphon);
    Fi_origin[2]
], L_FiSiphonPipeBottom, [0; 0], ND_FiSiphon, PS_Default)
FiSiphonElbow01 := ElbowF([
    Fi_origin[0] + T_FiWall + SocketDepth(ND_FiSiphon) + ShortTeeLength(ND_FiSiphon) + ElbowRadius(ND_FiSiphon) + L_FiSiphonPipeBottom;
    Fi_origin[1] + T_ConcreteMin + ConRadius(ND_FiSiphon);
    Fi_origin[2]
], [270; 0; 90]*deg, ND_FiSiphon, PS_Default)
FiSiphonChannelPipe := PipeSUBF([
    Fi_origin[0] + T_FiWall + SocketDepth(ND_FiSiphon) + ShortTeeLength(ND_FiSiphon) + 2*ElbowRadius(ND_FiSiphon) + L_FiSiphonPipeBottom;
    Fi_origin[1] + T_ConcreteMin + ConRadius(ND_FiSiphon);
    Fi_origin[2] + ElbowRadius(ND_FiSiphon)
], Z_FiBwBottom - CouplingLength(ND_FiSiphon) + SocketDepth(ND_FiSiphon) - (Fi_origin[2] + ElbowRadius(ND_FiSiphon)), [0; 90]*deg, ND_FiSiphon, PS_Default, ["FiBwBoxCon"])
# Siphon Air Valve
FiSiphonReducerCyl1 := CylinderF([
    Fi_origin[0] + T_FiWall + SocketDepth(ND_FiSiphon) + ShortTeeLength(ND_FiSiphon);
    Fi_origin[1] + T_ConcreteMin + ConRadius(ND_FiSiphon);
    Z_FiSiphonCoupling + ShortTeeLength(ND_FiSiphon)
], outerradius(ND_FiSiphon), SocketDepth(ND_FiSiphon), [0; 90]*deg)
LayerFiSiphonFreeze := FreezeLayer("FiSiphonPlu")
FiSiphonReducerCyl2 := CylinderF([
    Fi_origin[0] + T_FiWall + SocketDepth(ND_FiSiphon) + ShortTeeLength(ND_FiSiphon);
    Fi_origin[1] + T_ConcreteMin + ConRadius(ND_FiSiphon);
    Z_FiSiphonCoupling + ShortTeeLength(ND_FiSiphon)
], outerradius(ND_FiSiphonAirValve), SocketDepth(ND_FiSiphon), [0; 90]*deg)
FiSiphonReducerGroup := GroupLast("DeleteMe")
FiSiphonReducerSubtract := SubtractF(["FiSiphonPlu"], "DeleteMe")
# maybe don't need this pipe?
FiSiphonAirPipe1 := PipeF([
    Fi_origin[0] + T_FiWall + SocketDepth(ND_FiSiphon) + ShortTeeLength(ND_FiSiphon);
    Fi_origin[1] + T_ConcreteMin + ConRadius(ND_FiSiphon);
    Z_FiSiphonCoupling + ShortTeeLength(ND_FiSiphon)
], Fi_origin[2] + H_Fi - (Z_FiSiphonCoupling + ShortTeeLength(ND_FiSiphon)), [0; 90]*deg, ND_FiSiphonAirValve, PS_Default)
FiSiphonAirValve := insertdwg("MetalBallValve", [
    Fi_origin[0] + T_FiWall + SocketDepth(ND_FiSiphon) + ShortTeeLength(ND_FiSiphon);
    Fi_origin[1] + T_ConcreteMin + ConRadius(ND_FiSiphon);
    Z_FiSiphonCoupling + ShortTeeLength(ND_FiSiphon) + SocketDepth(ND_FiSiphon)
], 2*outerradius(ND_FiSiphonAirValve)*1/(125 in), 2*outerradius(ND_FiSiphonAirValve)*1/(125 in), 0 deg)
FiSiphonSelectLayer := SelectLayer("FiSiphonPlu")
FiSiphonAirValveReducer := stack(FiSiphonReducerCyl1, LayerFiSiphonFreeze, FiSiphonReducerCyl2, FiSiphonReducerGroup, FiSiphonReducerSubtract, FiSiphonSelectLayer, FiSiphonAirValve)
FiSiphonScript := stack(LayerFiCoulingsThaw, FiSiphonCoupling, FiSiphonChannelCoupling, LayerFiCouplingsFreeze, LayerFiSiphon, FiSiphonManifold1, FiSiphonManifold2, FiSiphonManifoldCap1, FiSiphonManifoldCap2, FiSiphonTee, FreezeFiSiphon, FiSiphonOrifices, GroupDelete, SubtractFiSiphonManOrifices, SelectFiSiphon, FirstFiSiphonManOrifice, GroupDelete, SubtractFiSiphonManOrifices, SelectFiSiphon, FiSiphonElbow0, FiSiphonPipe1, FiSiphonElbow1, FiSiphonElbow01, FiSiphonPipe2, FiSiphonPipe5, FiSiphonChannelPipe, FiSiphonPipe3, FiSiphonTee2, FiSiphonPipe4, FiSiphonAirValveReducer, LayerFiSiphonFreeze)
mirror3 := Mirror3dGroup("pipes", "y", [Fi_origin[0]; Fi_origin[1] - T_PlantWall; Fi_origin[2]], "n")
mirror4 := Mirror3dGroup("SRSF filters", "y", [Fi_origin[0]; Fi_origin[1] - T_PlantWall; Fi_origin[2]], "n")
FiScript := stack(FiTankScript, FiKeyPipeScript, FiTankCouplingScript, FiManifoldScript, FiSiphonScript)
# Entrance and Exit Box Script
# Tanks
FiLayerFiEntExBoxes := layer_new("FiEntexitboxesCon", ltgrey)
FiExitBox := Tank(FiExitBox_origin + [0 m; 0 m; H_FiExit - FiExitBox_dim[2]], FiExitBox_dim, T_PlantWall)
FiEntBox := Tank(FiEntranceBox_origin + [0 m; 0 m; H_FiEntrance - FiEntranceBox_dim[2]], FiEntranceBox_dim, T_PlantWall)
FiLayerFiEntExBoxesFreeze := FreezeLayer("FiEntexitboxesCon")
FiAirRemovalBlockSlot := BoxF([
    FiEntranceBox_origin[0] - L_FiEntrance + L_FiOverflowWeir;
    FiEntranceBox_origin[1] - T_ConcreteMin;
    Z_FiAirRemovalBlockBottom
], [
    FiEntranceBox_origin[0] - L_FiEntrance + L_FiOverflowWeir;
    FiEntranceBox_origin[1] + T_ConcreteMin;
    Z_FiEntranceBottom + H_FiEntrance
] + [W_FiAirRemovalBlock; W_FiEntrance; 0], [0; 0; 0])
FiSubtractEntExWeirs := SubtractF(["FiEntexitboxesCon"], "DeleteMe")
FiBaffleLayer := layer_new("FiBaffles", ltgrey)
FiBaffle := BoxSUBF([FiEntranceBox_origin[0]; FiEntranceBox_origin[1] - T_ConcreteMin; Z_FiEntranceBottom] + [-S_FiEntranceBaffle; 0; S_FiEntranceBaffle], [FiEntranceBox_origin[0]; FiEntranceBox_origin[1]; Z_FiEntranceBottom] + [-S_FiEntranceBaffle - T_SedWeir; W_FiEntrance + T_ConcreteMin; H_FiEntrance], [0; 0; 0], ["FiEntexitboxesCon"])
FiAirRemovalBlock := BoxF([
    FiEntranceBox_origin[0] - S_FiEntranceBaffle - T_SedWeir - S_FiBaffleToBlock;
    FiEntranceBox_origin[1] - T_ConcreteMin;
    Z_FiAirRemovalBlockBottom
], [
    FiEntranceBox_origin[0] - S_FiEntranceBaffle - 2*T_SedWeir - S_FiBaffleToBlock;
    FiEntranceBox_origin[1] + T_ConcreteMin + W_FiEntrance;
    Z_FiAirRemovalBlockTop
], [0; 0; 0])
FiBaffleLayerFrz := FreezeLayer("FiBaffles")
FiBaffles := stack(FiBaffleLayer, FiBaffle, FiAirRemovalBlock, FiBaffleLayerFrz)
FiEntExTankScript := stack(FiLayerFiEntExBoxes, FiEntBox, FiExitBox, Union_All, FiLayerFiEntExBoxesFreeze, FiOverflowWeir, FiDistWeir, FiEntWeir, FiAirRemovalBlockSlot, GroupDelete, FiSubtractEntExWeirs, FiBaffles)
# Couplings
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# This will be the pipe layout in the entrance and exit boxes to allow for 2 90 degree elbows in  Pipes 2 and 3 coming from the entrance box (on the right)
FiLayerEntExCoupling := layer_new("FiEntexitcouplingsPlu", green)
FiExCoupling0 := CouplingSUBF(FiExitCoupling0_origin, [0; 90]*deg, ND_FiTrunk, PS_Default, ["FiEntexitboxesCon"])
FiExCoupling1 := CouplingSUBF(FiExitCoupling1_origin, [0; 90]*deg, ND_FiTrunk, PS_Default, ["FiEntexitboxesCon"])
FiExCoupling3 := CouplingSUBF(FiExitCoupling2_origin, [0; 90]*deg, ND_FiTrunk, PS_Default, ["FiEntexitboxesCon"])
FiExCoupling2 := CouplingSUBF(FiExitCoupling3_origin, [0; 90]*deg, ND_FiExitWaste, PS_Default, ["FiEntexitboxesCon"])
FiEntCoupling0 := CouplingSUBF(FiBwInletCoupling_origin, [0; 90]*deg, ND_FiBwTrunk, PS_Default, ["FiEntexitboxesCon"])
FiEntCoupling1 := CouplingSUBF(FiInletCoupling1_origin, [0; 90]*deg, ND_FiTrunk, PS_Default, ["FiEntexitboxesCon"])
FiEntCoupling2 := CouplingSUBF(FiInletCoupling2_origin, [0; 90]*deg, ND_FiTrunk, PS_Default, ["FiEntexitboxesCon"])
FiEntCoupling3 := CouplingSUBF(FiInletCoupling3_origin, [0; 90]*deg, ND_FiTrunk, PS_Default, ["FiEntexitboxesCon"])
FiLayerFreezeEntExCouplings := FreezeLayer("FiEntexitcouplingsPlu")
mirror5 := Mirror3dGroup("controlcouplings", "y", [Fi_origin[0]; Fi_origin[1] - T_PlantWall; Fi_origin[2]], "n")  # Needs to be checked for N.Fi=2
FiEntExCouplingScript := stack(FiLayerEntExCoupling, FiExCoupling0, FiExCoupling1, FiExCoupling2, FiExCoupling3, FiEntCoupling0, FiEntCoupling1, FiEntCoupling2, FiEntCoupling3, FiLayerFreezeEntExCouplings)
# Pipes
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# This is all of the piping between filter box, entrance and exit
# In means the pipe goes IN TO THE FILTER
# Out means it comes OUT OF THE FILTER
FiLayerFiPlu := layer_new("FiPlu", blue)
Z_FiInPipe0aStart := FiEntranceBox_origin[2] - CouplingLength(ND_FiBwTrunk) + SocketDepth(ND_FiBwTrunk)
Z_FiInPipe0aEnd := Fi_origin[2] + ConRadius(ND_FiBwManBranch) + ShortTeeLength(ND_FiBwTrunk)
FiInPipe0a := PipeSUBF(FiBwInletCoupling_origin, FiBwInletCoupling_origin[2] - Z_FiInPipe0aEnd, [0; 270]*deg, ND_FiBwTrunk, PS_Default, ["FiEntexitboxesCon"])
FiInTee0a := TeeF([FiBwInletCoupling_origin[0]; FiBwInletCoupling_origin[1]; Z_FiInPipe0aEnd], [0; 0; 90]*deg, ND_FiBwTrunk, PS_Default)
X_FiBwTrunkPipeEnd := Fi_origin[0] + CouplingLength(ND_FiBwTrunk) - SocketDepth(ND_FiBwTrunk)
FiInPipe0b := PipeSUBF([
    FiBwInletCoupling_origin[0] - ShortTeeLength(ND_FiBwTrunk);
    FiBwInletCoupling_origin[1];
    Z_FiInPipe0aEnd - ShortTeeLength(ND_FiBwTrunk)
], FiBwInletCoupling_origin[0] - ShortTeeLength(ND_FiBwTrunk) - X_FiBwTrunkPipeEnd, [0; 0]*deg, ND_FiBwTrunk, PS_Default, ["FiTankCon"])
FiInReducerLarge := CylinderF([
    FiBwInletCoupling_origin[0] + ShortTeeLength(ND_FiBwTrunk) + 10 cm;
    FiBwInletCoupling_origin[1];
    Z_FiInPipe0aEnd - ShortTeeLength(ND_FiBwTrunk)
], innerdiameter(ND_FiBwTrunk, PS_Default)/2, 10 cm, [0; 0]*deg)
FiInReducerSmall := CylinderF([
    FiBwInletCoupling_origin[0] + ShortTeeLength(ND_FiBwTrunk) + 2*10*cm;
    FiBwInletCoupling_origin[1];
    Z_FiInPipe0aEnd - ShortTeeLength(ND_FiBwTrunk)
], innerdiameter(3 in, PS_Default)/2, 10 cm, [0; 0]*deg)
FiInValve := insertdwg("VAL-Scaled-Gate-Valve-Threaded", [
    FiBwInletCoupling_origin[0] + ShortTeeLength(ND_FiBwTrunk) + 2*10*cm + 0.6*ValveLength(3 in);
    FiBwInletCoupling_origin[1];
    Z_FiInPipe0aEnd - ShortTeeLength(ND_FiBwTrunk)
], 3 in/(1.16 m), 3 in/(1.16 m), 0 deg)
# The valve length and socket functions are not returning the correct numbers, so for now, I am arbitrarily setting the valve over by 60% of its length as returned by the function
FiIn0Script := stack(FiInPipe0a, FiInTee0a, FiInPipe0b, FiInReducerLarge, FiInReducerSmall, FiInReducerLarge, FiInReducerSmall, FiInValve)
Z_FiInPipe1aEnd := Fi_origin[2] + ConRadius(ND_FiBwManBranch) + ElbowRadius(ND_FiTrunk) + 2*H_FiLayer
FiInPipe1a := PipeSUBF(FiInletCoupling1_origin, FiInletCoupling1_origin[2] - Z_FiInPipe1aEnd, [0; 270]*deg, ND_FiTrunk, PS_Default, ["FiEntexitboxesCon"])
FiInElbow1a := ElbowF([FiInletCoupling1_origin[0]; FiInletCoupling1_origin[1]; Z_FiInPipe1aEnd], [0; 0; -90]*deg, ND_FiTrunk, PS_Default)
X_FiTrunkPipeEnd := Fi_origin[0] + CouplingLength(ND_FiTrunk) - SocketDepth(ND_FiTrunk)
FiInPipe1b := PipeSUBF([
    FiInletCoupling1_origin[0] - ElbowRadius(ND_FiTrunk);
    FiBwInletCoupling_origin[1];
    Z_FiInPipe1aEnd - ElbowRadius(ND_FiTrunk)
], FiInletCoupling1_origin[0] - ElbowRadius(ND_FiTrunk) - X_FiTrunkPipeEnd, [0; 0]*deg, ND_FiTrunk, PS_Default, ["FiTankCon"])
FiIn1Script := stack(FiInPipe1a, FiInElbow1a, FiInPipe1b)
Z_FiInPipe2aEnd := Z_FiInPipe1aEnd + 2*H_FiLayer
FiInPipe2a := PipeSUBF(FiInletCoupling2_origin, FiInletCoupling2_origin[2] - Z_FiInPipe2aEnd, [0; 270]*deg, ND_FiTrunk, PS_Default, ["FiEntexitboxesCon"])
FiInElbow2a := ElbowF([FiInletCoupling2_origin[0]; FiInletCoupling2_origin[1]; Z_FiInPipe2aEnd], [0; 0; -90]*deg, ND_FiTrunk, PS_Default)
X_FiInPipe2bEnd := FiExitCoupling1_origin[0] - ConRadius(ND_FiTrunk) - T_ConcreteMin  # Gives 5 cm of clearance plus the elbow radius
FiInPipe2b := PipeF([
    FiInletCoupling2_origin[0] - ElbowRadius(ND_FiTrunk);
    FiInletCoupling2_origin[1];
    Z_FiInPipe2aEnd - ElbowRadius(ND_FiTrunk)
], FiInletCoupling2_origin[0] - ElbowRadius(ND_FiTrunk) - X_FiInPipe2bEnd, [0; 0]*deg, ND_FiTrunk, PS_Default)
FiInElbow2b := ElbowF([X_FiInPipe2bEnd; FiInletCoupling2_origin[1]; Z_FiInPipe2aEnd - ElbowRadius(ND_FiTrunk)], [-90; 180; 0]*deg, ND_FiTrunk, PS_Default)
Y_FiInPipe2cEnd := Fi_origin[1] + W_Fi - ConRadius(ND_FiBwTrunk) - ElbowRadius(ND_FiTrunk)  # This is BwTrunk because the Fi Trunks line up with that one
FiInPipe2c := PipeF([
    X_FiInPipe2bEnd - ElbowRadius(ND_FiTrunk);
    FiInletCoupling2_origin[1] + ElbowRadius(ND_FiTrunk);
    Z_FiInPipe2aEnd - ElbowRadius(ND_FiTrunk)
], Y_FiInPipe2cEnd - (FiInletCoupling2_origin[1] + ElbowRadius(ND_FiTrunk)), [-90; 0]*deg, ND_FiTrunk, PS_Default)
FiInElbow2c := ElbowF([
    X_FiInPipe2bEnd - ElbowRadius(ND_FiTrunk);
    Y_FiInPipe2cEnd;
    Z_FiInPipe2aEnd - ElbowRadius(ND_FiTrunk)
], [0; 0; 0]*deg, ND_FiTrunk, PS_Default)
FiInPipe2d := PipeSUBF([
    X_FiInPipe2bEnd - 2*ElbowRadius(ND_FiTrunk);
    Y_FiInPipe2cEnd + ElbowRadius(ND_FiTrunk);
    Z_FiInPipe2aEnd - ElbowRadius(ND_FiTrunk)
], X_FiInPipe2bEnd - 2*ElbowRadius(ND_FiTrunk) - X_FiTrunkPipeEnd, [0; 0]*deg, ND_FiTrunk, PS_Default, ["FiTankCon"])
FiIn2Script := stack(FiInPipe2a, FiInElbow2a, FiInPipe2b, FiInElbow2b, FiInPipe2c, FiInElbow2c, FiInPipe2d)
Z_FiInPipe3aEnd := Z_FiInPipe2aEnd + 2*H_FiLayer
FiInPipe3a := PipeSUBF(FiInletCoupling3_origin, FiInletCoupling3_origin[2] - Z_FiInPipe3aEnd, [0; 270]*deg, ND_FiTrunk, PS_Default, ["FiEntexitboxesCon"])
FiInElbow3a := ElbowF([FiInletCoupling3_origin[0]; FiInletCoupling3_origin[1]; Z_FiInPipe3aEnd], [0; 0; -90]*deg, ND_FiTrunk, PS_Default)
X_FiInPipe3bEnd := X_FiInPipe2bEnd
FiInPipe3b := PipeF([
    FiInletCoupling3_origin[0] - ElbowRadius(ND_FiTrunk);
    FiInletCoupling3_origin[1];
    Z_FiInPipe3aEnd - ElbowRadius(ND_FiTrunk)
], FiInletCoupling3_origin[0] - ElbowRadius(ND_FiTrunk) - X_FiInPipe3bEnd, [0; 0]*deg, ND_FiTrunk, PS_Default)
FiInElbow3b := ElbowF([X_FiInPipe3bEnd; FiInletCoupling3_origin[1]; Z_FiInPipe3aEnd - ElbowRadius(ND_FiTrunk)], [-90; 180; 0]*deg, ND_FiTrunk, PS_Default)
Y_FiInPipe3cEnd := Y_FiInPipe2cEnd
FiInPipe3c := PipeF([
    X_FiInPipe3bEnd - ElbowRadius(ND_FiTrunk);
    FiInletCoupling3_origin[1] + ElbowRadius(ND_FiTrunk);
    Z_FiInPipe3aEnd - ElbowRadius(ND_FiTrunk)
], Y_FiInPipe3cEnd - (FiInletCoupling3_origin[1] + ElbowRadius(ND_FiTrunk)), [-90; 0]*deg, ND_FiTrunk, PS_Default)
FiInElbow3c := ElbowF([
    X_FiInPipe3bEnd - ElbowRadius(ND_FiTrunk);
    Y_FiInPipe3cEnd;
    Z_FiInPipe3aEnd - ElbowRadius(ND_FiTrunk)
], [0; 0; 0]*deg, ND_FiTrunk, PS_Default)
FiInPipe3d := PipeSUBF([
    X_FiInPipe3bEnd - 2*ElbowRadius(ND_FiTrunk);
    Y_FiInPipe3cEnd + ElbowRadius(ND_FiTrunk);
    Z_FiInPipe3aEnd - ElbowRadius(ND_FiTrunk)
], X_FiInPipe3bEnd - 2*ElbowRadius(ND_FiTrunk) - X_FiTrunkPipeEnd, [0; 0]*deg, ND_FiTrunk, PS_Default, ["FiTankCon"])
FiIn3Script := stack(FiInPipe3a, FiInElbow3a, FiInPipe3b, FiInElbow3b, FiInPipe3c, FiInElbow3c, FiInPipe3d)
Z_FiOutPipe0aEnd := Z_FiInPipe1aEnd + H_FiLayer
FiOutPipe0a := PipeSUBF(FiExitCoupling0_origin, FiExitCoupling0_origin[2] - Z_FiOutPipe0aEnd, [0; -90]*deg, ND_FiTrunk, PS_Default, ["FiEntexitboxesCon"])
FiOutElbow0a := ElbowF([FiExitCoupling0_origin[0]; FiExitCoupling0_origin[1]; Z_FiOutPipe0aEnd], [0; 0; -90]*deg, ND_FiTrunk, PS_Default)
FiOutPipe0b := PipeSUBF([
    FiExitCoupling0_origin[0] - ElbowRadius(ND_FiTrunk);
    FiExitCoupling0_origin[1];
    Z_FiOutPipe0aEnd - ElbowRadius(ND_FiTrunk)
], FiExitCoupling0_origin[0] - ElbowRadius(ND_FiTrunk) - X_FiTrunkPipeEnd, [0; 0]*deg, ND_FiTrunk, PS_Default, ["FiTankCon"])
FiOut0Script := stack(FiOutPipe0a, FiOutElbow0a, FiOutPipe0b)
Z_FiOutPipe1aEnd := Z_FiOutPipe0aEnd + 2*H_FiLayer
FiOutPipe1a := PipeSUBF(FiExitCoupling1_origin, FiExitCoupling1_origin[2] - Z_FiOutPipe1aEnd, [0; -90]*deg, ND_FiTrunk, PS_Default, ["FiEntexitboxesCon"])
FiOutElbow1a := ElbowF([FiExitCoupling1_origin[0]; FiExitCoupling1_origin[1]; Z_FiOutPipe1aEnd], [0; 0; -90]*deg, ND_FiTrunk, PS_Default)
FiOutPipe1b := PipeSUBF([
    FiExitCoupling1_origin[0] - ElbowRadius(ND_FiTrunk);
    FiExitCoupling1_origin[1];
    Z_FiOutPipe1aEnd - ElbowRadius(ND_FiTrunk)
], FiExitCoupling1_origin[0] - ElbowRadius(ND_FiTrunk) - X_FiTrunkPipeEnd, [0; 0]*deg, ND_FiTrunk, PS_Default, ["FiTankCon"])
FiOut1Script := stack(FiOutPipe1a, FiOutElbow1a, FiOutPipe1b)
Z_FiOutPipe2aEnd := Z_FiBwBottom + S_Fitting + ElbowRadius(ND_FiExitWaste) + ConRadius(ND_FiExitWaste)
FiOutPipe2a := PipeSUBF(FiExitCoupling3_origin, FiExitCoupling2_origin[2] - Z_FiOutPipe2aEnd, [0; -90]*deg, ND_FiExitWaste, PS_Default, ["FiEntexitboxesCon"])
FiOutElbow2a := ElbowF([
    FiExitCoupling3_origin[0] + ElbowRadius(ND_FiExitWaste);
    FiExitCoupling3_origin[1];
    Z_FiOutPipe2aEnd - ElbowRadius(ND_FiExitWaste)
], [90; 0; 270]*deg, ND_FiExitWaste, PS_Default)
Z_FiExitHorizDrainPipeStart := Plant_Origin[0] - W_FiBw - CouplingLength(ND_FiExitWaste) + SocketDepth(ND_FiExitWaste)
Z_FiExitHorizDrainPipeEnd := FiExitCoupling3_origin[0] + ElbowRadius(ND_FiExitWaste)
FiExitDrainPipeHoriz := PipeSUBF([
    Plant_Origin[0] - W_FiBw - CouplingLength(ND_FiExitWaste) + SocketDepth(ND_FiExitWaste);
    FiExitCoupling3_origin[1];
    Z_FiOverflowDrainPipeEnd - ElbowRadius(ND_FiEntranceOverflow)
], Z_FiExitHorizDrainPipeStart - Z_FiExitHorizDrainPipeEnd, [0; 0], ND_FiExitWaste, PS_Default, ["FiBwBoxCon"])
FiOut2Script := stack(FiOutPipe2a, FiOutElbow2a, FiExitDrainPipeHoriz)
FiOut3PipeZ := PipeSUBF([
    FiExitCoupling2_origin[0];
    FiExitCoupling2_origin[1];
    Fi_origin[2] + ConRadius(ND_FiBwManBranch) + H_FiLayer + ElbowRadius(ND_FiTrunk)
], FiExitCoupling2_origin[2] - (Fi_origin[2] + ConRadius(ND_FiBwManBranch) + H_FiLayer + ElbowRadius(ND_FiTrunk) + CouplingLength(ND_FiTrunk) - 2*SocketDepth(ND_FiTrunk)), [0; 90]*deg, ND_FiTrunk, PS_Default, ["FiEntexitboxesCon"])
FiOut3PipeX := PipeSUBF([
    FiExitCoupling2_origin[0] - ElbowRadius(ND_FiTrunk);
    FiExitCoupling0_origin[1];
    Fi_origin[2] + ConRadius(ND_FiBwManBranch) + H_FiLayer
], FiExitCoupling2_origin[0] - (Fi_origin[0] + CouplingLength(ND_FiTrunk) - SocketDepth(ND_FiTrunk)) - ElbowRadius(ND_FiTrunk), [0; 0]*deg, ND_FiTrunk, PS_Default, ["FiTankCon"])
FiOut3PipeY := PipeSUBF([
    FiExitCoupling2_origin[0];
    FiExitCoupling2_origin[1] + ElbowRadius(ND_FiTrunk);
    Fi_origin[2] + ConRadius(ND_FiBwManBranch) + H_FiLayer
], FiExitCoupling0_origin[1] - FiExitCoupling2_origin[1] - 2*ElbowRadius(ND_FiTrunk), [270; 0]*deg, ND_FiTrunk, PS_Default, ["FiTankCon"])
FiOut3ElbowYZ := ElbowF([
    FiExitCoupling2_origin[0];
    FiExitCoupling2_origin[1] + ElbowRadius(ND_FiTrunk);
    Fi_origin[2] + ConRadius(ND_FiBwManBranch) + H_FiLayer
], [180; 270; 0]*deg, ND_FiTrunk, PS_Default)
FiOut3ElbowXY := ElbowF([
    FiExitCoupling2_origin[0];
    FiExitCoupling0_origin[1] - ElbowRadius(ND_FiTrunk);
    Fi_origin[2] + ConRadius(ND_FiBwManBranch) + H_FiLayer
], [0; 0; 0]*deg, ND_FiTrunk, PS_Default)
FiOut3Script := stack(FiOut3PipeZ, FiOut3PipeX, FiOut3PipeY, FiOut3ElbowYZ, FiOut3ElbowXY)
FiLayerFreezeFiPlu := FreezeLayer("FiPlu")
FiEntExitPipingScript := stack(FiLayerFiPlu, FiIn0Script, FiIn1Script, FiIn2Script, FiIn3Script, FiOut0Script, FiOut1Script, FiOut2Script, FiOut3Script, FiLayerFreezeFiPlu)
mirror6 := Mirror3dGroup("controlpipes", "y", [Fi_origin[0]; Fi_origin[1] - T_PlantWall; Fi_origin[2]], "n")
mirror7 := Mirror3dGroup("SRSF controlboxes", "y", [Fi_origin[0]; Fi_origin[1] - T_PlantWall; Fi_origin[2]], "n")
FiEntExitScript := stack(FiEntExTankScript, FiEntExCouplingScript, FiEntExitPipingScript)
# Sand Drain
# this all needs to be updated to a wye at some point
FiSandDrainPipe_Origin := Fi_origin + [-B_FiManifoldBranch; W_Fi/2; 2*ConRadius(ND_FiBwManBranch)]
L_FiSandDrainPipeVert := H_FiSandOutlet + CapHeight(ND_FiSandOutlet) + B_FiManifoldBranch + T_FiWall + 2*ValveLength(ND_FiSandOutlet)
FiSandDrainPipeLayer := layer_new("FiSandDrainPlu", blue)
DrawFiSandDrainPipeVert := PipeF(FiSandDrainPipe_Origin, L_FiSandDrainPipeVert, [0; 90]*deg, ND_FiSandOutlet, PS_Default)
L_FiSandDrainPipeAngled := sqrt(2)*(2*outerradius(ND_FiSandOutlet) + B_FiManifoldBranch + T_FiWall + 2*ValveLength(ND_FiSandOutlet) - (ValveLength(ND_FiSandOutlet) + ValveSocket(ND_FiSandOutlet))/sqrt(2))
DrawFiSandDrainPipeAngled := PipeSUBF([
    FiSandDrainPipe_Origin[0] + (B_FiManifoldBranch + T_FiWall + 2*ValveLength(ND_FiSandOutlet));
    FiSandDrainPipe_Origin[1];
    Fi_origin[2] + H_FiSandOutlet - (ValveLength(ND_FiSandOutlet) + ValveSocket(ND_FiSandOutlet))/sqrt(2) + 2*outerradius(ND_FiManBranch)
], L_FiSandDrainPipeAngled, [0; 45]*deg, ND_FiSandOutlet, PS_Default, ["FiTank"])
DrawFiOutletCap := CapF([0; 0; L_FiSandDrainPipeVert] + FiSandDrainPipe_Origin, [0; 270]*deg, ND_FiSandOutlet)
DrawFiSandOutletValve := insertdwg("VAL-Scaled-Gate-Valve-Threaded", [
    FiSandDrainPipe_Origin[0] + (B_FiManifoldBranch + T_FiWall + 2*ValveLength(ND_FiSandOutlet)) + (ValveLength(ND_FiSandOutlet) - ValveSocket(ND_FiSandOutlet))/sqrt(2);
    FiSandDrainPipe_Origin[1];
    Fi_origin[2] + H_FiSandOutlet - (ValveLength(ND_FiSandOutlet) + ValveSocket(ND_FiSandOutlet))/sqrt(2) + 2*outerradius(ND_FiManBranch) - (ValveLength(ND_FiSandOutlet) - ValveSocket(ND_FiSandOutlet))/sqrt(2)
], 2*outerradius(ND_FiSandOutlet)/(1.16 m), 2*outerradius(ND_FiSandOutlet)/(1.16 m), 0 deg)
RotateFiSandOutletValve := Rotate3DLast([
    FiSandDrainPipe_Origin[0] + (B_FiManifoldBranch + T_FiWall + 2*ValveLength(ND_FiSandOutlet)) + (ValveLength(ND_FiSandOutlet) - ValveSocket(ND_FiSandOutlet))/sqrt(2);
    FiSandDrainPipe_Origin[1];
    Fi_origin[2] + H_FiSandOutlet - (ValveLength(ND_FiSandOutlet) + ValveSocket(ND_FiSandOutlet))/sqrt(2) + 2*outerradius(ND_FiManBranch) - (ValveLength(ND_FiSandOutlet) - ValveSocket(ND_FiSandOutlet))/sqrt(2)
], "y", 45 deg)
FreezeFiSandDrain := FreezeLayer("FiSandDrainPlu")
FiSandDrainScript := stack(FiSandDrainPipeLayer, DrawFiSandDrainPipeVert, DrawFiSandDrainPipeAngled, DrawFiOutletCap, DrawFiSandOutletValve, RotateFiSandOutletValve, FreezeFiSandDrain)
# Inlet Channel Plumbing
L_FiInletYChannelPipe := max(0, Et_Origin[1] - W_Fi - T_PlantWall - W_EtWalkway - T_FiWall - Fi_origin[1] + (Plant_Origin[1] - max((W_Fi + T_FiWall)*N_Fi, (2*W_FiEntrance + W_FiOverflow + 4*T_PlantWall)*ceil(N_Fi/2) - T_PlantWall + (W_Fi - W_FiOverflow/2 - T_PlantWall - W_FiEntrance + T_FiWall/2))) - ElbowRadius(ND_FiEntrancePipe) - CouplingLength(ND_FiEntrancePipe) + SocketDepth(ND_FiEntrancePipe) - SedOutletCoupling_Origin[1])
FiInletCouplingLayer := layer_new("FiInletChannelFittingsPlu", green)
FiInletCoupling := CouplingSUBF(FiChannelCoupling_Origin, [
    {
        90 if L_FiInletYChannelPipe > 0
        0 otherwise
    };
    0
]*deg, ND_FiEntrancePipe, PS_Default, ["FiInletchannelCon"])
FiInletElbow := ElbowF(FiChannelCoupling_Origin - [0; L_FiInletYChannelPipe + CouplingLength(ND_FiEntrancePipe) - 2*SocketDepth(ND_FiEntrancePipe); 0], [180; 0; 0]*deg, ND_FiEntrancePipe, PS_Default)
FiInletCouplingFrz := FreezeLayer("FiInletChannelFittingsPlu")
L_FiInletChannelXPipe := Plant_Origin[0] - FiChannelCoupling_Origin[0] + T_PlantWall - (ElbowRadius(ND_FiEntrancePipe)*(L_FiInletYChannelPipe > 0) - ConRadius(ND_FiEntrancePipe) - S_Fitting - ElbowRadius(ND_FiEntrancePipe))
FiInletChannelPipeLayer := layer_new("FiInletChannelPipePlu", blue)
FiInletChannelYPipe := PipeSUBF(FiChannelCoupling_Origin - [0; CouplingLength(ND_FiEntrancePipe) - 2*SocketDepth(ND_FiEntrancePipe); 0], L_FiInletYChannelPipe, [90; 0]*deg, ND_FiEntrancePipe, PS_Default, ["FiInletchannelCon"])
FiInletHorizPipeStart := SedOutletElbow1_Origin[0] - ElbowRadius(ND_FiEntrancePipe)
FiInletHorizPipeEnd := Plant_Origin[0] - L_Sed - 2*T_ChannelWall - W_DC + CouplingLength(ND_FiEntrancePipe) - SocketDepth(ND_FiEntrancePipe)
FiInletChannelXPipe := PipeSUBF([
    Plant_Origin[0] + CouplingLength(ND_FiEntrancePipe) - SocketDepth(ND_FiEntrancePipe) + (FiInletHorizPipeStart - FiInletHorizPipeEnd);
    -(L_FiInletYChannelPipe + ElbowRadius(ND_FiEntrancePipe)*(L_FiInletYChannelPipe > 0) + (L_FiInletYChannelPipe > 0)*(CouplingLength(ND_FiEntrancePipe) - 2*SocketDepth(ND_FiEntrancePipe))) + FiChannelCoupling_Origin[1];
    FiChannelCoupling_Origin[2]
], FiInletHorizPipeStart - FiInletHorizPipeEnd, [0; 0]*deg, ND_FiEntrancePipe, PS_Default, ["FiInletchannelCon"])
FiInletChannelPipeFrz := FreezeLayer("FiInletChannelPipePlu")
FiChannelPlumbing :=
    stack(FiInletCouplingLayer, FiInletCoupling, FiInletCouplingFrz, FiInletChannelPipeLayer, FiInletChannelXPipe, FiInletChannelPipeFrz) if L_FiInletYChannelPipe ≤ 0
    stack(FiInletCouplingLayer, FiInletCoupling, FiInletElbow, FiInletCouplingFrz, FiInletChannelPipeLayer, FiInletChannelXPipe, FiInletChannelYPipe, FiInletChannelPipeFrz) otherwise
# Mirror and Array the Filter
ThawFilter := ThawMultiple(["Fi*"])
FiMirrorFrzArray :=
    ["FiAuxPlu"; "FiCouplingPlu"; "FiOverflowCon"; "FiInletchannelCon"] if N_Fi > 1
    ["FiAuxPlu"; "FiCouplingPlu"; "FiOverflowCon"; "FiInletchannelCon"; "FiBwBoxCon"] otherwise
FreezeFiPieces := FreezeMultiple(FiMirrorFrzArray)
MirrorFilter := Mirror3dAll("zx", [0 m; min(Fi_origin[1] - T_FiWall/2, FiEntranceBox_origin[1] - T_PlantWall - W_FiOverflow/2)], "n")
# ThawFilter
FreezeFiInletChannel := FreezeMultiple(["FiInletChannelCon"])
ArrayFilter := array_all(N_Fi/2, 1, -max(2*(Fi_origin[1] - min(Fi_origin[1] - T_FiWall/2, FiEntranceBox_origin[1] - T_PlantWall - W_FiOverflow/2) + W_Fi) + 1.5*T_FiWall, 2*(FiEntranceBox_origin[1] - min(Fi_origin[1] - T_FiWall/2, FiEntranceBox_origin[1] - T_PlantWall - W_FiOverflow/2) + W_FiEntrance) + 1.5*T_PlantWall))
UnionFiBw := stack(FreezeMultiple(["~FiBwBoxCon"]), Union_All, FreezeLayer("FiBwBoxCon"))
FreezeRestFi := FreezeMultiple(["Fi*"])
FiMirrorScript := stack(ThawFilter, FreezeFiPieces, MirrorFilter)
Tank([
    Plant_Origin[0];
    {
        (min(Fi_origin[1] - T_FiWall/2, FiEntranceBox_origin[1] - T_PlantWall - W_FiOverflow/2) - L_FiBwWeir/2) if N_Fi > 1
        (0.5*(max(Fi_origin[1] + 2*(T_ConcreteMin + ConRadius(ND_FiSiphon)), FiEntranceBox_origin[1] + 2*(T_ConcreteMin + ConRadius(ND_FiTrunk))) + min(Fi_origin[1] - T_FiWall/2, FiEntranceBox_origin[1] - T_PlantWall - W_FiOverflow/2)) - L_FiBwWeir/2) otherwise
    };
    Z_FiBwBottom
], [W_FiBw; L_FiBwWeir; H_FiBw], T_PlantWall)
# backwash drain
# Just setting the drain size to be that of the exit box drain, since it probably doesn't need to drain very fast or very often.
FiBwDrainLayer := layer_new("FiBwDrain", blue)
FiBwDrainCouplingVert := CouplingSUBF([
    Plant_Origin[0] + T_ChannelWall - max(CouplingLength(ND_FiExitWaste), T_ChannelWall) - SocketDepth(ND_FiExitWaste) - ElbowRadius(ND_FiExitWaste);
    {
        min(Fi_origin[1] - T_FiWall/2, FiEntranceBox_origin[1] - T_PlantWall - W_FiOverflow/2) if N_Fi > 1
        (0.5*(max(Fi_origin[1] + 2*(T_ConcreteMin + ConRadius(ND_FiSiphon)), FiEntranceBox_origin[1] + 2*(T_ConcreteMin + ConRadius(ND_FiTrunk))) + min(Fi_origin[1] - T_FiWall/2, FiEntranceBox_origin[1] - T_PlantWall - W_FiOverflow/2))) otherwise
    };
    Z_FiBwBottom - SocketDepth(ND_FiExitWaste)
], [0; 270 deg], ND_FiExitWaste, PS_Default, ["FiBwBoxCon"])
FiBwDrainPipeVert := PipeSUBF([
    Plant_Origin[0] + T_ChannelWall - max(CouplingLength(ND_FiExitWaste), T_ChannelWall) - SocketDepth(ND_FiExitWaste) - ElbowRadius(ND_FiExitWaste);
    {
        min(Fi_origin[1] - T_FiWall/2, FiEntranceBox_origin[1] - T_PlantWall - W_FiOverflow/2) if N_Fi > 1
        (0.5*(max(Fi_origin[1] + 2*(T_ConcreteMin + ConRadius(ND_FiSiphon)), FiEntranceBox_origin[1] + 2*(T_ConcreteMin + ConRadius(ND_FiTrunk))) + min(Fi_origin[1] - T_FiWall/2, FiEntranceBox_origin[1] - T_PlantWall - W_FiOverflow/2))) otherwise
    };
    Z_FiBwBottom + SocketDepth(ND_FiExitWaste) - CouplingLength(ND_FiExitWaste)
], 2*SocketDepth(ND_FiExitWaste) + max(T_ChannelWall - CouplingLength(ND_FiExitWaste), 0), [0; 270 deg], ND_FiExitWaste, PS_Default, ["FiBwBoxCon"])
FiBwDrainElbowHoriz := ElbowF([
    Plant_Origin[0] + T_ChannelWall - max(CouplingLength(ND_FiExitWaste), T_ChannelWall) - SocketDepth(ND_FiExitWaste) - ElbowRadius(ND_FiExitWaste);
    {
        min(Fi_origin[1] - T_FiWall/2, FiEntranceBox_origin[1] - T_PlantWall - W_FiOverflow/2) if N_Fi > 1
        (0.5*(max(Fi_origin[1] + 2*(T_ConcreteMin + ConRadius(ND_FiSiphon)), FiEntranceBox_origin[1] + 2*(T_ConcreteMin + ConRadius(ND_FiTrunk))) + min(Fi_origin[1] - T_FiWall/2, FiEntranceBox_origin[1] - T_PlantWall - W_FiOverflow/2))) otherwise
    };
    Z_FiBwBottom - SocketDepth(ND_FiExitWaste) - ElbowRadius(ND_FiExitWaste)
], [180 deg; 0; 90 deg], ND_FiExitWaste, PS_Default)
FiBwDrainPipeHoriz := PipeF([
    Plant_Origin[0] + T_ChannelWall - CouplingLength(ND_FiExitWaste) + SocketDepth(ND_FiExitWaste);
    {
        min(Fi_origin[1] - T_FiWall/2, FiEntranceBox_origin[1] - T_PlantWall - W_FiOverflow/2) if N_Fi > 1
        (0.5*(max(Fi_origin[1] + 2*(T_ConcreteMin + ConRadius(ND_FiSiphon)), FiEntranceBox_origin[1] + 2*(T_ConcreteMin + ConRadius(ND_FiTrunk))) + min(Fi_origin[1] - T_FiWall/2, FiEntranceBox_origin[1] - T_PlantWall - W_FiOverflow/2))) otherwise
    };
    Z_FiBwBottom - max(T_PlantWall, CouplingLength(ND_FiExitWaste)) - SocketDepth(ND_FiExitWaste) - ElbowRadius(ND_FiExitWaste)
], 2*SocketDepth(ND_FiExitWaste) + max(T_PlantWall - CouplingLength(ND_FiExitWaste)), [0; 0], ND_FiExitWaste, PS_Default)
FiBwDrainCouplingHoriz := CouplingF([
    Plant_Origin[0] + T_ChannelWall - SocketDepth(ND_FiExitWaste);
    {
        min(Fi_origin[1] - T_FiWall/2, FiEntranceBox_origin[1] - T_PlantWall - W_FiOverflow/2) if N_Fi > 1
        (0.5*(max(Fi_origin[1] + 2*(T_ConcreteMin + ConRadius(ND_FiSiphon)), FiEntranceBox_origin[1] + 2*(T_ConcreteMin + ConRadius(ND_FiTrunk))) + min(Fi_origin[1] - T_FiWall/2, FiEntranceBox_origin[1] - T_PlantWall - W_FiOverflow/2))) otherwise
    };
    Z_FiBwBottom - max(T_PlantWall, CouplingLength(ND_FiExitWaste)) - SocketDepth(ND_FiExitWaste) - ElbowRadius(ND_FiExitWaste)
], [0; 0], ND_FiExitWaste, PS_Default)
FreezeFiBwDrain := FreezeLayer("FiBwDrain")
FiBwDrain := stack(FiBwDrainLayer, FiBwDrainCouplingVert, FiBwDrainPipeVert, FiBwDrainElbowHoriz, FiBwDrainPipeHoriz, FiBwDrainCouplingHoriz, FreezeFiBwDrain)
# distribution piping
FiDistPipingLayer := layer_new("FiDistPipingPlu", blue)
FiDistPipe1 := PipeSUBF([
    FiExitBox_origin[0] - L_FiExit/2;
    min(Fi_origin[1] - T_FiWall/2, FiEntranceBox_origin[1] - T_PlantWall - W_FiOverflow/2);
    Z_FiOverflowBottom - CouplingLength(ND_DistPipe) + SocketDepth(ND_DistPipe)
], 2*SocketDepth(ND_DistPipe) + max(0, T_PlantWall - CouplingLength(ND_DistPipe)), [0; 270]*deg, ND_DistPipe, PS_Default, ["FiOverflowCon"])
FiDistElbow := ElbowF([
    FiExitBox_origin[0] - L_FiExit/2 - ElbowRadius(ND_DistPipe)*(N_Fi ≤ 2);
    min(Fi_origin[1] - T_FiWall/2, FiEntranceBox_origin[1] - T_PlantWall - W_FiOverflow/2) - ElbowRadius(ND_DistPipe)*(N_Fi > 2);
    Z_FiOverflowBottom - CouplingLength(ND_DistPipe) - ElbowRadius(ND_DistPipe) - SocketDepth(ND_DistPipe)
], [270*(N_Fi ≤ 2); 90*(N_Fi > 2); 90*(N_Fi ≤ 2)]*deg, ND_DistPipe, PS_Default)
FiDistPipe2 := PipeF([
    FiExitBox_origin[0] - L_FiExit/2;
    min(Fi_origin[1] - T_FiWall/2, FiEntranceBox_origin[1] - T_PlantWall - W_FiOverflow/2) - ElbowRadius(ND_DistPipe);
    Z_FiOverflowBottom - CouplingLength(ND_DistPipe) - ElbowRadius(ND_DistPipe) - SocketDepth(ND_DistPipe)
], max((W_Fi + T_FiWall)*2, 2*W_FiEntrance + W_FiOverflow + 3*T_PlantWall) - ShortTeeLength(ND_DistPipe) - ElbowRadius(ND_DistPipe), [90; 0]*deg, ND_DistPipe, PS_Default)
FiDistTee := TeeF([
    FiExitBox_origin[0] - L_FiExit/2;
    min(Fi_origin[1] - T_FiWall/2, FiEntranceBox_origin[1] - T_PlantWall - W_FiOverflow/2) - max((W_Fi + T_FiWall)*2, 2*W_FiEntrance + W_FiOverflow + 3*T_PlantWall);
    Z_FiOverflowBottom - CouplingLength(ND_DistPipe) - ElbowRadius(ND_DistPipe) - SocketDepth(ND_DistPipe) + ShortTeeLength(ND_DistPipe)
], [90; 90; 0]*deg, ND_DistPipe, PS_Default)
FiDistPipe3 := PipeSUBF([
    FiExitBox_origin[0] - L_FiExit/2;
    FiExitBox_origin[1] - T_PlantWall - W_FiOverflow/2 - max((W_Fi + T_FiWall)*2, 2*W_FiEntrance + W_FiOverflow + 3*T_PlantWall);
    Z_FiOverflowBottom - CouplingLength(ND_DistPipe) + SocketDepth(ND_DistPipe)
], 2*SocketDepth(ND_DistPipe) + max(0, T_PlantWall - CouplingLength(ND_DistPipe)) + ElbowRadius(ND_DistPipe) - ShortTeeLength(ND_DistPipe), [0; 270]*deg, ND_DistPipe, PS_Default, ["FiOverflowCon"])
FiDistPipingFrz := FreezeLayer("FiDistPipingPlu")
FiDist :=
    stack(FiDistPipingLayer, FiDistPipe1, FiDistElbow, FiDistPipingFrz) if N_Fi < 3
    stack(FiDistPipingLayer, FiDistPipe1, FiDistElbow, FiDistPipe2, FiDistTee, FiDistPipe3, FiDistPipingFrz) otherwise
AC_Filter :=
    stack(FiInletChannelScript, FiAuxScript, FiScript, FiEntExitScript, FiSandDrainScript, FiChannelPlumbing, FiBwDrain, FiDist) if N_Fi == 1
    stack(FiInletChannelScript, FiAuxScript, FiScript, FiEntExitScript, FiSandDrainScript, FiMirrorScript, UnionFiBw, FreezeRestFi, FiChannelPlumbing, FiBwDrain, FiDist) if N_Fi == 2
    stack(FiInletChannelScript, FiAuxScript, FiScript, FiEntExitScript, FiSandDrainScript, FiMirrorScript, UnionFiBw, ThawFilter, FreezeFiInletChannel, ArrayFilter, FreezeRestFi, FiChannelPlumbing, FiBwDrain, FiDist) otherwise
