# Automated Design: AutoCAD: Flocculation Tank
EN_FlocHoriz =  # error: This variable is undefined.
H_FlocOption =  # error
Q_Plant =  # error
# Dimensions
floc_origin := [
    Plant_Origin[0];
    Plant_Origin[1] + N_SedTanks*(W_Sed + T_PlantWall);
    Plant_Origin[2] + (HW_Sed - HW_FlocChannel)
]
totalfloc_dim := [
    L_FlocTank/N_FlocChannels;
    (N_FlocChannels*W_FlocChannel) + ((N_FlocChannels - 1)*T_PlantWall);
    H_Floc
]
wall_dim := [totalfloc_dim[0] + (2*T_PlantWall); T_PlantWall; totalfloc_dim[2]]
L_Sed =  # error
flocport_dim :=
    for i ∈ 0 .. (N_FlocChannels - 2)
        flocport_dim[0, i] ← [W_FlocPort[N_FlocChannels - 2 - i]; T_PlantWall; (-H_FlocPort)[i]]
    return flocport_dim
# Floc ports connect the channels.
channelopening_dim := [W_InletChannelEst; T_PlantWall; (H_Floc - H_Sed) + H_InletChannel + (HW_Sed - HW_FlocChannel)]
# normally want a 30deg slope, unless baffle is too close | set slope to be 5 cm away from nearest baffle
flocdrainslope_dim :=
    [sqrt(3)*H_FlocSlope; -D_FlocValve; -H_FlocSlope] if sqrt(3)*H_FlocSlope < W_FlocPort[0] + S_FlocPortGap - 5 cm
    [W_FlocPort[0] + S_FlocPortGap - 5 cm; -D_FlocValve; -H_FlocSlope] otherwise
Port_Dim := [T_FlocBaffle + 2*zc; L_BafflePort + L_Slot; L_BafflePort]
FlocCoupling_Origin := [
    {
        (floc_origin[0] - outerradius(ND_RMPipe) - S_Fitting) if mod(N_FlocChannels, 2) == 1
        (floc_origin[0] - L_Sed + outerradius(ND_RMPipe) + S_Fitting) otherwise
    };
    floc_origin[1] + N_FlocChannels*W_FlocChannel + T_PlantWall*(N_FlocChannels - 1) + SocketDepth(ND_RMPipe);
    floc_origin[2] + outerradius(ND_RMPipe) + S_Fitting
]
# Origin Points
floc_origin := [
    Plant_Origin[0];
    Plant_Origin[1] + N_SedTanks*(W_Sed + T_PlantWall);
    Plant_Origin[2] + (HW_Sed - HW_FlocChannel)
]
wall_origin :=
    for i ∈ 0 .. (N_FlocChannels - 2)
        wall_origin[0, i] ← [
            floc_origin[0] - totalfloc_dim[0] - T_PlantWall;
            floc_origin[1] + (W_FlocChannel*(1 + i)) + (T_PlantWall*i);
            floc_origin[2]
        ]
    return wall_origin
flocport_origin :=
    for i ∈ 0 .. (N_FlocChannels - 2)
        if mod(i, 2) == 0
            flocport_origin[0, i] ← [
                floc_origin[0] - W_FlocPort[N_FlocChannels - 2 - i];
                floc_origin[1] + (W_FlocChannel*(1 + i)) + (T_PlantWall*i);
                floc_origin[2] + H_FlocPort[i]
            ]
        otherwise
            flocport_origin[0, i] ← [
                floc_origin[0] - totalfloc_dim[0];
                floc_origin[1] + (W_FlocChannel*(1 + i)) + (T_PlantWall*i);
                floc_origin[2] + H_FlocPort[i]
            ]
    return flocport_origin
# The flocport origins were set to start at the top height of the ports themselves (added to the origin otherwise it disappears).  This changes the flocports to be at the bottom of the channel dividing walls instead of at the top (more structurally sound).
flocport_origin =  # error
# The x values were negative. I don't understand how the change in the floc code caused this problem.
# The Channel Opening was changed in the z-direction so that the bottom opening aligned with the bottom of the tank (for the same reason as the flocports).
channelopening_origin := [
    floc_origin[0] - totalfloc_dim[0];
    floc_origin[1] - T_PlantWall;
    floc_origin[2] + totalfloc_dim[2] - channelopening_dim[2]
]
# Flocculation Tank Script
FlocTankTankScript :=
    Local ← stack(layer_new("FlocTank", grey), Tank(floc_origin, totalfloc_dim, T_PlantWall))
    for i ∈ 0 .. (N_FlocChannels - 2)
        Local ← stack(Local, BoxF(wall_origin[0, i], wall_origin[0, i] + wall_dim, [0; 0; 0]*deg))
        Local
    Freeze ← FreezeLayer("FlocTank")
    FlocPorts ← stack(Local, Freeze)
    for i ∈ 0 .. (N_FlocChannels - 2)
        FlocPorts ← stack(FlocPorts, BoxF(flocport_origin[0, i], flocport_origin[0, i] + flocport_dim[0, i], [0; 0; 0]*deg))
    ChannelBox ← BoxF(channelopening_origin, channelopening_origin + channelopening_dim, [0; 0; 0]*deg)
    Final ← stack(FlocPorts, ChannelBox)
    if L_Slot ≠ 0 m
        for j ∈ 0 .. (N_FlocChannels - 1)
            for i ∈ 0 .. (N_FlocChannelBaffles[j] - 1)
                Slot_Origin[i] ← [floc_origin[0] - L_Sed; -L_Slot; floc_origin[2]] + [X_FlocBaffles[i, j]; Y_FlocBaffles[0, j]; Z_FlocBaffles[i, j]]
                Slot_Dim[i] ← [T_FlocBaffle; W_FlocChannel + 2*L_Slot; H_Floc - Z_FlocBaffles[i, j]]
                DrawSlot ← BoxF(Slot_Origin[i], Slot_Origin[i] + Slot_Dim[i], [0; 0; 0]*deg)
                Final ← stack(Final, DrawSlot)
    for i ∈ 0 .. last(Y_FlocDrainValves)
        Wedge ←
            WedgeF([-L_Sed; Y_FlocDrainValves[i] + 0.5*D_FlocValve; floc_origin[2]], flocdrainslope_dim + [-L_Sed; Y_FlocDrainValves[i] + 0.5*D_FlocValve; floc_origin[2]], [0; 0; 0]*deg) if EN_PlantDrains == 0
            WedgeF([Plant_Origin[0]; Y_FlocDrainValves[i] + 0.5*D_FlocValve; floc_origin[2]], [-flocdrainslope_dim[0]; flocdrainslope_dim[1]; flocdrainslope_dim[2]] + [Plant_Origin[0]; Y_FlocDrainValves[i] + 0.5*D_FlocValve; floc_origin[2]], [0; 0; 0]*deg) otherwise
        Final ← stack(Final, Wedge)
    Group ← GroupAll("DeleteMe")
    SubtractComponents ← SubtractF(["FlocTank"], "DeleteMe")
    return stack(Final, Group, SubtractComponents)  # draw the outer tank
# draw the walls separating channels
# draw the ports between floc channels
# draw the channel to the sed tank
# draw the slots for the baffles
# Iterates through all of the drain lcoations and draws a wedge that is as deep as the radius of the valve and as wide as the diameter of the valve, starting at-grade
# draw the drain slopes
FlocTankBaffleScriptV :=
    if EN_FlocHoriz == 0
        Local ← layer_new("Baffle", ltpurple)
        for j ∈ 0 .. (N_FlocChannels - 1)
            for i ∈ 0 .. (N_FlocChannelBaffles[j] - 1)
                Baffle_Origin[i] ← [floc_origin[0] - L_Sed; -L_Slot; floc_origin[2]] + [X_FlocBaffles[i, j]; Y_FlocBaffles[0, j]; Z_FlocBaffles[i, j]]
                Baffle_Dim[i] ← [T_FlocBaffle; W_FlocChannel + 2*L_Slot; L_FlocBaffles[i, j]]
                BaffleBox ← BoxF(Baffle_Origin[i], Baffle_Origin[i] + Baffle_Dim[i], [0; 0; 0]*deg)
                Local ← stack(Local, BaffleBox)
        Freeze ← FreezeLayer("Baffle")
        Local ← stack(Local, Freeze)
        for j ∈ 0 .. (N_FlocChannels - 1)
            for i ∈ 0 .. N_FlocChannelBaffles[j] - 1
                if (mod(i, 2) == 1 and j == N_FlocChannels - 1) or (mod(i, 2) == 0 and j ≠ N_FlocChannels - 1)
                    Port_Origin[i] ← [floc_origin[0] - L_Sed - zc; W_FlocChannel - L_BafflePort; floc_origin[2]] + [X_FlocBaffles[i, j]; Y_FlocBaffles[0, j]; Z_FlocBaffles[i, j]] if (mod(i, 4) == 0 and j ≠ (N_FlocChannels - 1)) or (mod(i - 1, 4) == 0 and j == (N_FlocChannels - 1))
                    Port_Origin[i] ← [floc_origin[0] - L_Sed - zc; -L_Slot; floc_origin[2]] + [X_FlocBaffles[i, j]; Y_FlocBaffles[0, j]; Z_FlocBaffles[i, j]] otherwise
                    PortBox ← BoxF(Port_Origin[i], Port_Origin[i] + Port_Dim, [0; 0; 0]*deg)
                    Local ← stack(Local, PortBox)
        Group ← GroupAll("DeleteMe")
        SubtractPorts ← SubtractF(["Baffle"], "DeleteMe")
        Local ← stack(Local, Group, SubtractPorts)
    return Local
# Adds the dimension of the slot in the y-direction for ease of construction
# This is only for vertical
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FlocTankModules :=
    Local ← layer_new("FlocModules", purple)
    for i ∈ 0 .. floor(N_FlocChannels/2)
        for j ∈ 0 .. N_FlocChannelModulesLong[i] - 1
            for y ∈ 0 .. 2
                Local ← stack(Local, PipeSUBF(floc_origin + [-S_ModulePipesH*j; 2*i; S_FlocBaffle[last(S_FlocBaffle)] + S_ModulePipesV*y] + [outerradius(1/2*in) - CapDiameter(1/2*in)/2; 0.25*W_FlocChannel; 0 m], [0; 0]*deg, 1/2*in, □))  # error: This placeholder is empty.
FlocTankBaffleScriptH :=
    if EN_FlocHoriz == 1
        Local ← layer_new("Baffle", ltpurple)
        for j ∈ 0 .. (N_FlocChannels - 1)
            for i ∈ 0 .. (N_FlocChannelBaffles[j] - 1)
                Baffle_Origin[i] ← [floc_origin[0] - L_Sed; -L_Slot; floc_origin[2]] + [X_FlocBaffles[i, j]; Y_FlocBaffles[i, j]; Z_FlocBaffles[i, j]]
                Baffle_Dim[i] ← [T_FlocBaffle; L_FlocBaffles[i, j]; H_Floc]
                BaffleBox ← BoxF(Baffle_Origin[i], Baffle_Origin[i] + Baffle_Dim[i], [0; 0; 0]*deg)
                Local ← stack(Local, BaffleBox)
        ViewTop ← viewtop1
        LayerFreeze ← FreezeLayer("Baffle")
        Local ← stack(Local, ViewTop, LayerFreeze)
    return Local
# Baffles are drawn as rectangles, not lamina.
# The baffles are unioned so as to subtract the ports (see following script) in a single command
FlocTankDrainCouplingScript :=
    Local ← layer_new("FlocDrainCoupling", green)
    for i ∈ 0 .. last(Y_FlocDrainValves)
        Local ←
            stack(Local, CouplingSUBF([-L_Sed - SocketDepth(ND_FlocValve); Y_FlocDrainValves[i]; floc_origin[2]], [0; 0]*deg, ND_FlocValve, EN_PipeSpec, ["FlocTank"])) if EN_PlantDrains == 0
            otherwise
                stack(Local, CouplingSUBF([
                    Plant_Origin[0] + CouplingLength(ND_FlocValve) - SocketDepth(ND_FlocValve);
                    Y_FlocDrainValves[i];
                    floc_origin[2]
                ], [0; 0]*deg, ND_FlocValve, EN_PipeSpec, ["FlocTank"]))
    return stack(Local, FreezeLayer("FlocDrainCoupling"))
# This draws the valves on the far side (left side from top view) viewing from the right side
FlocTankDrainPipeScript :=
    Local ← layer_new("FlocDrainPipe", blue)
    for i ∈ 0 .. last(Y_FlocDrainValves)
        Local ←
            if EN_PlantDrains == 0
                stack(Local, PipeSUBF([
                    -L_Sed - CouplingLength(ND_FlocValve) + SocketDepth(ND_FlocValve);
                    Y_FlocDrainValves[i];
                    floc_origin[2]
                ], T_PlantWall + SocketDepth(ND_FlocValve), [0; 0]*deg, ND_FlocValve, EN_PipeSpec, ["FlocTank"]))
            otherwise
                stack(Local, PipeSUBF([
                    Plant_Origin[0] + CouplingLength(ND_FlocValve) - SocketDepth(ND_FlocValve) + T_PlantWall + SocketDepth(ND_FlocValve);
                    Y_FlocDrainValves[i];
                    floc_origin[2]
                ], T_PlantWall + SocketDepth(ND_FlocValve), [0; 0]*deg, ND_FlocValve, EN_PipeSpec, ["FlocTank"]))
    return stack(Local, FreezeLayer("FlocDrainPipe"))
FlocTankDrainAdapterScript :=
    Local ← layer_new("FlocDrainAdapter", green)
    for i ∈ 0 .. last(Y_FlocDrainValves)
        Local ←
            stack(Local, MaleAdapterF([-L_Sed - CouplingLength(ND_FlocValve) - T_PlantWall; Y_FlocDrainValves[i]; floc_origin[2]], [0; 0]*deg, ND_FlocValve, EN_PipeSpec)) if EN_PlantDrains == 0
            otherwise
                stack(Local, MaleAdapterF([
                    Plant_Origin[0] + CouplingLength(ND_FlocValve) - SocketDepth(ND_FlocValve) + T_PlantWall + SocketDepth(ND_FlocValve);
                    Y_FlocDrainValves[i];
                    floc_origin[2]
                ], [180; 0]*deg, ND_FlocValve, EN_PipeSpec))
    return stack(Local, FreezeLayer("FlocDrainAdapter"))
# For this script to work, you need to modify the search path in AutoCAD everytime you want to test this on a different computer.  Go to tools->options the under search directory add a new file path.  Browse to find the Final Desgins Folder (or equivalent on a different sevrer).
# Iterates through the values of drain locations and inserts a valve
FlocTankDrainValveScript :=
    Local ← layer_new("FlocDrainValve", blue)
    XCoordinate ←
        -L_Sed - CouplingLength(ND_FlocValve) - T_PlantWall if MaleAdapterLength(ND_FlocValve) - SocketDepth(ND_FlocValve) < 0.5*ValveLength(ND_FlocValve) and EN_PlantDrains == 0
        -L_Sed - CouplingLength(ND_FlocValve) - T_PlantWall + 0.5*ValveLength(ND_FlocValve) - MaleAdapterLength(ND_FlocValve) + SocketDepth(ND_FlocValve) if MaleAdapterLength(ND_FlocValve) - SocketDepth(ND_FlocValve) ≥ 0.5*ValveLength(ND_FlocValve) and EN_PlantDrains == 0
        Plant_Origin[0] + CouplingLength(ND_FlocValve) + T_PlantWall + ValveLength(ND_FlocValve) if MaleAdapterLength(ND_FlocValve) - SocketDepth(ND_FlocValve) < 0.5*ValveLength(ND_FlocValve) and EN_PlantDrains == 1
        Plant_Origin[0] + CouplingLength(ND_FlocValve) - SocketDepth(ND_FlocValve) + T_PlantWall + 0.5*ValveLength(ND_FlocValve) + MaleAdapterLength(ND_FlocValve) otherwise
    for i ∈ 0 .. last(Y_FlocDrainValves)
        Insert ← insertdwg("VAL-Scaled-Gate-Valve-Threaded", [XCoordinate; Y_FlocDrainValves[i]; floc_origin[2]], D_FlocScale, D_FlocScale, 0 deg)
        Local ← stack(Local, Insert)
    Local ← stack(Local, FreezeLayer("FlocDrainValve"))
    return Local
FlocRMCouplingScript :=
    NewLayer ← layer_new("FlocRMCoupling", green)
    DrawCoupling ← CouplingSUBF(FlocCoupling_Origin, [270; 0]*deg, ND_RMPipe, EN_PipeSpec, ["FlocTank"])
    FreezeCoupling ← FreezeLayer("FlocRMCoupling")
    return stack(NewLayer, DrawCoupling, FreezeCoupling)
AC_FlocTank :=
    stack(FlocTankTankScript, FlocTankBaffleScriptH, FlocTankDrainCouplingScript, FlocTankDrainPipeScript, FlocTankDrainAdapterScript, FlocTankDrainValveScript, FlocRMCouplingScript) if EN_FlocHoriz == 1
    stack(FlocTankTankScript, FlocTankBaffleScriptV, FlocTankDrainCouplingScript, FlocTankDrainPipeScript, FlocTankDrainAdapterScript, FlocTankDrainValveScript, FlocRMCouplingScript) otherwise
