# Engineer Entered Values:
Q_Plant := □
Q_Plant := Q_Plant*m^3/s
# sed tank parameters
W_SedBay := □
W_SedBay := W_SedBay*m  # width of lamella = width of sed tank bay
L_SedPlateSheet := □
L_SedPlateSheet := L_SedPlateSheet*m
W_SedSlopePlate := □
W_SedSlopePlate := W_SedSlopePlate*m
T_SedSlopePlate := □
T_SedSlopePlate := T_SedSlopePlate*m
Ti_SludgeDrain := □
Ti_SludgeDrain := Ti_SludgeDrain*s  # Drain time for sed tank
EN_PipeSpec := □
EN_DrillSeries := □
N_SedTanks := □
N_SedBaysEst := □
# floc parameteres
T_FlocBaffle := □
T_FlocBaffle := T_FlocBaffle*m
# Chem Feed Parameters
C_FcmDoseMax := □
C_FcmDoseMax := C_FcmDoseMax*kg/m^3
C_FcmAlum := □
C_FcmAlum := C_FcmAlum*kg/m^3
EN_FcmTube := □
Ti_StockMin := □
Ti_StockMin := Ti_StockMin*s
# Values used to Draw Plant:
T_PlantWall := □
T_PlantWall := T_PlantWall*m
W_MpWalkway := □
W_MpWalkway := W_MpWalkway*m
