# [reference: MasterProgram.xmcd]
Q_AlumStockMax := Q_Plant*C_FcmDoseMax/C_FcmAlum
# Currently defined in VNG as the volume of the stock tank IN the FCM. Is this correct?
H_AlumTank := (Q_AlumStockMax/(Kvc*(.5*D_FcmValveOrifice)^2*π))^2/(2*g) + .1 m  # error: This variable is undefined.
V_AlumTank := Ti_StockMin*Q_AlumStockMax
W_AlumTank := (V_AlumTank/H_AlumTank)^.5  # error: This variable is undefined.
