## Flocculation Design
CP_Floc := 110 m^(2/3)
ED_Floc := [6.4; 0.4]*mW/kg  # Must be a two element array defining initial and final energy dissipation rates in the flocculator
W_FlocChannelMin := 45 cm
## Sed Design
ED_SedInlet := 0.4*mW/kg  # This is the maximum energy disipation rate in the channels that transfer the water from the floc tank to the sedimentation tank
Pi_FlowManifold := 0.8  # Ratio of min to max flow through ports in inlet manifold
V_SedUpBod := 70*m/day  # Maximum upflow velocity to allow sludge blanket formation
# We assume a maximum critical velocity for particles to settle in plate settlers
V_SedCBod := 10*m/day
# Critical velocity must be low enough to allow for almost all
# of the particles to settle out
