# REFERENCES
# INPUTS
Q_Plant = L/s
C_CoagStock = gm/L  # The user input for stock concentration of the coagulant.
C_CoagDoseMax = mg/L  # The maximum concentration of coagulant in the plant.
D_CdcAvailable := [0.0312; 0.0625; 0.0781; 0.0937; 0.125; 0.1562; 0.17; 0.1875; 0.25; 0.3125]*in
D_CdcBarb := [□; 0.047 in; □; 0.07 in; 0.075 in; □; □; □; 0.201 in; □]  # error: This placeholder is empty.
D_CdcAvailable = [0.79248; 1.5875; 1.98374; 2.37998; 3.175; 3.96748; 4.318; 4.7625; 6.35; 7.9375] mm
Q_CdcMax := Q_Plant*C_CoagDoseMax/C_CoagStock
Q_CdcMax =  # error: This variable is undefined.
Q_CdcMax := 3*mL/s  # assumed for now
HL_Cdc =  # error
L_CdcDtMin := 80 cm
# The length of the dosing tube has to be at least as great as the maximum head loss with some additional length to be able to reach the ports
# for 2mm used 1/16 (=1.587mm)
L_CdcDtMax := 2 m  # The maximum length of tubing that we are willing to use for the dosing tube.
E_Tube := 0 mm
D_CdcAvailable := [2; 3.175; 4; 5; 6; 6.5]*mm
D_CdcBarb := [0.047 in; 0.075 in; 2.5 mm; 3 mm; 4 mm; 0.201 in]
Nu_Water =  # error  # Assume that the kinematic viscosity of coagulant is similar to that of water.
# for 6.5mm used 1/4in tube (= 6.35mm)
Re_PipeTransition =  # error
K_CdcTube := 2.77  # Minor loss coefficient estimated from CDC research team data.
HL_CdcMajor(h_l, Q, D, K) := h_l - h_e(Q, D, K)  # Function to calculate the major head losses
Q(L, h_f, D, ν) := h_f*g*π*D^4/(128*ν*L)  # Hagen-Poiseulle equation for laminar flow
# Calculating the minor loss coefficient
# **Calculate the minor loss coefficients from the barbed fitting and the dosing tube
# 1. Entrance losses in the barbed fitting.
K_Entrance := 0.5  # For a 90 degree turn
# This loss is in the barbed fitting. Translate this loss into a loss in the dosing tube.
# Use a mass balance: Qin = Qout => VinAin =  VoutAout on the minor loss equation: he = Ke *V^2/(2g). The V here is Vin so use Vin = VoutAout/Ain.
K_EntranceDt(D_CdcDt, D_CdcBarb) := K_Entrance*(A_circle(D_CdcDt)/A_circle(D_CdcBarb))^2
K_EntranceDt(0.124 in, 0.118 in) =  # error
# 2. Expansion losses into the dosing tube from the barbed fitting.
K_Expansion(D_CdcDt, D_CdcBarb) := (A_circle(D_CdcDt)/A_circle(D_CdcBarb) - 1)^2
# 3. Exit losses from the dosing tube.
# The centerline velocity in the tube is double the average velocity, so the minor loss coeffcient is doubled from 1.
K_Exit := 2
# 4. Expansion losses from tube into the barbed fitting
K_Expansion2(D_CdcDt, D_CdcBarb2) := K_Expansion(D_CdcDt, D_CdcBarb2)*(A_circle(D_CdcDt)/A_circle(D_CdcBarb2))^2
# 5.Total minor loss coefficient
K_Total(D_CdcDt, D_CdcBarb, D_CdcBarb2) := K_EntranceDt(D_CdcDt, D_CdcBarb) + K_Expansion(D_CdcDt, D_CdcBarb) + K_Exit + K_Expansion2(D_CdcDt, D_CdcBarb2)
K_Total(0.125 in, 0.118 in, 0.117 in) =  # error
# *** DIAMETER CONSTRAINTS - not using this method to find diameter anymore. Instead, choose a diameter and calculate the other parameters from that.
# 1. Determine the minimum diameter required.
# a) Minimum diameter based on laminar flow contraint.
# This is the maximum flow that can be sent through the alum feeder without requiring extremely long tubes is based on eliminating diameter from the Hagen-Poiseuille equation by using the maximum Reynolds number constraint. For higher flows multiple parallel tubes could be used. However the maximum flow rate that can be handled by the float valve needs to be considered.
# THIS IS NOT CORRECT B/C IT DOESN'T CONSIDER THE MINOR LOSSES!!!
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Q_CdcMaxLaminar(L_max, h_fmax, ν) := (L_max*Re_PipeTransition^4*π^3*ν^5/(2*g*h_fmax))^(1/3)
Q_CdcMaxLaminar(L_CdcDtMax, HL_Cdc, Nu_Water) =  # error
# Minimum diameter required to get laminar flow at max flow based on Reynolds number for transition to turbulence
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D_CdcMinLaminar(Q_max, ν) := 4*Q_max/(π*ν*Re_PipeTransition)
# Now we can calculate the diameter of tubing required to accomodate the largest flow that a flow control module can deliver without requiring an excessively long tube
# THIS IS NOT CORRECT B/C IT DOESN'T CONSIDER THE MINOR LOSSES!!!
# Largest diameter tube we'd use.
D_CdcMinLaminar(Q_CdcMaxLaminar(L_CdcDtMax, HL_Cdc, Nu_Water), Nu_Water) =  # error
# Minimum diameter for the particular coagulant flow to maintain laminar flow.
D_CdcMinLaminar(Q_CdcMax, Nu_Water) =  # error
# b) Minimum diameter based on head loss constraint.
# THIS IS NOT CORRECT B/C IT DOESN'T CONSIDER THE MINOR LOSSES!!!
# Calculate the minimum diameter required to produce the desired head loss at the maximum flow using the minimum length of tubing. Based on the Hagen-Poiseuille equation.
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D_CdcMinHeadLoss(Q_max, L_min, h_fmax, ν) := (128*ν*Q_max*L_min/(h_fmax*g*π))^(1/4)
D_CdcMinHeadLoss(Q_CdcMax, L_CdcDtMin, HL_Cdc, Nu_Water) =  # error
# c) Minimum diameter to ensure minor losses are small compared to the total head loss.
# Set the minor loss to be at most 10% of the total head loss available.
Pi_CdcQerror := 0.1
HL_MinorMax := Pi_CdcQerror*HL_Cdc
D_CdcMinorLoss(h_e, K, Q) := (4*Q/π)^(1/2)*(K/(h_e*2*g))^(1/4)
D_CdcMaxMinorLoss := D_CdcMinorLoss(HL_MinorMax, K_CdcTube, Q_CdcMax) = 3.18596 mm
# c) Minimum diameter than satisfies laminar flow, head loss, and the minor loss constraints.
# The minimum diameter required would be the one that maintains laminar flow at the max length of tubing and produces the necessary head loss at the minimum length of tubing. Thus, the minimum diameter chosen in the one that is the maximum of the two previous diameters calculated. The diameters can be larger than the one calculated, but they cannot be smaller.
D_CdcMin(Q_max, L_min, h_fmax, ν, h_emax, K) := max(D_CdcMinLaminar(Q_max, ν), D_CdcMinHeadLoss(Q_max, L_min, h_fmax, ν), D_CdcMinorLoss(h_emax, K, Q_max))
D_CdcMin(Q_CdcMax, L_CdcDtMin, HL_Cdc, Nu_Water, HL_MinorMax, K_CdcTube) =  # error
# DIAMETER - assumed diameter to be 3.175 mm (0.125 in)
# d) Tube diameter constraint
# There is also a constraint of given tube diameters. First we write a function that will round up to the up to the next available tube size.
forceround(x, xarray, direction) :=
    xarray ← sort(xarray)
    i ← 0
    while x > xarray[i]
        i ← i + 1
    return xarray[i - 1 + direction]  # direction is for rounding up (1) or rounding down (0).
D_CdcAvailable = [2; 3.175; 4; 5; 6; 6.5] mm
# Now we use the forceround function to find the design tube diameter based on the minimum tube diameter and the available tube diameters.
# without minor loss considerations
D_CdcDtDesignf(Q_max, L_min, h_fmax, ν, h_emax, K) := forceround(D_CdcMin(Q_max, L_min, h_fmax, ν, h_emax, K), D_CdcAvailable, 1)
D_CdcMin1(Q_max, L_min, h_fmax, ν) := max(D_CdcMinLaminar(Q_max, ν), D_CdcMinHeadLoss(Q_max, L_min, h_fmax, ν))
D_CdcDtDesignf1(Q_max, L_min, h_fmax, ν) := forceround(D_CdcMin1(Q_max, L_min, h_fmax, ν), D_CdcAvailable, 1)
D_CdcDtDesign := D_CdcDtDesignf(Q_CdcMax, L_CdcDtMin, HL_Cdc, Nu_Water, HL_MinorMax, K_CdcTube)
D_CdcDtDesign1 := D_CdcDtDesignf1(Q_CdcMax, L_CdcDtMin, HL_Cdc, Nu_Water)
D_CdcDtDesign =  # error  # This is the min diameter of tube that meets laminar flow, head loss, and minor  loss constraints.
D_CdcDtDesign1 =  # error
D_DesignMax := D_CdcDtDesign
# This is the diameter that will be used because it provides reasonable lengths and can cover the entire range when not considering minor losses.
D_DesignMax := 3.125 mm
# Determine the maximum flow rate you could get out of the doser with minor losses using the optimal diameter determined when minor losses were not considered.
Area(D) := 1/4*π*D^2
D_DesignMax = 0.123031 in
Q_Minor(h_e, K, D) := (2*g*h_e/K*Area(D)^2)^(1/2)  # This is the minor loss equation.
Q_MaxMinor := Q_Minor(HL_MinorMax, K_CdcTube, D_DesignMax)
Q_MaxMinor =  # error
# Length of tubing
# 2) Length of tubing based on the head loss constraint
# Length of tube required to get desired head loss at maximum flow based on the Hagen-Poiseuille equation.
# without minor loss considerations
L_CdcDtDesignf1(Q_max, D, h_fmax, ν) := h_fmax*g*π*D^4/(128*ν*Q_max)
fraction := 0.5  # The fraction is used to fit point for calibration that minimizes maximum error.
# The equation below uses the fraction. Not using this right now.
L_CdcDtDesign := L_CdcDtDesignf(Q_CdcMax*fraction, D_DesignMax, HL_Cdc*fraction, Nu_Water, K_CdcTube)
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L_CdcDtDesignf(Q_max, D, h_l, ν, K) := (h_l - h_e(Q_max, D, K))*g*π*D^4/(128*ν*Q_max)
# This is the length of tube that would be required to provide the desired coagulant flow rate. This takes minor losses into account.
L_CdcDtDesign := L_CdcDtDesignf(Q_CdcMax, D_DesignMax, HL_Cdc, Nu_Water, K_CdcTube)
Q_CdcMax = 3 mL/s
L_CdcDtDesign =  # error
# This is the length of the tubing assuming the maximum flow rate a tube can provide. This takes minor losses into account.
Q_MaxMinor =  # error
L_CdcDtDesignMinor(Q_max, D, h_l, h_e, ν) := (h_l - h_e)*g*π*D^4/(128*ν*Q_max)
L_CdcDtMinor := L_CdcDtDesignMinor(Q_MaxMinor, D_DesignMax, HL_Cdc, HL_MinorMax, Nu_Water)
L_CdcDtMinor =  # error
# Checking to see what the major loss is and to ensure the flow rate is what is expected.
# Hagen-Poiseulle
HL_Major1 := HL_Cdc - HL_MinorMax = 0.18 m
HL_Major := HL_Cdc - h_e(Q_CdcMax, D_DesignMax, K_CdcTube) = 0.178393 m
Q(L_CdcDtDesign, HL_Major, D_DesignMax, Nu_Water) =  # error
Q_Check2 := Q(L_CdcDtMinor, HL_Major1, D_DesignMax, Nu_Water) = 2.88629e-6 m^3/s
# Notes (for K=2.77):  a higher coagulant flow rate will lead to a higher minor loss. That's why we're setting the maximum flow rate for one tube to be 2.979 mL/s. After that, the number of tubes will have to be increased. There might be problems with this flow rate b/c the tubing length is 1.478m. This shorter tubing length might have issues with the entrance region where the flow isn't fully developed and the shear is larger.
#
# We could instead set the maximum flow rate for one tube to something lower so that our tubing length is longer. 2.5 mL/s might be a good flow rate. The length that corresponds to that flow rate is 1.819m.
# Notes (for K=3):  The maximum flow rate to keep minor losses down is 2.863mL/s.  this has a length of 1.538m. The minor losses are set to a maximum of 0.02m, so the major losses are 0.18m.
#
# For a flow rate of 2.5 mL/s, the length is 1.807m. The major losses are 0.185m.
# Design calculations
# If you set the max tubing length such that a small region meets that criteria it can cause a noncontinuos solution with a gap that has too high a tubing length.
Q_MaxMinor =  # error
N_TubesMax := 4
N_Tubef(Q_Coag, Q_CoagMaxDesign) := ceil(Q_Coag/Q_CoagMaxDesign)
N_Tube := N_Tubef(Q_CdcMax, Q_MaxMinor)
N_Tube =  # error
Q_Tube(Q_Coag, Q_CoagMaxDesign) := Q_Coag/N_Tubef(Q_Coag, Q_CoagMaxDesign)  # This is the coagulant flow rate per tube.
Q_TotalMaxMinor := N_TubesMax*Q_MaxMinor  # The maximum coagulant flow rate for the CDC depends on the maximum coagulant flow rate given the minor losses.
Q_TotalMaxMinor =  # error
D_tube := D_CdcDtDesignf1(Q_Tube(Q_CdcMax, Q_MaxMinor), L_CdcDtMin, HL_Cdc, Nu_Water) = 3.175 mm
L_design := L_CdcDtDesignf(Q_Tube(Q_CdcMax, Q_MaxMinor), D_DesignMax, HL_Cdc, Nu_Water, K_CdcTube) = 2.97789 m
# RANGE OF FLOWS FOR GRAPH
# 3) Define a range of flows that we will use to plot the results.
Q_CdcMax = 3 mL/s
Q_CdcMaxLaminar(L_CdcDtMax, HL_Cdc, Nu_Water) =  # error
# want to find the maximum flow that we can get from our largest diameter tube. We need to use the laminar flow constraint because that dominates for high flows.
Q_CdcMaxDesign := π*D_CdcDtDesign*Re_PipeTransition*Nu_Water/4 = 6.59734 mL/s
D == 4*Q_max/(π*ν*Re_max)
# At very low flows the design will fail given a finite set of tube diameters. Thus calculate the minimum design flow that can be produced based on the Hagen-Poiseuille equation.
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Q_min(L_max, h_fmax, D_min, ν) := h_fmax*g*π*D_min^4/(128*ν*L_max)
Q_min(L_CdcDtMax, HL_Cdc, D_CdcAvailable[0], Nu_Water) =  # error
# Redefine the flow rate to only include the feasible range given the constraints. Note that the minimum flow plotted is the minimum design flow. The design flow is the maximum flow for a flow control module.
Q_range := Q_min(L_CdcDtMax, HL_Cdc, D_CdcAvailable[0], Nu_Water), Q_min(L_CdcDtMax, HL_Cdc, D_CdcAvailable[0], Nu_Water) + 1*mL/min .. Q_CdcMaxLaminar(L_CdcDtMax, HL_Cdc, Nu_Water)
# The maximum tube length constraint may be violated if there aren't enough available tubing diameters.
D_CdcDtDesign =  # error  # designs for the particular flow rate
L_CdcDtDesign =  # error
# GRAPH WITHOUT MINOR LOSS
D_CdcDtDesign1 =  # error
D_CdcDtDesign1 =  # error
L_CdcDtDesign1 =  # error
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# GRAPH WITH MINOR LOSS -Tubing
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D_CdcDtDesign =  # error
D_CdcDtDesign =  # error
L_CdcDtDesign =  # error
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Q_Tube(Q_CdcRange, Q_MaxMinor)
Q_CdcRange := 1*mL/s, 1.01*mL/s .. Q_TotalMaxMinor
D_DesignMax = 3.125 mm
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# GRAPH WITH MINOR LOSS -Errors
# Determine what elevation has the maximum error in flow rate.
# The fluids function, Q.pipetotal, was used to estimate what the flow rate would be at different elevations given a total head loss and minor loss coefficient.
# With a HL.Cdc = 15cm, the greatest error is at 7cm.
# With a HL.Cdc = 20cm, the greatest error is at 9.4 cm
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D_DesignMax = 0.123031 in
i := 1, 2 .. HL_Cdc/mm
L_design =  # error
h[i] := i*mm
Error[i] := (Q_pipetotal(D_DesignMax, h[i], L_CdcDtDesign, Nu_Water, E_Tube, K_CdcTube) - Q_pipetotal(D_DesignMax, HL_Cdc, L_CdcDtDesign, Nu_Water, E_Tube, K_CdcTube)*h[i]/HL_Cdc)
MaxError := max(Error)
MaxError =  # error
indexError := index(MaxError, Error)
indexError =  # error
H_maxerror := h[indexError]
H_maxerror =  # error
Error =  # error
Error[indexError] =  # error
fraction[i] := Error[i]/(Q_pipetotal(D_DesignMax, HL_Cdc, L_CdcDtDesign, Nu_Water, E_Tube, K_CdcTube)*h[i]/HL_Cdc)
Error[0] =  # error
fraction[i] =  # error
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# Checking to see if laminar flow and head loss constraints are satisfied.
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Re_PipeTransition =  # error
Re_Cdc := Re(Q_MaxMinor, D_DesignMax, Nu_Water) = 1175.98  # error: This function requires 1 argument but is applied to 3.
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h_f(Q, D, L, ν, ε)
L_CdcDtDesign2 := L_CdcDtDesignf(Q_MaxMinor, D_DesignMax, HL_Cdc, Nu_Water, K_CdcTube)
HL_Major := h_f(Q_MaxMinor, D_DesignMax, L_CdcDtDesign2, Nu_Water, E_Tube) = 18 cm
h_e(Q, D, K) := K*8/(g*π^2)*Q^2/D^4
HL_Minor := h_e(Q_MaxMinor, D_DesignMax, K_CdcTube)
HL_Minor =  # error
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# Questions
# max flow for small float valve (where design flips to larger valve)
# Min diameter of supply flexible tubing to CHT at MAX flow of linear dose controller.
# Evaluate whether it is reasonable to always uses this large diameter of supply tubing.
# Determine appropriate diameters for calibration columns
# Is the calibration column fixed or movable?
# Is there one diameter of dosing tubing that will work for allllll flows?
#
# Is all of our logic correct in this sheet? simplify and beautify and document better than Monroe did!
#
# When calibrating a CDC you start with a piece of tubing that is too long. You measure the flow at max head loss. How do you use that information to figure out how long to make the tubing?
#
# What is the min length of tube for the diameter that you are using to maintain laminar flow? This should be reported in the design documentation as a warning to not cut the tube shorter than this length.
# Geometry inputs and simple calculations:
HL_Cdc =  # error  # Difference between the min and max water levels in the entrance tank. Maximum head loss through the LFOM.
L_LeverArmTotal := 36 in  # Set to be this length.
L_SliderEffective := 3.5 in  # Distance between the end of the slider and the pivot point of the freefall PVC tube.
L_LeverArmEffective := L_LeverArmTotal - L_SliderEffective = 32.5 in
H_Max := 20 cm  # The maximum elevation the doser tube will drop when the slider is at the end of the bar at max plant flow.
# To find the length of the side of the arm with the scale and the side of the arm with the float attached, solve two equations for two unknowns. One equation is similar triangles at maximum flow. The other is that the two sides of the bar must add up to the total.
L_ScaleArmEffective := L_LeverArmEffective/(1 + HL_Cdc/H_Max) = 16.25 in
1.75*2.54 = 4.445
L_CdcScaleArm := L_ScaleArmEffective + L_SliderEffective
L_CdcScaleArm =  # error
L_CdcFloatArm := L_LeverArmTotal - L_CdcScaleArm
L_CdcFloatArm =  # error
Angle_LeverArmMax := asin(HL_Cdc/L_CdcFloatArm) = 28.9833 deg  # Not necessarily important.
# Float Valve Selection
# Calculating Appropriate Float Sizes
CdcChtFloatValve := [0.093 in, .25 in, "Barb"; 0.187 in, 0.5 in, "NPT"; 0.25 in, 0.5 in, "NPT"; 0.312 in, 0.5 in, "NPT"]
CdcChtFloatValve = [2.3622, 6.35, "Barb"; 4.7498, 12.7, "NPT"; 6.35, 12.7, "NPT"; 7.9248, 12.7, "NPT"] mm
i := 0 .. rows(CdcChtFloatValve) - 1
D_CdcFloatValveOrifice[i] := CdcChtFloatValve[i, 0]
HL_StockMax := 30 cm  # max headloss between stock tanks and constant head tank.
Q_CdcChtFloatValveMax := Q_orifice(D_CdcFloatValveOrifice, HL_StockMax, Pi_VenaContractaOrifice)
Q_CdcChtFloatValveMax =  # error
# Choose Stock Tank Float depending on highest coagulant flow needed.
# Find the float that will be able to supply the maximum coagulant flow.
Q_CdcChtFloatValve := CeilNearest(Q_CdcMax, Q_CdcChtFloatValveMax)
# Find the index of this float in the matrix to find the diameter of the float.
index_CdcChtFloatValve := index(Q_CdcChtFloatValve, Q_CdcChtFloatValveMax) = 0
D_CdcChtFloatValve := D_CdcFloatValveOrifice[index_CdcChtFloatValve] = 0.093 in
# Lever Arm Scale
L_SliderEffective := 3 in
# This is the distance between the end of the slider and the point where the freefall PVC is hung. (it's not drawn at exactly 3", but we'll change that. the drawing was arbitrary initially).
L_WallClearance := L_HalfWall + L_Slider - L_SliderEffective + L_Extra
# This is the minumum distance the first tick mark can be from the lever arm pivot point in order for the PVC assembly to have enough clearance from the entrance tank wall.
# This is the elevation difference between the point where the freefall PVC assembly is hung and the point where the end of the tube rests. The horizontal PVC has an outer radius of .525" and the tool hangar likely adds another .5".
#
# This is only significant in zeroing the CHT. It shouldn't effect the lever arm scale because it's a constant.
H_PVCAssembly := 1 in
H_MinDoseMaxFlow := 128*Nu_Water*L_Tube*Q_CdcCoagulantMinMax/(g*π*ID_CdcTube^4)
# This is the minumum tube head loss when the lever arm is at max angle (max plant flow) and the dose is at a minumum, which corresponds to the first point on the scale.
L_FirstPoint := H_MinDoseMaxFlow/sin(Angle_LeverArmMax) + L_SliderEffective
# This is the distance between the first tick mark and the pivot point along the lever arm. It must be greater than L.WallClearance in order for the PVC assembly to be far enough from the tank wall.
data := [0, 0; 4, 0.59; 8, 1.19; 12, 1.64; 16, 2.09; 20, 2.49]
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Q_pipetotal(D_DesignMax, HL_Cdc*fraction, L_CdcDtDesign, Nu_Water, E_Tube, K_CdcTube)/(HL_Cdc*fraction)*h
# K estimate from CDC Research Team Data
# assume this value and see if you can get a design
# Also assume a maximum minor loss contribution and use that to set a minimum Diameter as a function of Q.
# For the CDC team's experimental apparatus:
K_CdcTubeCal := K_Total(0.123 in, 0.075 in) = ƒ(Length) → Unitless
E_Tube := 0 mm
Q(L, h_f, D, ν) := h_f*g*π*D^4/(128*ν*L)
D_CdcTube := 0.123 in
L_CdcTube := 1.47 m
Q_CdcMaxR := Q(L_CdcTube, 20 cm, D_CdcTube, Nu_Water) = 3.11981 mL/s  # flow rate we should get from Hagen-P equation (ie assume no minor losses)
# FROM CDC RESEARCH TEAM DATA:
# March 9, 2011 experiment: one tube
Flowrate(HL) := (0.094*HL + 0.169)*mL/s  # equation for linear fit from data
HL_Cdc =  # error
Flowrate(20) = 2.049 mL/s  # flow rate predicted by trend line
# minor losses from fluids functions file - predicts minor losses
Q_Cdc := Q_pipetotal(D_CdcTube, HL_Cdc, L_CdcTube, Nu_Water, E_Tube, 18)
Q_Cdc1 := Q_pipetotal(D_CdcTube, 20 cm, 1.47 m, Nu_Water, E_Tube, 8.56)
HL_CdcMinor := h_e(Q_CdcMaxR, D_CdcTube, 8.12) = 6.85689 cm
HL_CdcMajor := HL_Cdc - HL_CdcMinor = 13.1431 cm
Q_Cdc =  # error
Q_Cdc1 =  # error
Q_Cdc := Q(L_CdcTube, HL_CdcMajor, D_CdcTube, Nu_Water) = 2.0502 mL/s
HL_CdcMinor := h_e(Q_Cdc, D_CdcTube, 18.) = 6.56417 cm
# March 13, 2011 experiment:
# one tube
Q_Cdc := Q_pipetotal(D_CdcTube, HL_Cdc, L_CdcTube, Nu_Water, E_Tube, 13)
Flowrate2(HL) := (0.105*HL + 0.143)*mL/s
Flowrate2(20) = 2.243 mL/s
Q_Cdc =  # error
HL_CdcMinor2 := h_e(Q_CdcMaxR, D_CdcTube, 6.65) = 5.61556 cm
HL_CdcMinor := h_e(Q_Cdc, D_CdcTube, 18.) = 7.81398 cm
HL_CdcMajor2 := HL_Cdc - HL_CdcMinor2 = 14.3844 cm
Q_Cdc2 := Q(L_CdcTube, HL_CdcMajor2, D_CdcTube, Nu_Water) = 2.24384 mL/s
# March 15, 2011 experiment:
# three tubes
HL_Cdc =  # error
Flowrate3(HL) := (0.302*HL + 0.451)*mL/s
Flowrate3(20) = 6.491 mL/s
HL_CdcMinor3 := h_e(Q_CdcMaxR, D_CdcTube, 7.26) = 6.13067 cm
Q_Cdc1 := Q_pipetotal(D_CdcTube, HL_Cdc, L_CdcTube, Nu_Water, E_Tube, 15)*3
HL_CdcMajor3 := HL_Cdc - HL_CdcMinor3 = 13.8693 cm
Q_Cdc1 =  # error
Q_Cdc3 := Q(L_CdcTube, HL_CdcMajor3, D_CdcTube, Nu_Water)*3 = 6.49046 mL/s
HL_CdcMinor := h_e(Q_Cdc1/3, D_CdcTube, 15) = 6.09679 cm
# March 17, 2011 experiment:
# two tubes
Flowrate4(HL) := (0.205*HL + 0.402)*mL/s
Flowrate4(20) = 4.502 mL/s
HL_CdcMinor4 := h_e(Q_CdcMaxR, D_CdcTube, 6.6) = 5.57334 cm
HL_CdcMajor4 := HL_Cdc - HL_CdcMinor4 = 14.4267 cm
Q_Cdc4 := Q(L_CdcTube, HL_CdcMajor4, D_CdcTube, Nu_Water)*2 = 4.50085 mL/s
K_ExpAvg := (8.12 + 6.65 + 7.26 + 6.6)/4 = 7.1575
# Calculating expected flow rates for CDC lab experiments
# FOR CDC TEAM TO TEST!
# Can change the total head loss to determine the expected flow rate at different elevations.
HL_Total := 20 cm
Q := 1.5*mL/s
Q_MaxMinor =  # error
D_1 := 0.124 in
L_1 := L_CdcDtDesignf(Q_Tube(Q, Q_MaxMinor), D_1, HL_Total, Nu_Water, K_CdcTube)
L_1 =  # error
D_2 := 0.125 in
L_2 := L_CdcDtDesignf(Q_Tube(Q, Q_MaxMinor), D_2, HL_Total, Nu_Water, K_CdcTube)
L_2 =  # error
N := N_Tubef(Q, Q_MaxMinor) = 1
Q_expected1 := Q_pipetotal(D_1, HL_Total, L_1, Nu_Water, E_Tube, K_CdcTube)
Q_expected1 =  # error
Q_expected2 := Q_pipetotal(D_2, HL_Total, L_2, Nu_Water, E_Tube, K_CdcTube)
Q_expected2 =  # error
# Entrance Region
L_entrance(Q) := 0.06*4*Q/(π*Nu_Water)
L_Ent :=
    for i ∈ 0 .. 13
        Q[i] ← i*mL/s
        L[i] ← 0.06*4*Q[i]/(π*Nu_Water)
    return L
L_Ent =  # error
