# AguaClara Water Treatment Plants
# Design References
# MathCAD dimension calculations:
# Variable Naming Guide
# The list below is the list names that can be used before the period for the subscript in our variable names.
# Major Plant Components. These items follow the period in the variable name
# [reference: BasicInputs.xmcd]
# [reference: ExpertInputs.xmcd]
# [reference: MathFunctions.xmcd]
# [reference: PipeDatabase.xmcd]
# [reference: FluidsFunctions.xmcd]
# [reference: SedimentationTank.xmcd]
[
    "Subscripts", "";
    "component key", "Description";
    "Et", "Entrance tank";
    "Lfom", "Linear flow orifice meter";
    "Rm", "Rapid mix";
    "Floc", "Flocculation tank";
    "Sed", "Sedimentation tank";
    "Fi", "Stacked Rapid Sand Filter"
]
# [reference: Flocculator.xmcd]
# [reference: LFOM.xmcd]
# [reference: LinearCdc.xmcd]
# [reference: ChemStorageTanks.xmcd]
# [reference: EntranceTank.xmcd]
# [reference: StackedRapidSandFilter.xmcd]
# [reference: DrainChannel.xmcd]
# [reference: MaterialsList.xmcd]
# AutoCAD drawing programs:
# Translators:
# These are the codes that take MathCAD outputs and create AutoCAD scripts that are used to draw the plant (formerly Basics)
# [reference: MtoATranslators.xmcd]
# The wrapped MtoA translator contains the functions that the user will want to access. These functions will draw pieces with full functionality - specifying the location, dimension, and orientation of the object. Also, it contains layer control and subtraction capabilities for grouped objects.
# [reference: MtoATranslatorsWrapped.xmcd]
[
    "Symbol", "Description", "Dimensions";
    "Amp", "amplitude", "L";
    "B", "perpendicular distance between components (center to center)", "L";
    "D", "Diameter", "L";
    "E", "pipe roughness", "L";
    "FB", "Freeboard", "L";
    "H", "height (includes freeboard)", "L";
    "HL", "head loss", "L";
    "HW", "local water depth", "L";
    "ID", "inner diameter", "L";
    "L", "length", "L";
    "Loc", "Locations", "L";
    "ND", "nominal diameter", "L";
    "OD", "outer diameter", "L";
    "R", "Radius", "L";
    "S", "space between components", "L";
    "T", "thickness", "L";
    "W", "width", "L";
    "Z", "elevation relative to bottom of sed tank", "L";
    "ZW", "water depth relative to bottom of sed tank", "L";
    "V", "velocity", "L/T";
    "CP", "Collision Potential", "L^(2/3)";
    "A", "Area", "L^2";
    "Nu", "kinematic viscosity", "L^2/T";
    "ED", "energy dissipation rate", "L^2/T^3";
    "Vol", "volume", "L^3";
    "Q", "flow", "L^3/T";
    "MW", "Molecular weight", "M";
    "C", "Concentration", "M/L^3";
    "Rho", "Density", "M/L^3";
    "AN", "angle", "radians";
    "Ti", "time", "T";
    "EN", "Enumerated type", "dimensionless";
    "N", "Number", "dimensionless";
    "Pi", "dimensionless geometric ratio", "";
    "AC", "AutoCAD command string", "";
    "K", "minor loss coefficient", ""
]
# Plant Elements:
# These are all of the files that draw the fundamental parts of the plants (tees, elbows, tanks, pipes, etc)
# [reference: ChannelF.xmcd]
# [reference: PlumbingF.xmcd]
# [reference: TankF.xmcd]
# [reference: LaminaF.xmcd]
# [reference: StairsF.xmcd]
# [reference: DrainChannelF.xmcd]
# [reference: ManifoldF.xmcd]
# Specific Pieces:
# These are the codes that draw the bigger pieces of the plant (the sed tank, floc tank, etc)
# [reference: FlocculatorAC.xmcd]
# [reference: SedimentationTankAC.xmcd]
# [reference: EntranceTankAC.xmcd]
# [reference: ChemStockTanksAC.xmcd]
# [reference: StackedRapidSandFilterAC.xmcd]
# [reference: OperatorAccessAC.xmcd]
# [reference: DrainChannelAC.xmcd]
# Layouts:
# This file will execute at the very end to create multiple views of the entire plant in paperspace
# [reference: LayoutsAC.xmcd]
# Sedimentation
# Sed Tanks and Slopes:
N_SedTanks = 3
H_SedBetween =  # error: This variable is undefined.  # Distance from the top of the inlet manifold to the bottom of the ledge supporting the lamella frame
L_Sed = 3.55446 m
N_SedBays = 2  # Number of bays of inlet manifolds in each sed tank
# Length of the port through which water exits the inlet manifold
# Width of ferrous cement plates in whice one manifold port is cut
Q_SedBay = 3 L/s
# Sedimentation Tank Sludge Drain:
N_SedSludgeOrifices = 24  # per cell
Ti_SludgeDrain = 30 min  # Tank Drain time
W_SedSludge = 6.71293 cm  # Width of the sludge channel
B_SedSludgeOrifices = 10.693 cm  # Distance center to center between drain orifices
# Depth of the sludge channel
H_SedSludge = 6.71293 cm
T_SedSludge =  # error
# Thickness of the plate topping the sludge channel
# through which drain holes are formed
T_SedSludge =  # error
W_SedDrainCover = 11.43 cm
D_SedSludgeOrifice = 0.00980191 m  # Diameter of drain orifices
W_SedInletBottom =  # error
N_SedSludgeOrifices = 24
ND_SedSludgeValve =  # error
# Sedimentation Tank Dimensions:
Z_SedSludge = 0.0671293 m  # Height from 0 of the top of the sludge drain
# Height from 0 of the top of the inlet manifold
Z_SedSlopes =  # error  # Total tank wall height
W_Sed = 2 m
L_Sed = 3.55446 m  # Total tank length
# Inlet Channel:
HW_InletChannel =  # error  # Width of the drop chimneys connecting channel to sed inlet manifolds
W_InletChannel =  # error  # length of drop chimmneys
L_Channel =  # error
# per sed bay
N_SedInletPipes =  # error
H_InletChannel =  # error
# Sedimentation Tank Effluent Launder:
N_SedLaunderOrifices = 46  # Number of orifices per launder  # More Launder Dimensions
ND_SedLaunder = 4 in
Q_SedLaunderOrifices = 6.52174e-5 m^3/s
# Center to center launder spacing
L_SedLaunder = 2.50781 m
B_SedLaunderOrifices = 0.1 m
D_SedLaunderOrifice = 0.472441 in
# Exit Channel:
W_ExitChannel =  # error
H_ExitChannel =  # error
L_ExitChannel =  # error
H_PltWeir =  # error  # height of the weir carrying water to the distribution tank
HW_ExitChannel =  # error  # water height in exit channel from 0
# Lamella:
L_SedPlate = 0.75 m  # center to center distance between lamella
B_SedPlate = 2.7 cm  # spacing between lamella
S_SedPlate = 2.5 cm
N_SedPlates = 81  # Number of Sed Plates per Sedimentation Tank Bay.
AN_SedPlate = 60 deg
V_SedC = 10.3649 m/day
L_SedActive = 2.52302 m
V_SedUp = 86.4 m/day
Z_SedLaunder = 1.88021 m
H_SedPlate =  # error
H_SedAbove =  # error  # Height of water needed above the lamella
N_SedPlates = 81
HW_Sed = 1.98007 m
H_Sed = 2.09086 m
Z_Mp =  # error
H_SedBayDivider =  # error
# Flocculator
# Look at Flocculator Positioning arrays
W_FlocChannel = 0.6 m
# Fill last channel with bafffles from last channel
ED_Floc = 10 mW/kg
# Fix port width to be based on energy dissipation in that channel
# Adjust spacing after the number of baffles per channel is known.
HW_FlocEnd = 1.98007 m
# Check the residence time of the flocculator should be at least 20minutes
X_FlocBaffles = [
    0.213359, 0.213359, 0.213359, 0.213359, 0.213359, 0.32415;
    0.408718, 0.408718, 0.408718, 0.408718, 0.408718, 0.525147;
    0.604077, 0.604077, 0.604077, 0.604077, 0.604077, 0.726144;
    0.799436, 0.799436, 0.799436, 0.799436, 0.799436, 0.927141;
    0.994795, 0.994795, 0.994795, 0.994795, 0.994795, 1.12814;
    1.19015, 1.19015, 1.19015, 1.19015, 1.19015, 1.32913;
    1.38551, 1.38551, 1.38551, 1.38551, 1.38551, 1.53013;
    1.58087, 1.58087, 1.58087, 1.58087, 1.58087, 1.73113;
    1.77623, 1.77623, 1.77623, 1.77623, 1.77623, 1.93213;
    1.97159, 1.97159, 1.97159, 1.97159, 1.97159, 2.13312;
    2.16695, 2.16695, 2.16695, 2.16695, 2.16695, 2.33412;
    2.36231, 2.36231, 2.36231, 2.36231, 2.36231, 2.53512;
    2.55767, 2.55767, 2.55767, 2.55767, 2.55767, 2.73611;
    2.75303, 2.75303, 2.75303, 2.75303, 2.75303, 2.93711;
    2.94839, 2.94839, 2.94839, 2.94839, 2.94839, 3.13811;
    3.14375, 3.14375, 3.14375, 3.14375, 3.14375, 3.3391;
    3.3391, 3.3391, 3.3391, 3.3391, 3.3391, 0
] m
L_FlocBaffles = [
    1.69004, 1.69004, 1.69004, 1.69004, 1.69004, 2.00035;
    2.00035, 2.00035, 2.00035, 2.00035, 2.00035, 1.69004;
    1.69004, 1.69004, 1.69004, 1.69004, 1.69004, 2.00035;
    2.00035, 2.00035, 2.00035, 2.00035, 2.00035, 1.69004;
    1.69004, 1.69004, 1.69004, 1.69004, 1.69004, 2.00035;
    2.00035, 2.00035, 2.00035, 2.00035, 2.00035, 1.69004;
    1.69004, 1.69004, 1.69004, 1.69004, 1.69004, 2.00035;
    2.00035, 2.00035, 2.00035, 2.00035, 2.00035, 1.69004;
    1.69004, 1.69004, 1.69004, 1.69004, 1.69004, 2.00035;
    2.00035, 2.00035, 2.00035, 2.00035, 2.00035, 1.69004;
    1.69004, 1.69004, 1.69004, 1.69004, 1.69004, 2.00035;
    2.00035, 2.00035, 2.00035, 2.00035, 2.00035, 1.69004;
    1.69004, 1.69004, 1.69004, 1.69004, 1.69004, 2.00035;
    2.00035, 2.00035, 2.00035, 2.00035, 2.00035, 1.69004;
    1.69004, 1.69004, 1.69004, 1.69004, 1.69004, 2.00035;
    2.00035, 2.00035, 2.00035, 2.00035, 2.00035, 1.69004;
    1.69004, 1.69004, 1.69004, 1.69004, 1.69004, 0
] m
Z_FlocBaffles = [
    0, 0, 0, 0, 0, 0.298495;
    0.290039, 0.290039, 0.290039, 0.290039, 0.290039, 0;
    0, 0, 0, 0, 0, 0.298495;
    0.290039, 0.290039, 0.290039, 0.290039, 0.290039, 0;
    0, 0, 0, 0, 0, 0.298495;
    0.290039, 0.290039, 0.290039, 0.290039, 0.290039, 0;
    0, 0, 0, 0, 0, 0.298495;
    0.290039, 0.290039, 0.290039, 0.290039, 0.290039, 0;
    0, 0, 0, 0, 0, 0.298495;
    0.290039, 0.290039, 0.290039, 0.290039, 0.290039, 0;
    0, 0, 0, 0, 0, 0.298495;
    0.290039, 0.290039, 0.290039, 0.290039, 0.290039, 0;
    0, 0, 0, 0, 0, 0.298495;
    0.290039, 0.290039, 0.290039, 0.290039, 0.290039, 0;
    0, 0, 0, 0, 0, 0.298495;
    0.290039, 0.290039, 0.290039, 0.290039, 0.290039, 0;
    0, 0, 0, 0, 0, 0
] m
N_FlocChannels = 6
L_FlocTank = 21.3268 m
HL_Floc = 26.0318 cm
HW_FlocStart = 2.24039 m
S_FlocBaffle = [19.3359; 19.3359; 19.3359; 19.3359; 19.3359; 19.8997] cm
B_FlocBaffle = [19.5359; 19.5359; 19.5359; 19.5359; 19.5359; 20.0997] cm
N_FlocChannelBaffles = [17; 17; 17; 17; 17; 16]
W_FlocPort = [0.193359; 0.193359; 0.193359; 0.193359; 0.193359; 0.207204] m
HL_FlocChannels = [4.4184; 4.4184; 4.4184; 4.4184; 4.4184; 3.93983] cm
L_FlocBaffleLower = 1.69004 m
L_FlocBaffleUpper = 2.00035 m
H_FlocPort = [0.6; 0.6; 0.6; 0.6; 0.6; 0.576236] m
Ti_Floc = 23.4603 min  # residence time of the flocculator
N_FlocBaffles = 101
# Materials List
N_Launders =  # error
L_LaunderPipeTotal =  # error
N_Valves = 6
N_LaunderCouplings =  # error
N_ValveCouplings = 6
N_SedPlatesTotal = 486
N_SedPlatesPerSheet = 4
N_SedPlateSheets = 122
# AutoCAD Scripts
AC_SedTank =  # no stored result
AC_EntranceTank =  # error
AC_FlocTank = [
    "-layer m FlocTank"; "c t 132,132,132"; "FlocTank"; "  "; "_-view o t _zoom w 0.16,6.29,0 -3.71446,10.96,2.34039 _box 0,6.45,0 -3.55446,10.8,2.34039 _box 0.15,6.3,-0.15 -3.70446,10.95,2.34039 _subtract 0.15,6.3,-0.15  0,6.45,0 "; "_box -3.70446,7.05,0 0.15,7.2,2.34039"; "-array l  R 5 1 0.75"; "-group c FlocTank y "; "all "; "-layer s 0"
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]
AC_ChemTanks = [
    "-layer m CoagTanks"; "c t 132,132,132"; "CoagTanks"; "  "; "_-view o t"; "_zoom w -5.33021,13.39504,1.88811 -4.38581,14.33944,2.97991"; "_cylinder -4.85801,13.86724,2.96991 0.4622 c -5.92981,13.86724,2.96991"; "rotate3d l  y -4.85801,13.86724,2.96991 90"; "-group c CoagTanks y "; "all "
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]
AC_OperatorAccess = [
    "-layer m OpCoagplatformCon"; "c t 132,132,132"; "OpCoagplatformCon"; "  "; "_-view o f"; "_pline"; "-7.15901,2.96991"; "-6.85901,2.96991"; "-6.85901,2.7729"; "-6.55901,2.7729"
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]
AC_DrainChannel = [
    "-layer m DrainChannel2"; "c t 214,214,214"; "DrainChannel2"; "  "; "3dpoly"; "0,-0.15,-0.15"; "0,-0.15,-0.59557"; "0,1.15,-0.59557"; "0,1.15,-0.15"; "0,-0.15,-0.15 "
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]
AC_Layout = [
    "laythw"; "-layout t AguaClara 0"; "View"; "layout d Layout1"; " d Layout2"; "layout r View"; "TopView"; "layout s TopView"; ".ms"; "z o all "
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]
AC_Filter =  # no stored result
