A_pipe := A_pipes(EN_PipeSpec)
Q_pipe := Q_pipes(ED_SedInlet, A_pipe, Pi_VenaContractaOrifice)
# Sedimentation Influent Manifold Program
# The maximum allowable pipe used for the influent manifold
ND_SedManifoldMax =  # error: This variable is undefined.
Manifold_maxindex := findindexID(ND_SedManifoldMax, EN_PipeSpec) = 9
A_SedManifoldPipeMax := A_pipe[Manifold_maxindex]
# This is the maximum possible length of a sedimentation tank for the maximum pipe size
L_SedMax := Q_pipe[Manifold_maxindex]/(V_SedUpBod*W_SedBay) = 45.4666 m
# The area of the water flowing through the manifold ports must be equal to the area of the manifold
Q_Sed := Q_Plant/N_SedTanks = 5 L/s  # Flow rate through one sed tank
A_SedManifoldPorts := A_SedManifoldPipeMax/Pi_VenaContractaOrifice = 0.123469 m^2
# This is the minimum number of bays required for the entire plant
N_SedBaysTotal := ceil(Q_Plant/(V_SedUpBod*W_SedBay*L_SedMax)) = 1
Q_SedManifoldPort := V_SedUpBod*W_SedBay*B_SedManifoldPortEst = 0.0810185 L/s
N_SedManifoldPortsMax := floor(L_SedMax/B_SedManifoldPortEst)
N_SedBaysMin := ceil(N_SedBaysTotal/N_SedTanks)
# The number of bays per tank is the maximum of the calculated value and the user input
N_SedBays := max(N_SedBaysMin, N_SedBaysEst)
L_SedEst := Q_Sed/(W_SedBay*N_SedBays*V_SedUpBod)
W_Sed := N_SedBays*W_SedBay
Q_SedBay := Q_Sed/N_SedBays = L/s
Q_SedManifold := Q_SedBay = L/s  # There is one manifold per bay
Manifold_index := findindexQ(Q_SedManifold, Q_pipe)
Q_SedManifoldcapacity := Q_pipe[Manifold_index] = L/s
A_SedManifoldPipe := A_pipe[Manifold_index]
ND_SedManifold := NominalDiameter(2*sqrt(A_SedManifoldPipe/π), EN_PipeSpec)
ID_SedManifoldPipe := innerdiameter(ND_SedManifold, EN_PipeSpec)
OD_SedManifoldPipe := outerdiameter(ND_SedManifold)
S_SedManifoldBetween := V_SedUpBod*W_SedBay/(2*V_Scour)
# Inlet Channel Design
L_Channel := N_SedTanks*W_Sed + (N_SedTanks + 1)*T_PlantWall  # Length of the Inlet Channel
# The area of the inlet channel must be large enough not to break up flocs
A_InletChannel := A_Channel(Q_Plant, ED_SedInlet, Pi_VenaContractaOrifice)
HW_InletChannelEst := sqrt(A_InletChannel)  # Assume the channel is square
# This is the required width of the inlet channel in order to prevent floc breakup
W_InletChannelED := A_InletChannel/HW_InletChannelEst
ND_SedManifoldEntrance := ND_SedManifold  # The inlet pipe is set to be the same as the manifold pipe
D_SedManifoldEntrance := innerdiameter(ND_SedManifoldEntrance, EN_PipeSpec)
A_SedChimneyPipe := (D_SedManifoldEntrance/2)^2*π
# This is the minimum width of the inlet channel in order to fit the coupling of the manifold entrance pipe.  The diameter of a cap is being used as an estimate for the outer diameter of the coupling socket for now
W_InletChannelCoupling := 2*ConRadius(vlookup(OD_SedManifoldPipe, Pipesizescoupling, 1)[0]) + 2*S_SedInletChannelMin
W_InletChannelEst := max(W_InletChannelED, W_InletChannelCoupling)
# The Channel not necesseraly being square and the width already known, we calculate the actual height of the channel
HW_InletChannel := H_Channel(Q_Plant, W_InletChannelEst, Pi_VenaContractaOrifice, ED_SedInlet)
Geom_InletChannel :=
    hl_weir ← Headloss_weir(Q_Plant, W_InletChannelEst)
    Geom_Channel ← Perpindicular_Weir if (hl_weir ≤ HL_SedWeirMax)
    Geom_Channel ← Parallel_Weir otherwise
    return Geom_Channel
W_SedWeirInlet :=
    W_InletChannelEst if Geom_InletChannel == Perpindicular_Weir
    L_Channel otherwise
HL_SedWeirInlet := Headloss_weir(Q_Plant, W_SedWeirInlet)
H_SedWeirInlet := HW_InletChannel - HL_SedWeirInlet
W_InletChannel :=
    W_SedWeirInlet if Geom_InletChannel == Perpindicular_Weir
    w_minchannelHL(H_SedWeirInlet, HW_InletChannel, Q_Plant, L_Channel, Nu_Water, E_Concrete, 1, HL_SedWeirInlet) + T_SedWeir + W_InletChannelEst if Geom_InletChannel == Parallel_Weir
H_InletChannelEst := HW_InletChannel + H_PlantFreeboard
# Exit Channel Design
L_ExitChannel := L_Channel
# To ensure uniform distribution of flow between tank bays, head loss in the channel was designed to be twenty times smaller than head loss in the launder. After converting from head loss to flow, the ratio of flow rates in the launders is calculated to be sqrt(20/21)
Π_QSedTanks := sqrt(20/21)
# The exit channel needs to at least be wide enough to fit a cap onto the launders
W_ExitChannelMin := 10 in
H_ExitChannelEst := H_InletChannelEst
HW_ExitChannel := HW_InletChannel - HL_SedLaunderBod
FindSide(Q, L, υ, ε, open) :=
    b ← W_InletChannel
    w ← b
    error ← 1
    while error > 0.001
        h_temp ← h_frect(Q, w, b, L, υ, ε, open)
        b ← b*(h_temp/HL_SedLaunderBod*Π_QSedTanks^2/(1 - Π_QSedTanks^2))^(1/4)
        w ← b
        error ← |h_temp/HL_SedLaunderBod - (1 - Π_QSedTanks^2)/Π_QSedTanks^2|
    return w
# The exit channel is design by assuming the weir geometry is a perpindicular weir, and then the maximum of the the width determined by the headloss in the exit channel and the minimum width to be albe to fit a cap on the launders is chosen
W_ExitChannelEst := max(FindSide(Q_Plant, L_Channel, Nu_Water, E_Concrete, 1), W_ExitChannelMin)
Geom_ExitChannel :=
    hl_weir ← Headloss_weir(Q_Plant, W_ExitChannelEst)
    Geom_Channel ← Perpindicular_Weir if (hl_weir ≤ HL_SedWeirMax)
    Geom_Channel ← Parallel_Weir otherwise
    return Geom_Channel
W_SedWeirExit :=
    W_ExitChannelEst if Geom_ExitChannel == Perpindicular_Weir
    L_Channel otherwise
HL_SedWeirExit := Headloss_weir(Q_Plant, W_SedWeirExit)
H_SedWeirExit := HW_ExitChannel - HL_SedWeirExit
W_ExitChannel :=
    W_SedWeirExit if Geom_ExitChannel == Perpindicular_Weir
    (W_ExitChannelMin + T_SedWeir + w_minchannelHL(H_SedWeirExit, HW_ExitChannel, Q_Plant, L_Channel, Nu_Water, E_Concrete, 1, HL_SedWeirExit)) otherwise
# Lamella Design
# S is the distance from the faces of each plate
S_SedPlate := B_SedPlateMin - T_SedPlate
# Estimate a length of the lamella based on the estimate of the up velocity and of the height between the top of the the lamella and the bottom of the inlet channel.
L_SedPlateEst :=
    L1 ← (B_SedPlateMin*(V_SedUpBod/V_SedCBod - 1) + T_SedPlate)/(sin(AN_SedPlate)*cos(AN_SedPlate))
    L2 ← 0 m
    L_SedLaunder ← L_SedEst - T_ChannelWall - W_InletChannel - W_ExitChannel
    N_SedLaunderOrifices ← floor(L_SedLaunder/B_SedLaunderOrificesEst)
    ND_SedLaunder ← ND_Manifold(Q_SedBay/N_SedLaunders, HL_SedLaunderBod, L_SedLaunder, Pi_QLaunderOrifices, EN_PipeSpec, Nu_Water, E_Pvc, K_PipeExit, N_SedLaunderOrifices)
    H_SedAboveEst ← 15 cm
    H_between ← H_InletChannelEst + T_ChannelWall - outerdiameter(ND_SedLaunder) - H_SedAboveEst - S_LamellaLaunder
    while |L1 - L2| > 0.01 m
        L_Inactive ← H_between/tan(AN_SedPlate) + W_InletChannel + W_ExitChannel + 2*T_ChannelWall
        V_Up ← Q_Sed/(W_Sed*(L_SedEst - L_Inactive))
        L2 ← L1
        L1 ← (B_SedPlateMin*(V_Up/V_SedCBod - 1) + T_SedPlate)/(sin(AN_SedPlate)*cos(AN_SedPlate))
    return L1
L_SedPlateEst =  # error
# The actual function L.Sed.Plate does not realize any iteration, it gives the same result as the following equation.
# Calculate the actual length of the lamella
L_SedPlate := L_SedPlateSheet/floor(L_SedPlateSheet/L_SedPlateEst)
L_SedInactiveEst := L_SedPlate*cos(AN_SedPlate) + W_InletChannel + W_ExitChannel + 2*T_ChannelWall
L_SedInactiveEst1 :=
    L_SedLaunder ← L_SedEst - T_ChannelWall - W_InletChannel - W_ExitChannel
    N_SedLaunderOrifices ← floor(L_SedLaunder/B_SedLaunderOrificesEst)
    ND_SedLaunder ← ND_Manifold(Q_SedBay/N_SedLaunders, HL_SedLaunderBod, L_SedLaunder, Pi_QLaunderOrifices, EN_PipeSpec, Nu_Water, E_Pvc, K_PipeExit, N_SedLaunderOrifices)
    H_SedAboveEst ← 15 cm
    H_between ← H_InletChannelEst + T_ChannelWall - outerdiameter(ND_SedLaunder) - H_SedAboveEst - S_LamellaLaunder
    L_Inactive ← H_between/tan(AN_SedPlate) + W_InletChannel + W_ExitChannel + 2*T_ChannelWall
    return L_Inactive
H_SedPlate := L_SedPlate*sin(AN_SedPlate)
# Launder Hydraulic Calculations
L_SedLaunderEst := L_SedEst - T_ChannelWall - W_InletChannel - W_ExitChannel
# There will be two orifices per row along the active length of the launder
N_SedLaunderOrificesEst := 2*floor((L_SedEst - L_SedInactiveEst)/B_SedLaunderOrificesEst)
Q_SedLaunderOrificesEst := (Q_SedBay/N_SedLaunders)/N_SedLaunderOrificesEst
K_SedLaunder := K_PipeExit
ND_SedLaunder := ND_Manifold(Q_SedBay/N_SedLaunders, HL_SedLaunderBod, L_SedEst - L_SedInactiveEst, Pi_QLaunderOrifices, EN_PipeSpec, Nu_Water, E_Pvc, K_SedLaunder, N_SedLaunderOrificesEst)
# This the HL do to major & minor losses loses
HL_SedLaunderEst := HL_Manifold(Q_SedBay/N_SedLaunders, innerdiameter(ND_SedLaunder, EN_PipeSpec), L_SedEst - L_SedInactiveEst, 0, Nu_Water, E_Pvc, N_SedLaunderOrificesEst) + h_f(Q_SedBay/N_SedLaunders, innerdiameter(ND_SedLaunder, EN_PipeSpec), L_SedInactiveEst, Nu_Water, E_Pvc)
HL_SedLaunder =  # error
HL_SedLaunderOrifice := HL_SedLaunderBod - HL_SedLaunderEst
D_SedLaunderOrifice := RoundNearest(D_circle(A_orifice(HL_SedLaunderOrifice, Pi_VenaContractaOrifice, Q_SedLaunderOrificesEst)), D_Drill)
Q_SedLaunderOrifices := Q_orifice(D_SedLaunderOrifice, HL_SedLaunderOrifice, Pi_VenaContractaOrifice)
A_orifice(HL_SedLaunderOrifice, Pi_VenaContractaOrifice, Q_SedLaunderOrificesEst) =  # error
# This is the total headloss through the launder based on the actual diameter of the orifices
HL_SedLaunder := h_orifice(D_SedLaunderOrifice, Pi_VenaContractaOrifice, Q_SedLaunderOrifices)
# H.SedAbove is the height needed above the lamella
H_SedAbove := outerdiameter(ND_SedLaunder) + HL_SedLaunder
OD_LaunderCoupling := 2*ConRadius(vlookup(outerdiameter(ND_SedLaunder), Pipesizescoupling, 1)[0])
# this is the outer diameter of the coupling that fits the launder into the exit channel
# Adjustment of the plate settlers
H_ExitChannel := H_ExitChannelEst + max(0, H_PlantFreeboard - H_ExitChannelEst + HL_SedLaunder + OD_LaunderCoupling + T_ConcreteMin)
# This is the new depth of the inlet and exit channels taken into account the fact that the launders need to flow fully into the exit channel.
H_InletChannel := H_ExitChannel
L_SedActiveEst := L_SedEst - L_SedInactiveEst + (H_SedPlate + H_SedAbove + H_PlantFreeboard - H_ExitChannel - T_PlantWall)/tan(AN_SedPlate)
B_SedPlateHorizontal := B_SedPlateMin/sin(AN_SedPlate)  # The center to center horizontal distance between the lamella sheets
N_SedPlatesEst := floor(L_SedActiveEst/B_SedPlateHorizontal)
# Number of spaces where water is traveling is one less than the number of plates used to create those spaces
# This part of the code serves to draw the module pipe for the plate settlers.
ND_SedModulePipe := 0.5 in  # This is the diameter of the pipe used to hold the lamina together
ND_SedModulePipeSpace := 3/4*in  # This is the diameter of the ledge that serves as a ledge for the plate setter to lie on.
# In order to understand the meaning of each value please refer to the autocad drawing Lamina.Explanation
S_SedPlateModuleMin := 2 cm
S_SedModulePipesMin := 2/3*L_SedPlate
N_SedModulePlates := floor(((L_SedPlate - 2*outerdiameter(ND_SedModulePipe) - S_SedModulePipesMin - 2*S_SedPlateModuleMin)*tan(AN_SedPlate) + S_SedPlate)/(T_SedPlate + S_SedPlate))
# This is the number of plates per module.
L_SedModulePipe := (N_SedModulePlates*(T_SedPlate + S_SedPlate) - S_SedPlate)  # This is the length of a sed module pipe.
S_SedModulePipes := L_SedPlate - 2*outerdiameter(ND_SedModulePipe) - 2*S_SedPlateModuleMin - L_SedModulePipe/tan(AN_SedPlate)
# This is the actual spacing between the pipes.
N_Modules := ceil(N_SedPlatesEst/N_SedModulePlates)
N_SedPlates := N_Modules*N_SedModulePlates
L_Sed := L_SedEst + (N_SedPlates - N_SedPlatesEst)*B_SedPlateHorizontal
L_SedEst =  # error
L_SedActive := (N_SedPlates - 1)*B_SedPlateHorizontal
L_SedInactive := L_Sed - L_SedActive
# The length of the active sed tank where water actually flow
L_SedActive1 := L_SedActive - N_SedPlates*T_SedPlate/sin(AN_SedPlate)
(N_SedPlates - N_SedPlatesEst)*B_SedPlateHorizontal =  # error
V_SedUp := Q_Sed/(L_Sed*W_Sed)
V_SedUpActive := Q_Sed/(L_SedActive1*W_Sed)
V_SedC := V_SedUpActive/(1 + L_SedPlate/S_SedPlate*cos(AN_SedPlate)*sin(AN_SedPlate))
# Design paramaters for orifices in launder and inlet manifold
# This is the number of rows of orifices.  There are two orifices per row
N_SedLaunderOrificesRow := ceil((Q_SedBay/N_SedLaunders)/(2*Q_SedLaunderOrifices))
# Total number of orifices on the launder
N_SedLaunderOrifices := N_SedLaunderOrificesRow*2
B_SedLaunderOrifices := 2*L_SedActive/N_SedLaunderOrifices
# This portion of the code helps us calculate the number of ports in the inlet manifold. The basis is that there is no ports under the elbow socket depth and the first port is spaced B.SedManifoldPorts/2 from the socket depth. Hence the available length for the ports is L.Pipe-SocketDepth-B/2
L_SedManifoldPipe := L_Sed - W_InletChannelEst/2 - CapHeight(ND_SedManifold)
# The number of ports per manifold calculated from the actual sed length
N_SedManifoldPortsEst := floor((2*(L_SedManifoldPipe - ElbowRadius(ND_SedManifold) - SocketDepth(ND_SedManifold)) - B_SedManifoldPortEst)/(2*B_SedManifoldPortEst))
D_SedManifoldPort := RoundNearest(D_circle(A_SedManifoldPipe/(Pi_VenaContractaOrifice*N_SedManifoldPortsEst)), D_Drill)  # The diameter of a single port
A_SedManifoldPort := A_circle(D_SedManifoldPort)  # The area of a single port
N_SedManifoldPorts := round(A_SedManifoldPipe/(Pi_VenaContractaOrifice*A_SedManifoldPort))  # The number of ports given the area calculated
# Calculate the energy dissipation rate created by the port. We will use this to evaluate this design.
ED_SedManifoldPort := ED(Q_SedManifoldPort, A_SedManifoldPort, Pi_VenaContractaOrifice)
# The spacing of the manifold ports is redefined because the manifold is shorter due to the elbow
B_SedManifoldPort := (L_SedManifoldPipe - ElbowRadius(ND_SedManifold) - SocketDepth(ND_SedManifold) - D_SedManifoldPort)/(N_SedManifoldPorts - 1/2)
L_SedLaunder := L_Sed - 2*T_ChannelWall - CapHeight(ND_SedLaunder) - W_InletChannel - W_ExitChannel
# Sludge Drain Program
# Here we are assuming that we are willing to use up to 80% of the available energy to get the flow through the valve and discharge it to atmosphere.
HL_Valve := 0.8*HW_SedEst
# This is the initial drain rate
# The factor of two is because the flow rate decreases linearly as the tank drain (for a constant cross section tank). Thus the average drain rate is 1/2 the initial drain rate.
Q_SedSludgeDrain := 2*W_SedBay*L_Sed*HW_SedEst/Ti_SludgeDrain
# There will be a drain orifice in between each manifold port
B_SedSludgeOrifices := B_SedManifoldPort
N_SedSludgeOrifices := floor(L_Sed/B_SedSludgeOrifices)  # per bay
Q_SedSludgeOrifices := Q_SedSludgeDrain/N_SedSludgeOrifices
ND_SedSludgeValve := NominalDiameter(D_TankDrain(L_Sed, W_SedBay, HW_SedEst, Ti_SludgeDrain, K_PipeExit + K_GateValve), EN_PipeSpec)
# This is the actual head loss through the valve given its diameter
HL_SedDrainValve := h_e(Q_SedSludgeDrain, innerdiameter(ND_SedSludgeValve, EN_PipeSpec), K_GateValve + K_PipeExit)
HL_SludgeDrain := HW_SedEst - HL_Valve
# This is the required diameter of the sludge drain if it were circular
D_SedSludge := D_Manifold(Q_SedSludgeDrain, HL_SludgeDrain, L_Sed, Pi_QSludgeOrifices, Nu_Water, E_Concrete, 0, N_SedSludgeOrifices)
HL_SedSludgeEst := HL_Manifold(Q_SedSludgeDrain, D_SedSludge, L_Sed, 0, Nu_Water, E_Concrete, N_SedSludgeOrifices)
HL_SedSludgeOrificeEst := HL_SludgeDrain - HL_SedSludgeEst
D_SedSludgeOrifice := RoundNearest(D_circle(A_orifice(HL_SedSludgeOrificeEst, Pi_VenaContractaOrifice, Q_SedSludgeOrifices)), D_Drill)
# The cross sectional area of the drain if it were circular
A_SedSludge := π/4*D_SedSludge^2
# Assume sludge drain is twice as wide as it is high (to save depth in the sed tank)
W_SedSludge := sqrt(2*A_SedSludge)
H_SedSludge := A_SedSludge/W_SedSludge
# The width of the drain cover needs to rest on the ledge created by the drain
W_SedDrainCover := W_SedSludge + 2*T_ConcreteMin
# The thickness of the sed sludge is defined to be equal to the quarter of the width of the sed sludge drain cover..This 1/4 is a negociable constant
T_SedSludge := T_ConcreteMin
# The elevation of the top of the sludge drain and drain cover
Z_SedSludge := T_SedSludge + H_SedSludge
# Sedimentation Components
# This is the width of the sloped part of the sed tank wall.  It will be used to calculate the elevation of the bay walls
W_SedSlope := (W_SedBay - W_SedDrainCover)/2 - T_ConcreteMin/2
W_SedInletBottom := (W_SedBay - W_SedDrainCover)/2
H_SedSlopeTriangle := tan(AN_SedSlope)*W_SedSlope
# The elevation of the center of the manifold includes the minimum space between the outside of the manifold pipe and the drain cover
H_SedBetween := max(H_SedSlopeTriangle, ConRadius(ND_SedManifold) + 2*SocketDepth(ND_SedManifold) + ElbowRadius(ND_SedManifold)) - H_SedSlopeTriangle
Z_SedManifoldPipe := Z_SedSludge + (ConRadius(ND_SedManifold) + S_SedManifoldBetween)
# The elevation of the top of the sloped walls
Z_SedSlopes := Z_SedSludge + H_SedSlopeTriangle
# H.SedBetween is a user specified distance between the top of the sloped walls and the bottom of the pipefram (i.e. additional distance wanted for a floc blanket. The height of water in the sed tank is the sum of all of the heights of the components plus the additional specified space
HW_Sed := Z_SedSlopes + H_SedBetween + 2*outerdiameter(ND_SedPlateFrame) + H_SedPlate + H_SedAbove + T_ConcreteMin + S_LamellaLaunder
H_Sed := HW_Sed + H_PlantFreeboard
Z_Mp := HW_Sed - HW_InletChannel
# The elevation of the launder
Z_SedLaunder := HW_Sed - HL_SedLaunder - outerradius(ND_SedLaunder)
H_SedBayDivider := Z_SedSlopes + H_SedBetween
# Launder Cap
# The size of the opening in the cap to allow the inflow of water into the sedimentation tank is determined by the Orifice Equation Q=A*K*(2*g*h)^.5 so that the flow rate through the cap is at most the flow rate out of the other sedimentation tanks.
HW_LaunderCap := H_Sed - H_ExitChannel + HW_ExitChannel
A_LaunderCapOrifice := Q_Sed/(Pi_VenaContractaOrifice*sqrt(2*g*HW_LaunderCap))
D_CapOrifice := RoundNearest(D_circle(A_orifice(h_orifice(sqrt(A_LaunderCapOrifice/(π/4)), Pi_VenaContractaOrifice, Q_SedBay/N_SedLaunders), Pi_VenaContractaOrifice, Q_SedBay/N_SedLaunders)), D_Drill)
L_LaunderCouplingPipe := T_PlantWall + CapHeight(ND_SedLaunder)
# Using the pipe database file, and given the schedule of the pipe, the nominal diameter of the inlet and exit tank pipes are determined.  The headloss through the pipe is asumed to be the height of the sed tank.  The headloss is halved to be conservative. The inlet tank pipe is assumed to be the same as the exit tank pipe.
ND_PltWeir := D_pipeschedule(Q_Plant, EN_PipeSpec, H_Sed/2, H_Sed + L_Sed, Nu_Water, E_Pvc, 2*K_90 + 2*K_PipeExit)
Del_PltWeirH := (3*Q_Plant/(2*Cd_PltWeir*sqrt(2*g)*π*ND_PltWeir))^(2/3)
H_PltWeir := HW_ExitChannel + H_PlantFreeboard/2
# Sedimentation Drain Design
D_Valvem := [0.0508; 0.0762; 0.1016; 0.127; 0.1524; 0.1778; 0.2032]*m
SedValveSize(desiredT) :=
    tankDrainTime ← 100 hr
    i ← 0
    D_Valve ← 0 m
    D_Valve ← D_Valvem[last(D_Valvem)] if desiredT ≤ 16*W_SedBay^1.5*tan(AN_SedPlate)^0.5*L_Sed/(π*3*D_Valvem[last(D_Valvem)]^2*sqrt(2*g)) + (sqrt(HW_Sed) - sqrt(W_SedBay/2*tan(AN_SedPlate)))/((π*D_Valvem[last(D_Valvem)]^2/(8*L_Sed*W_SedBay))*sqrt(2*g/Pi_VenaContractaOrifice))
    while i < rows(D_Valvem) and D_Valve == 0 m
        tankDrainTime ← 16*W_SedBay^1.5*tan(AN_SedPlate)^0.5*L_Sed/(-π*3*D_Valvem[i]^2*sqrt(2*g)) + (sqrt(HW_Sed) - sqrt(W_SedBay/2*tan(AN_SedPlate)))/((π*D_Valvem[i]^2/(8*L_Sed*W_SedBay))*sqrt(2*g/Pi_VenaContractaOrifice))
        D_Valve ← D_Valvem[i] if tankDrainTime < desiredT
        i ← i + 1 otherwise
        D_Valve
# considers the sed tank drained at a water height of zero because this is not an iterative problem liek floc tank
# First term is the drain time for a triangular prism, the second term is the drain time for the sed tank above the slopes.  This line is intended to assign the valve to be the largest size if the drain time cannot be acheived by event he alrgest valve.
# Iterates througha llowable valve sizes to find the one that drains in the desired time
# This is duplicating the design work. The sed sludge valve size is already calcualted above. I recommend that all of this code in red be deleted.
D_SedValveCalc := SedValveSize(Ti_FlocDrain)  # assumes same drain time for floc tank
D_SedValve := 2*outerradius(NominalDiameter(D_SedValveCalc, EN_PipeSpec))
# Uses the nominal valve size to calculate the actual valve size for drawing purposes.  D.SedValve is the OD of the coupling and ID of the valve.
H_SedSlope := D_SedValve/2
D_SedScale := D_SedValve/(1.16 m)  # This scale is due to the size of the orignal valve block that is being inserted
L_Sed =  # error
L_SedActive =  # error
