# Sedimentation Tank
# design at half flow rate for plants which are "double train" i.e. over 100Lps. this applies to the sed tank, flocculator and lfom files, in the entrance tank file this returns to the design flow and then goes back to half for the srsf.
# Inlet manifold diffuser design for energy dissipation rate
W_Sed := W_SedPlate
W_SedDiffuserInnerMin := ((Pi_JetPlane*W_Sed*V_SedUpBod)^3/ED_SedInletMax)^(1/4)
W_SedDiffuserInner := max(Ceil(W_SedDiffuserInnerMin, 1/16*in), 1/16*in)
ED_SedInlet := (Pi_JetPlane*V_SedUpBod*W_Sed)^3/W_SedDiffuserInner^4
PS_SedDiffuser := SDR_26
PS_SedDiffuserStr := PSToString(PS_SedDiffuser)
T_SedDiffuserPvc := (OD(ND_SedDiffuser) - ID(ND_SedDiffuser, PS_SedDiffuser))/(2*Pi_PvcStretch)
Circ_SedDiffuserInner := Pi_PvcStretch*π*ID(ND_SedDiffuser, PS_SedDiffuser)
L_SedDiffuserInner := (Circ_SedDiffuserInner - 2*W_SedDiffuserInner)/2
L_SedDiffuserOuter := L_SedDiffuserInner + 2*T_SedDiffuserPvc
B_SedDiffuser := Ceil(L_SedDiffuserOuter, 1 cm)
V_SedDiffuser := V_SedUpBod*W_Sed*B_SedDiffuser/(W_SedDiffuserInner*(B_SedDiffuser - 2*T_SedDiffuserPvc))
HL_SedDiffuser := V_SedDiffuser^2/(2*g)
# Number of sed tanks
# Max manifold flow rate
PS_SedMan := SDR_41
PS_SedManStr := PSToString(PS_SedMan)
Q_SedManifoldMaxED := Q_PipeED(ED_SedInletMax, ID(ND_SedManifoldMax, PS_SedMan), Pi_VCOrifice, Pi_JetRound)
V_SedManifoldMaxFlowDist := sqrt(((1 - Pi_QSedInlet^2)/(Pi_QSedInlet^2 + 1))*4*g*HL_SedDiffuser)
Q_SedManifoldMaxFlowDist := π*IR(ND_SedManifoldMax, PS_SedMan)^2*V_SedManifoldMaxFlowDist
Q_SedManifoldMax := min(Q_SedManifoldMaxED, Q_SedManifoldMaxFlowDist)
# Max flow rate for convenient pipe lengths
Q_SedMaxUpflowLength := V_SedUpBod*W_Sed*L_SedUpflowMax
# Max sed tank flow rate
Q_SedMax := Floor(min(Q_SedMaxUpflowLength, Q_SedManifoldMax), 1*L/s)
N_SedTanksMinFit :=
    3 if Q_Train > Q_PlantMaxLF
    1 otherwise
N_SedTanksMinFit := 3  # added mrf222
N_SedTanksMinQ := ceil(Q_Train/Q_SedMax - 0.00001)
# Subtracting 0.00001 is necessary because when the two flow rates being divided result in what should be an integer mathcad returns a number very slightly larger.
N_SedTanks := max(N_SedTanksMinFit, N_SedTanksMinQ)
Q_Sed := Q_Train/N_SedTanks
L_SedActiveEst :=
    Q_Sed/(W_Sed*V_SedUpBod) - L_SedPlateEst*cos(AN_SedPlate) if Q_Train > Q_PlantMaxLF
    Q_Sed/(W_Sed*V_SedUpBod) otherwise
# Inlet manifold and launder diameters
ND_SedManifold := ND_Min((4/π*Q_Sed/V_SedManifoldMaxFlowDist)^(1/2), PS_SedMan)
ND_SedLaunder := ND_Manifold(Q_Sed, HL_SedLaunderBod, L_SedActiveEst, Pi_QLaunderOrifices, SDR_26, Nu_Water, E_Pvc, K_PipeExit, floor(L_SedActiveEst/B_SedLaunderOrificesEst))
# Design assuming thicker-walled SDR 26 for conservative design and to avoid looping
PS_SedLaunder := PS_Decision(ND_SedLaunder)
PS_SedLaunderStr := PSToString(PS_SedLaunder)
# Inlet channel
L_SedChannel := N_SedTanks*W_Sed + T_SedWall + (N_SedTanks - 1)*T_SedDividingWall
# Length of the inlet channel, which runs along the entire width of the sed tanks.
HL_SedWeirExit := Headloss_weir(Q_Train, L_SedChannel)
Pi_QSedTanks := 0.95
HL_SedInletChannelMax := (HL_SedLaunderBod + HL_SedDiffuser)*(1 - Pi_QSedTanks^2)
# For the HW.SedInletChannelMax constraint, the following logic should be applied:
#
# Jet reverser > DIffusers > Manifold > Floc Weir (fixed height above manifold) > Plate settler support pipes (fixed height above floc weir to avoid interfering with floc blanket surface) > Plate settlers > Launder > Outlet weir > Outlet channel water level > Inlet channel water level > Top of tank wall with freeboard.
#
# If this is the case then the total channel height never factors in, so that constraint would have been set to make sure there was a sufficient gap between the top of the floc weir and the bottom of the channel for access and constructibility. The 35cm seems like a shortcut based on dimensioning the drawing. What should be set is a minimum acceptable gap between the floc weir and the channel bottom, and then define a max channel depth based on that gap and the other elevation variables like plate length, etc. The shortcut was used because the channel depth is calculated before any of the other elevation variables are defined and whoever coded it (most likely Drew) didn't want to re-organize the whole algorithm at the time.
HW_SedInletChannelMax := 50 cm  # relaxed from 35 cm to 50 cm on 8/10/16 by jsc377
W_SedInletChannelPreWeirMinPlumbing := OD_Fitting(ND_SedManifold) + 2*S_Fitting
W_SedInletChannelPreWeirMinHL := W_HorizChannel(Q_Train, HW_SedInletChannelMax, HL_SedInletChannelMax, L_SedChannel, Nu_Water, E_Concrete, 0, 0)
W_SedInletChannelPreWeir := max(W_SedInletChannelPreWeirMinPlumbing, W_SedInletChannelPreWeirMinHL)
# A note about the inlet and exit channels for extremely large plants/ future work:
#
# You are always going to run into this inlet channel depth constraint for large sets of sed tanks in big plants, unless you are willing to make the whole tank deeper (plate length would no longer always dictate the elevation of the top of the wall - channel height would when it gets large enough). You could do a cost analysis to get a better sense of whether it's better to go deeper or longer (wider channel adds directly to tank length). Keep in mind that the flocculator design is also affected.
#
# One practical consideration for the wide channel is operator access to the exit channel. At the very least, at a certain point you may want to switch the central channel dividing wall to a full brick wall (15+cm) or even thicker (bricks turned lengthwise to be ~ 25cm?) rather than the 5cm weir, to allow operators to straddle the channels more comfortably. This would still be awkward but isn't worse than what we've been doing. Could officially recommend sliding a board along the tops of the channel walls to stand on. Keep in mind that this adds directly to your total tank length. As long as the floc hopper is accessible I can't think of any other dealbreaker practical problems with a wide channel.
HW_SedInletChannelMinPlumbing := HL_SedLaunderBod + HL_SedDiffuser + OD_Fitting(ND_SedLaunder) + S_Fitting + HL_SedWeirExit
HW_SedInletChannelHL := H_HorizChannel(Q_Train, W_SedInletChannelPreWeir, HL_SedInletChannelMax, L_SedChannel, Nu_Water, E_Concrete, 0)
HW_SedInletChannel := max(HW_SedInletChannelMinPlumbing, HW_SedInletChannelHL)
H_SedInletChannel := HW_SedInletChannel + H_PlantFreeboard
# notes from Drew Hart, added by pc479, 5/3/16
W_SedWeirInlet := L_SedChannel
HL_SedWeirInlet := Headloss_weir(Q_Train, W_SedWeirInlet)
H_SedWeirInlet := HW_SedInletChannel + H_SedInletWeirFreeboard  # The weir height should be set to not overflow during normal operation.
W_SedInletChannelPostWeir := max(W_ChannelMin, W_HorizChannel(Q_Train, H_SedWeirInlet, H_SedWeirInlet, L_SedChannel, Nu_Water, E_Concrete, 1, 0))
W_SedInletChannel := W_SedInletChannelPreWeir + T_SedWeir + W_SedInletChannelPostWeir
V_SedInletChannel := Q_Train/(W_SedInletChannelPreWeir*HW_SedInletChannel)  # This is the velocity in the part of the channel that delivers the flocs
ND_SedChannelDrain := ND_PipeFlow(Q_Train, SDR_26, HW_SedEst, HW_SedEst + W_SedInletChannel, Nu_Water, E_Pvc, K_PipeEnt + K_PipeExit + K_El90)
# Design assuming thicker-walled SDR 26 for conservative design and to avoid looping
PS_SedChannelDrain := PS_Decision(ND_SedChannelDrain)
PS_SedChannelDrainStr := PSToString(PS_SedChannelDrain)
W_SedInletChannelDrainBox := max(2*S_Fitting + OD_Fitting(ND_SedChannelDrain), W_SedInletChannelPostWeir)
# Outlet pipe to filter
L_SedToFiPipeEst := W_DCWalkway + W_SedInletChannel + 1 m
ND_SedToFiPipeMax := 8 in
PS_SedToFiPipe := SDR_41
PS_SedToFiPipeStr := PSToString(PS_SedToFiPipe)
Q_SedToFiPipeMax := Q_pipetotal(ID(ND_SedToFiPipeMax, PS_SedToFiPipe), HL_SedToFiPipeMax, L_SedToFiPipeEst, Nu_Water, E_Pvc, 2*K_El90 + K_PipeEnt + K_PipeExit)
N_SedToFiPipes := ceil(Q_Train/Q_SedToFiPipeMax)
Q_SedToFiPipe := Q_Train/N_SedToFiPipes
ND_SedToFiPipe := ND_PipeFlow(Q_SedToFiPipe, PS_SedToFiPipe, HL_SedToFiPipeMax, L_SedToFiPipeEst, Nu_Water, E_Pvc, 2*K_El90 + K_PipeEnt + K_PipeExit)
HL_FiEntrancePipe := h_l(Q_SedToFiPipe, ID(ND_SedToFiPipe, PS_SedToFiPipe), L_SedToFiPipeEst, 2*K_El90 + K_PipeEnt + K_PipeExit, Nu_Water, E_Pvc)
# Exit channel
H_SedExitChannel := H_SedInletChannel
HW_SedExitChannel := HW_SedInletChannel - HL_SedLaunderBod - HL_SedDiffuser
H_SedWeirExit := HW_SedExitChannel - HL_SedWeirExit
# water depth in the sed exit channel at the end of the channel. The head loss calculation assumes that head loss is small relative to depth of water and that is the case for this channel.
HW_SedWeirExit := H_SedWeirExit - H_SedWeirFreeboard
W_SedExitChannelPreWeir := W_ChannelMin
W_SedExitChannelPostWeir := max(S_Fitting + OD_Fitting(ND_SedToFiPipe), S_Fitting + OD_Fitting(ND_SedChannelDrain), W_ChannelMin, W_HorizChannel(Q_Train, HW_SedWeirExit - H_SedExitFree, HW_SedWeirExit, L_SedChannel, Nu_Water, E_Concrete, 1, K_sedexit))
# modified 10/26/16 by mrf222
W_SedExitChannel := W_SedExitChannelPreWeir + T_SedWeir + W_SedExitChannelPostWeir
W_SedExitChannelDrainBox := max(S_Fitting + OD_Fitting(ND_SedChannelDrain), W_SedExitChannelPostWeir)
# Hopper length
L_SedHopper :=
    W_SedExitChannel + T_SedWeir + W_SedInletChannel + T_SedChannelWall - T_SedWeir if Q_Train > Q_PlantMaxLF
    max(L_SedHopperMin, L_SedPlateEst*cos(AN_SedPlate) - T_SedWeir) otherwise
# Plate settlers and total tank length
L_SedPlate := Ceil((S_SedPlate*(V_SedUpBod/V_SedCBod - 1) + T_SedPlate*V_SedUpBod/V_SedCBod)/(sin(AN_SedPlate)*cos(AN_SedPlate)), 10 cm)
N_SedPlates :=
    CeilNearest((L_SedActiveEst*sin(AN_SedPlate) - T_SedPlate)/(S_SedPlate + T_SedPlate), PlateIndex) if Q_Train > Q_PlantMaxLF
    CeilNearest(((L_SedActiveEst + T_SedWeir + L_SedHopper - L_SedPlate*cos(AN_SedPlate))*sin(AN_SedPlate) - T_SedPlate)/(S_SedPlate + T_SedPlate), PlateIndex) otherwise
# We're not using this function any more. This should be reconciled by fixing the PlateIndex function in the MaterialsDatabase.xmcd file. In porting over to Python, please rewrite this function so that it takes into account the new PlateIndex function that is based off modules of 10, and for total plate numbers that end in 1,2, or 3, take the difference between the last two modules.
#
# - Cynthia Chan, cc2467, 8/11/17
N_SedModPlates :=
    N ← 8
    while mod(N_SedPlates, N) ≠ 0
        N ← N + 1
    return N
N_SedModules := N_SedPlates/N_SedModPlates
N_SedPlatesTotal := N_SedTanks*N_SedPlates
L_SedLF := L_SedPlate*cos(AN_SedPlate) + (N_SedPlates - 1)*B_SedPlate/sin(AN_SedPlate) + T_SedPlate/sin(AN_SedPlate)
L_SedUpflow :=
    L_SedPlate*cos(AN_SedPlate) + (N_SedPlates - 1)*B_SedPlate/sin(AN_SedPlate) + T_SedPlate/sin(AN_SedPlate) if Q_Train > Q_PlantMaxLF
    L_SedLF - T_SedWeir - L_SedHopper otherwise
L_Sed := L_SedHopper + T_SedWeir + L_SedUpflow
V_SedUp := Q_Sed/(L_SedUpflow*W_Sed)
V_SedC := (Q_Sed/((L_SedUpflow - L_SedPlate*cos(AN_SedPlate))*W_Sed))*S_SedPlate/(L_SedPlate*sin(AN_SedPlate)*cos(AN_SedPlate) + S_SedPlate)
# Inlet manifold
PS_SedJetReverser := SDR_26
PS_SedJetReverserStr := PSToString(PS_SedJetReverser)
L_SedManifoldOffset := IR(ND_SedJetReverser, PS_SedJetReverser) - W_SedDiffuserInner/2
L_FlocWeirToDiffuserGap := L_SedManConnectionStub + L_SedManFirstDiffuserGap - (L_SedDiffuserOuter/2 - OR(ND_SedDiffuser))
N_SedManifoldPorts := floor((L_SedUpflow - L_FlocWeirToDiffuserGap - L_SedWallToDiffuserGapMin - L_SedDiffuserOuter)/B_SedDiffuser) + 1
Q_SedManifoldPort := Q_Sed/N_SedManifoldPorts
# Exit launder
L_SedLaunder :=
    L_SedUpflow - CapThickness(ND_SedLaunder) - max(0 m, 2*CouplingLength(ND_SedLaunder) - T_SedChannelWall) if T_SedChannelWall > CouplingLength(ND_SedLaunder) and Q_Train > Q_PlantMaxLF
    L_Sed - CapThickness(ND_SedLaunder) - S_Fitting - ElbowRadius(ND_SedLaunder) - OR_Fitting(ND_SedLaunder) - SocketDepth(ND_SedLaunder) if Q_Train ≤ Q_PlantMaxLF
    L_SedUpflow + T_SedChannelWall - CouplingLength(ND_SedLaunder) - CapThickness(ND_SedLaunder) otherwise
N_SedLaunderOrificesEst := floor((L_SedUpflow - SocketDepth(ND_SedLaunder) - CapThickness(ND_SedLaunder))/B_SedLaunderOrificesEst)
Q_SedLaunderOrificeEst := Q_Sed/N_SedLaunderOrificesEst
# This the HL due to major & minor losses loses through the manifold.
D_SedLaunderOrifice := RoundNearest(D_circle(A_orifice(HL_SedLaunderBod, Pi_VCOrifice, Q_SedLaunderOrificeEst)), D_Drill)
Q_SedLaunderOrificeTarget := Q_orifice(D_SedLaunderOrifice, HL_SedLaunderBod, Pi_VCOrifice)
B_SedLaunderOrifice := (L_SedUpflow - SocketDepth(ND_SedLaunder) - CapThickness(ND_SedLaunder) - D_SedLaunderOrifice)/(Q_Sed/Q_SedLaunderOrificeTarget - 1)
N_SedLaunderOrifices := floor((L_SedUpflow - SocketDepth(ND_SedLaunder) - CapThickness(ND_SedLaunder) - D_SedLaunderOrifice)/B_SedLaunderOrifice) + 1
L_SedLaunderEndToOrifice := (L_SedUpflow - SocketDepth(ND_SedLaunder) - CapThickness(ND_SedLaunder) - B_SedLaunderOrifice*(N_SedLaunderOrifices - 1))/2
HL_SedLaunderMajor := HL_Manifold(Q_Sed, ID(ND_SedLaunder, PS_SedLaunder), L_SedLaunder, 0, Nu_Water, E_Pvc, N_SedLaunderOrifices)
HL_SedLaunderOrifice := h_orifice(D_SedLaunderOrifice, Pi_VCOrifice, Q_Sed/N_SedLaunderOrifices)
HL_SedLaunder := HL_SedLaunderOrifice + HL_SedLaunderMajor
# Side slopes
W_SedSideSlopes := (W_Sed - ID(ND_SedJetReverser, PS_SedJetReverser))/2
H_SedSideSlopes := tan(AN_SedSlope)*W_SedSideSlopes
# Inlet channel slopes
H_SedIChanLastCoupling := HW_SedWeirExit - 2 cm
# This design doesn't get the target of 150 mm/s to scour flocs. The channel bottom should start at a high enough elevation to give 150 mm/s where it exits the flocculator and then rise at each exit.
H_SedIChanStep := H_SedIChanLastCoupling/max(1, N_SedTanks - 1)
L_SedIChanSlopes := W_Sed + T_SedDividingWall - OD_Fitting(ND_SedManifold) - S_Fitting
# Elevations
# [area: Elevations]
Z_SedSludgeDrain := Plant_Origin[2] - OR(ND_SedJetReverser)
Z_SedManifoldPipe := Z_SedSludgeDrain + H_JetReverserToDiffusers + L_SedManifoldDiffuser + IR(ND_SedManifold, PS_SedMan)
Z_SedSideSlopes := Z_SedSludgeDrain + H_SedSideSlopes
Z_SedFlocWeir := max(Z_SedManifoldPipe + OR(ND_SedManifold) + T_ConcreteMin, Z_SedSideSlopes + H_SedSlopesToFlocWeirMin)
H_SedFlocWeir := Z_SedFlocWeir - Z_SedSludgeDrain
Z_SedLamellaBottom := Z_SedFlocWeir + H_FlocWeirToPlateFrame + OD(ND_SedPlateFrame)
H_SedLamellaBottom := Z_SedLamellaBottom - Z_SedSludgeDrain
Z_SedLamellaSupportLedge := Z_SedLamellaBottom - OR(ND_SedPlateFrame) - OR_Fitting(ND_SedPlateFrame)
Z_SedLaunder := Z_SedLamellaBottom + L_SedPlate*sin(AN_SedPlate) + T_SedPlate*cos(AN_SedPlate) + H_LamellaToLaunder + OR(ND_SedLaunder)
Z_SedChannelBottom := Z_SedLaunder + OR(ND_SedLaunder) - HW_SedExitChannel
# Changed 3/16/17 mse53 - the wrong sed exit variable was placed
# Z_SedChannelBottomOld := Z_SedLaunder + OR(ND_SedLaunder) - HW_SedWeirExit
Z_SedWeirExitOld := Z_SedChannelBottom + HW_SedWeirExit
Z_SedWeirExit := Z_SedChannelBottom + H_SedWeirExit
Z_SedHopperSideSlope := Z_SedFlocWeir
AN_SedHopperNorthSlope := 90 deg - (asin((OR_Fitting(ND_SedManifold) + 1 cm)/sqrt((W_Sed/2 - L_SedManifoldOffset)^2 + (Z_SedFlocWeir - Z_SedManifoldPipe)^2)) + atan((W_Sed/2 - L_SedManifoldOffset)/(Z_SedFlocWeir - Z_SedManifoldPipe)))
Z_SedHopperBottom :=
    Z_SedFlocWeir - (W_Sed - (3*S_Fitting + OD_Fitting(ND_SedChannelDrain) + OD(ND_SedHopperDrain)))*tan(AN_SedHopperNorthSlope) if Q_Train > Q_PlantMaxLF
    Z_SedManifoldPipe + OR_Fitting(ND_SedManifold) + S_Fitting/2 otherwise
AN_SedFlocHopperSouthSlope := atan((Z_SedFlocWeir - Z_SedHopperBottom)/(3*S_Fitting + OD_Fitting(ND_SedChannelDrain)))
H_SedHopperFrontSlope := Z_SedFlocWeir - Z_SedHopperBottom
H_SedHopperBackSlope := H_SedHopperFrontSlope
Z_SedHopperBackSlope := Z_SedHopperBottom + H_SedHopperBackSlope
AN_SedHopperFrontBackSlope := atan(H_SedHopperBackSlope/(L_SedHopper/2))
AN_SedHopperSlopeMin := min(AN_SedHopperNorthSlope, AN_SedFlocHopperSouthSlope, AN_SedHopperFrontBackSlope)
X_SedHopperBottom := -L_Sed + L_SedHopper/2
Z_SedTop :=
    Z_SedChannelBottom + H_SedInletChannel if Q_Train > Q_PlantMaxLF
    Z_SedLaunder + OR(ND_SedLaunder) + HL_SedLaunderBod + H_PlantFreeboard otherwise
H_Sed := Z_SedTop - Z_SedSludgeDrain  # Height of sed tank from the lip of the jet reverser
ZW_SedInletChannel := Z_SedChannelBottom + HW_SedInletChannel
ZW_Sed :=
    ZW_SedInletChannel - HL_SedDiffuser if Q_Train > Q_PlantMaxLF
    Z_SedLaunder + OR(ND_SedLaunder) + HL_SedLaunderBod otherwise
HW_Sed := ZW_Sed - Z_SedSludgeDrain
Z_Walkway :=
    Z_SedChannelBottom if Q_Train > Q_PlantMaxLF
    Z_SedTop - 50 cm otherwise
# Hopper drain
L_SedHopperDrainPipe := H_SedHopperBackSlope/tan(AN_SedHopperFrontBackSlope) + T_SedWall + SocketDepth(ND_SedHopperDrain)
N_SedFrameCrossPipe := max(round((L_SedUpflow - L_SedPlate*cos(AN_SedPlate) + OR(ND_SedPlateFrame) - OR_Fitting(ND_SedPlateFrame))/B_SedPlateFrameCrossEst), 3)
B_SedPlateFrameCross := (L_SedUpflow - L_SedPlate*cos(AN_SedPlate) + OR(ND_SedPlateFrame) - OR_Fitting(ND_SedPlateFrame))/(N_SedFrameCrossPipe - 1)
# Plate settler support frame
Vol_SedActiveEst := W_Sed*L_SedUpflow*HW_Sed - W_SedSideSlopes*H_SedSideSlopes*L_SedUpflow
Ti_Sed := Vol_SedActiveEst/Q_Sed
# Residence time estimate
# Inlet manifold air vent
# Addition of the small holes on the top of the inlet manifold to allow air escape. Calcs by dfg42 3/18/15
# What is this variable?
Q_SedBay := Q_Sed
L_SedManifoldPipeActive := 3 m
D_SedAirVentMax := .5 in
A_SedAroundPipe := L_SedManifoldPipeActive*20*cm  # Conservatively assuming 10 cm around each side of pipe
V_SedUpPipeMid := Q_SedBay/A_SedAroundPipe  # Velocity of water rising around the pipe
Q_SedAirMin := V_SedUpPipeMid*L_SedManifoldPipeActive*ID(ND_SedManifold, PS_SedMan)
# Minimum flow rate of air out the vents
Δh_SedManifold := Z_SedLaunder - Z_SedManifoldPipe
# Pressure expressed as feet of air
D_SedAirVentEst := sqrt(4*Q_SedAirMin/(π*Pi_VCOrifice*sqrt(2*g*Δh_SedManifold)))
# Orifice equation to estimate vent size
N_SedAirVents :=
    N ← 1
    while D_SedAirVentEst^2/N > D_SedAirVentMax^2
        N ← N + 1
    return N
# Number of air vents
D_AirVentHoles := CeilNearest(D_SedAirVentEst/N_SedAirVents, D_Drill)  # Actual diamter of holes rounded to 16th of an inch (is an 8th better?)
Q_AirVent := Pi_VCOrifice*π*D_AirVentHoles^2/4*sqrt(2*g*Δh_SedManifold)  # Actual air flow out each vent
V_AirVent := Q_AirVent/(π*D_AirVentHoles^2/4)  # Actual velocity out of the air vent
