# [reference: FluidsFunctions.xmcd]
# Test Assumptions
# [reference: PipeDatabase.xmcd]
i := 0 .. 100
Q_plant := 50*L/s
PipeSpecification := 4
# [reference: MasterProgram.xmcd]
L_pipe := 20 m
K_total := 0.8
innerDiameters_PipeSpec4 := [0.013; 0.023; 0.037; 0.048; 0.071; 0.092; 0.14; 0.183; 0.273; 0.345; 0.432; 0.518]
# The code here is used to size the rapid mixer for small flow-rates.  This in conjunction with Entrance Tank code will be used to develop an automated design for the Rapid Mixer and Entrance tank onto AutoCAD code.
h_lossmax := 50 cm
ν := 1*10^-6*m^2/s
# This function is imported from FluidsFunctions to calculate pipe size based on flow rate.
# This function determines the inner diameter of the pipe given a vector and entered values
PipeInnerDiameter(Q_plant, PipeSpec, h_lossmax, L_pipe, ν, eps, K_total) := D_pipe(Q_plant, innerDiameters_PipeSpec4*m, h_lossmax, L_pipe, ν, 0, K_total)
# Sizing the Macromixing Orifice
# We want a minor loss coefficient of 1.3
K_e := 1.3
K_vc := 0.62
# So we use the equation for minor loss coefficient for a submerged orifice given in the notes on Flow Control and Measurement to determine d.or
d_macromixorificeFn(K_vc, d_pipe, K_e) := d_pipe*(1/(K_vc*(K_e^0.5 + 1)))^0.5
# We are assuming a circular orifice here.  The resulting area of the orifice and velocity through the orifice are given below.
# The resulting head loss through the orifice is given as:
h_emacromixorificeFn(Q_plant, d_pipe, K_e) := K_e*(Q_plant/A_circle(d_pipe/2))^2/(2*g)
# Sizing the Micromixing Orifice
# There are two conditions that must be met here.  First of all the energy disspation rate must be 1 W/kg and there must be a head loss of 20 to 50 cm.
h_total := 50 cm
ε := 1*W/kg
h_emicromixorificeFn(h_total, h_emacromixorifice) := h_total - h_emacromixorifice
ν = 1e-6 m^2/s
d_micromixorificeFn(d_pipe, Q_plant, h_emicromixorifice) := (4*(A_circle(d_pipe)/K_vc)/(((2*g*h_emicromixorifice)/(Q_plant/A_circle(d_pipe))^2)^0.5 + 1))^0.5/π^0.5
d_pipeFn(Q_plant, PipeSpec) :=
    len ← length(PipeSpec)
    boolean ← 0
    count ← 0
    while boolean == 0
        head ← h_emacromixorificeFn(Q_plant, PipeSpec[count], 1.3)
        boolean ← 1 if count == len - 1
        boolean ← 1 if head ≤ 10 cm
        count ← count + 1
    pipe ← PipeSpec[count]
    h_lossmax ← 50 cm
    NU ← 1*10^-6*m^2/s
    L_pipe ← 2 m
    K_total ← 0.8
    pipe ← D_pipe(Q_plant, PipeSpec, h_lossmax, L_pipe, NU, 0, K_total) if PipeSpec[count] < D_pipe(Q_plant, PipeSpec, h_lossmax, L_pipe, NU, 0, K_total)
    pipe
# The largest smallest dimension is calculated below.
W := (2*g*h_emicromixorifice)^(3/2)/(20*ε)  # error: This variable is undefined.
# There is more coding needed.  We have the largest smallest dimension and the area needed.  We have to determine whether to use squares, rectangles, circles, and if more than one is needed.
PipeSpec := m*innerDiameters_PipeSpec4
d_pipeFn(Q_plant, PipeSpec) =  # error: This array index is invalid for this array.
# The function below determines the size combination of pipe inner diameter and orifice diameters using the functions derived above.
SizeCombination1(Q_plant, PipeSpec) :=
    a[0] ← d_pipeFn(Q_plant, PipeSpec)
    K_vc ← .62
    K_e ← 1.3
    a[1] ← d_macromixorificeFn(K_vc, a[0], K_e)
    h_emicromixorifice ← 20 cm - h_emacromixorificeFn(Q_plant, a[0], K_e)
    a[2] ← d_micromixorificeFn(a[0], Q_plant, h_emicromixorifice)
    a
D_pipe(Q_plant, innerDiameters_PipeSpec4*m, h_lossmax, L_pipe, ν, 0, K_total)
SizeCombination1(5*(L/s), PipeSpec)[1] = 9.33057 in
i := 1 .. 50
Q_p[i] := i*L/s
Q_p[1] = 0.001 m^3/s
Q_p[2] = 0.002 m^3/s
SizeCombination1(Q_p[i], PipeSpec)[1] =  # error
InnerPipeDiameters[i] := SizeCombination1(Q_p[i], PipeSpec)[0]  # error: This array index is invalid for this array.
MacroMODiameters[i] := SizeCombination1(Q_p[i], PipeSpec)[1]  # error: This array index is invalid for this array.
MicroMODiameters[i] := SizeCombination1(Q_p[i], PipeSpec)[2]  # error: This array index is invalid for this array.
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