# Hydraulic Design
# References
# Fluids Functions
# [reference: FluidsFunctions.xmcd]
# Pipe Database
# [reference: PipeDatabase.xmcd]
# Design Assumptions
# [reference: DesignAssumptions.xmcd]
# User Inputs
# Components and Valves
# Number of Components
N_elbow45 := 0
N_teebr := 1
N_ReturnBends := 0
N_elbow90 := 2
N_teerun := 0
# Valves Information
GateValve := 1
CheckValveConv := 0
CheckValveBall := 0
GlobeValve := 0
AngleValve := 0
# Pipes and Orifices
K_sum(N_elbow45, N_elbow90, N_teerun, N_teebr, GateValve, GlobeValve, AngleValve, CheckValveConv, CheckValveBall) :=
    K_2 ← N_elbow45*K_el45 + N_elbow90*K_el90
    K_3 ← K_Tflowrun*N_teerun + K_Tflowbr*N_teebr
    K_4 ← GateValve*K_gatevalve + GlobeValve*K_globevalve + AngleValve*K_anglevalve + CheckValveConv*K_chkvalveconv + CheckValveBall*K_chkvalveball
    K_5 ← diamratio_exp0.75*K_exp0.75 + diamratio_exp0.5*K_exp0.5 + diamratio_exp0.25*K_exp0.25 + diamratio_cont0.75*K_cont0.75 + diamratio_cont0.5*K_cont0.5 + diamratio_cont0.25*K_cont0.25
    K_sum ← K_2 + K_3 + K_4 + K_5
    return K_sum
PipeSize(Q_plant, PipeSpecification, L_pipe) :=
    K_sum ← K_sum(N_elbow45, N_elbow90, N_teerun, N_teebr, GateValve, GlobeValve, AngleValve, CheckValveConv, CheckValveBall)
    Pipe_size ← D_pipe(Q_plant, AvailPipeSizes1(PipeSpecification), h_lmax, L_pipe, ν, ε_pvc, K_sum)
    return Pipe_size
# Launderer Design
# Diameter iteration program:
D_manifold(Q, h, L, Q_ratio, D_available, ν, ε, K, n) :=
    D_new ← D_available[0]
    D_old ← 0 m
    error ← 1
    while error > 0.01
        D_old ← D_new
        D_new ← (8*Q^2/(g*π^2*h)*(1 + (f(Q, D_old, ν, ε)*L/D_old + K)*(1/3 + 1/(2*n) + 1/(6*n^2)))/(1 - Q_ratio^2))^(1/4)
        error ← |D_old - D_new|/mean(D_old, D_new)
    D_new ← Dnextlargest(D_new, D_available)
    return D_new
D_orifices(h_losslaunder, Q_plant, D_launder) :=
    h_sedtank ← 2 m
    D_circle(A_orifice(h_sedtank - h_losslaunder - (Q_plant/2)^2/(2*g*A_circle(D_launder)^2), K_orifice, Q_plant/2/44))
# A.orifice and A.circle are functions.
Launder(Q_plant, PipeSpecification, L_sedtank, lamella_spacing) :=
    Q_tank ← Q_plant/n_sedtanks
    Q_ratio ← .85
    n_orifices ← floor(L_sedtank/(2*lamella_spacing))
    h_sedtank ← 2 m
    h_platetops ← 1.8 m
    manifold_depth ← h_sedtank - h_platetops - (h_sedtank - h_platetops)/2
    D_avail ← AvailPipeSizes1(PipeSpecification)
    D_launder ← D_manifold(Q_tank, manifold_depth, 2*L_sedtank, Q_ratio, D_avail, ν, ε_pvc, 0, n_orifices)
    h_losslaunder ← h_lmanifold(Q_tank, D_launder, 2*L_sedtank, 0, ν, ε_pvc, n_orifices)
    D_orifice ← D_orifices(h_losslaunder, Q_plant, D_launder)
    SedPipe_length ← L_sedtank
    orifice_dist ← lamella_spacing/2
    return [SedPipe_length/m, D_orifice/m, orifice_dist/m, manifold_depth/m, D_launder/m, n_orifices]  # How is PipeSpecification determined?
# Q.ratio assumption?
# Sludge Pipe Design
Sludge(Q_plant, PipeSpecification, L_sedtank, lamella_spacing) :=
    Q_tank ← Q_plant/n_sedtanks
    Q_ratio ← .85
    n_orifices ← L_sedtank/(2*lamella_spacing)
    h_losslaunder ← 2 cm
    h_sedtank ← 2 m
    h_platetops ← 1.8 m
    manifold_depth ← h_sedtank - h_platetops - (h_sedtank - h_platetops)/2
    D_avail ← AvailPipeSizes1(PipeSpecification)
    D_launder ← D_manifold(Q_tank, manifold_depth, 2*L_sedtank, Q_ratio, D_avail, ν, ε_pvc, 0, n_orifices)
    D_orifice ← D_orifices(h_losslaunder, Q_plant, D_launder)
    orifice_dist ← L_sludgeports
    waste_inr ← D_launder
    return [waste_inr, D_orifice, orifice_dist]
# Channel Design
Channel(Q_plant, SedTank_width, tank_thick) :=
    waterdepth_levelingtank ← 50 cm
    headloss_launders ← 10 cm
    freeboard ← 10 cm
    height_channel ← waterdepth_levelingtank + headloss_launders + freeboard
    b ← (1/G_cell)^(1/2)*(Q_plant/height_channel)^(3/4)*(K_90/(2*ν*Π_cell))^(1/4)
    width_channel ← Π_cell*b
    length_channel ← n_sedtanks*SedTank_width + 2*tank_thick
    channel_dim ← [length_channel; width_channel; height_channel]
    return channel_dim  # The depth of the water in the leveling tank is set
# estimate of total head loss through each laudner
# The addtional freeboard above the expected water level
# G_cell is the average velocity gradient in the cell where the energy dissipation is assumed to be occuring. This is the desired velocity gradient for the end of the flocculation tank.
# K_90 is theThe loss coefficient for the channel transition.
# Π_cell is the length of the zone where the energy is dissipated. Assume that energy is dissipated in a zone is twice as long as the
# smallest dimension flow.
# Opening of channel height determines the height
# for theentire channel
# Grit Chamber Design
# Gives an array of the vertical location of each set of holes given hole spacing and the maximum head:
heads(Spacing, Change) :=
    for i ∈ 0 .. Change/Spacing
        h_grit[i] ← i*Spacing
    return h_grit
# This function provides the flow rate for a given head.  Requires an array with hole numbers at each level up to the current head level.
Q(h, n, Orifice_spacing, A_drillbit, K_orifice) :=
    Q ← 0
    return Q if h == 0
    otherwise
        levels ← floor(h/Orifice_spacing)
        Q ← Q + K_orifice*A_drillbit*n[0]*sqrt(2*g*h) if levels == 0
        otherwise
            for i ∈ 0 .. levels - 1
                Q ← Q + K_orifice*A_drillbit*n[i]*sqrt(2*g*(h - Orifice_spacing*i))
        return Q
# This returns an array with the number of holes required to create a linear relationship between flow and depth at each vertical orifice spacing:
N_holes(h_grit, Base, MaxHeadChange, Orifice_spacing, FirstFlow, A_drillbit, K_orifice) :=
    n_holes[0] ← Base
    for p ∈ 1 .. MaxHeadChange/Orifice_spacing - 1
        n_holes[p] ← 0
        while Q(h_grit[p + 1], n_holes, Orifice_spacing, A_drillbit, K_orifice) ≤ FirstFlow*(p + 1)
            n_holes[p] ← n_holes[p] + .1
        n_holes[p] ← round(n_holes[p])
    return n_holes
# Given the number of holes at each vertical orifice spacing above, what are the actual flow rates what art the flow rates when the water reaches just below each set of holes?
Orifice_spacing := 2 cm
h_grit := heads(Orifice_spacing, h_lmax)
OurFlows(h, Holes) :=
    for i ∈ 0 .. length(h) - 1
        Flows[i] ← Q(h[i], Holes)
    return Flows
n_orifices := N_holes(h_grit, BaseHoles, h_lmax, Orifice_spacing, FirstFlow, A_drillbit, K_orifice)
Q_actual := OurFlows(h_grit, n_orifices)
Q_error(ActualFlowRates, Q_test1, Q_plant) := 100*max(|ActualFlowRates - Q_test1|)/Q_plant
Q_error := 100*max(|Q_actual - Q_ideal|)/Q_plant
h_riser := 20 cm
gritchamber(Q_plant, DrillSize, r_drum, PipeSpecification) :=
    D_avail ← AvailPipeSizes1(PipeSpecification)
    K_sum ← K_sum(0, n_elbowsgrit, 0, n_tgrit, 0, 0, 0, 0, 0)
    D_riser ← D_pipe(Q_plant, D_avail, h_lmax, L_rmpipe, ν, ε_pvc, K_sum)
    A_orif ← A_orifice(h_lorificemax, K_orifice, Q_plant)
    n_risers ← ceil(4*A_orif/(π*D_riser^2*A_ratio))
    A_drillbit ← π*DrillSize^2/4
    h_grit ← heads(Orifice_spacing, h_lmax)
    FirstFlow ← Q_plant/(h_lmax/Orifice_spacing)
    Q_ideal ← h_grit*Q_plant/h_riser
    D_orifice ← DrillSize
    BaseHoles ← round(FirstFlow/Q_orifice(DrillSize, h_lmax, K_orifice))
    n_orifices ← N_holes(h_grit, BaseHoles, h_lmax, Orifice_spacing, FirstFlow, A_drillbit, K_orifice)
    Q_actual ← OurFlows(h_grit, n_orifices)
    Q_error ← 100*max(|Q_actual - Q_ideal|)/Q_plant
    Q ← Q(h_lmax, h_grit)
    riser_area ← D_riser^2/4*π
    riser_areaTotal ← riser_area*n_risers
    drum_circumference ← r_drum^2*π
    riser_areaTotal ← drum_circumference if drum_circumference > riser_areaTotal
    grit_length ← sqrt(riser_areaTotal)
    grit_width ← r_drum*2 + sqrt(riser_areaTotal)
    grit_depth ← 2 m
    grit_dim ← [grit_length; grit_width; grit_depth]
    return [grit_dim/m, n_risers, n_orifices, D_riser/m, D_orifice/m]  # error: This value must be a scalar.
Q_test(h_grit, Q_max) := h_grit*Q_max/h_riser
Q_test1 := Q_test(h_grit, Q_plant)
Max_error := 10
Q_error(ActualFlowRates, Q_test1, Q_plant) =  # error: This variable is undefined.
D_engdrill := [
    2/16*in;
    3/16*in;
    4/16*in;
    5/16*in;
    6/16*in;
    7/16*in;
    8/16*in;
    9/16*in;
    10/16*in;
    11/16*in;
    12/16*in
]
D_metdrill := [
    3 mm;
    4 mm;
    5 mm;
    6 mm;
    7 mm;
    8 mm;
    9 mm;
    10 mm;
    11 mm;
    12 mm;
    13 mm;
    14 mm;
    15 mm;
    16 mm;
    17 mm;
    18 mm;
    19 mm;
    20 mm
]
english := 1
D_drill :=
    D_engdrill if english == 1
    D_metdrill otherwise
D_orifice :=
    i ← last(D_drill)
    D_drill[i] if Q_error(ActualFlowRates, Q_test1, Q_plant) ≤ Max_error
    D_drill[i - 1] otherwise
    return D_drill[i]
D_orifice =  # error
# Plant Leveling Tank
PlantLevelingTank(Q_plant, PipeSpecification, Cd, r_drum, freeboard_sed, HW_channel, hl_launder, ΔH_leveling, D_launder) :=
    HW_plantleveling ← HW_channel - hl_launder
    H_weir1 ← HW_plantleveling - ΔH_leveling
    Diam_weir ← 3*Q_plant/(2*Cd*sqrt(2*g)*π*ΔH_leveling^(3/2))
    Diam1_weir ← round(Diam_weir/(1 in))*in
    D_weir ← innerdiameter(Diam1_weir, PipeSpecification)
    H_weir ← HW_plantleveling - (3*Q_plant/(2*Cd*sqrt(2*g)*π*Diam_weir))^(2/3)
    length ← 3*D_launder + Diam_weir
    width ← r_drum
    depth ← HW_channel + freeboard_sed
    lvltank_dim ← [length; width; depth]
    return [H_weir, D_weir, lvltank_dim, HW_plantleveling]
# waterlevel in the PLT is equal to the Height of the Weir.
