# [reference: DesignAssumptions.xmcd]
spacebelow_total = 1 m  # Please review how to make a relative reference
# [reference: PipeDatabase.xmcd]
# Please do not commit your file with a reference to the master program.
# [reference: FluidsFunctions.xmcd]
n_sedtanks = 3
# n.sedtanks and Q.ratioLaunderOrf are defined in design assumptions and
# do not need to be input.
Q_ratioLaunderOrf = 0.85
# Launderer Design
# Why do you use the manifold.depth=spacebelow/2 ? I thought spacebelow is some distance
# below the plate settlers, not the top of the water in the tank. If you need spacebelow as an
# input. You should also ask Leslie to return it for you.
Launder(Q_plant, PipeSpecification, L_sedtank, lamella_spacing, HW_sedtank) :=
    spacebelow ← spacebelow_total
    Q_tank ← Q_plant/n_sedtanks
    n_orifices ← floor(L_sedtank/(2*lamella_spacing))
    manifold_depth ← spacebelow/2
    D_avail ← AvailPipeSizes1(PipeSpecification)
    D_launder ← D_manifold(Q_tank, manifold_depth, 2*L_sedtank, Q_ratioLaunderOrf, D_avail, ν, ε_pvc, 0, n_orifices)
    h_losslaunder ← h_lmanifold(Q_tank, D_launder, 2*L_sedtank, 0, ν, ε_pvc, n_orifices)
    D_orifice ← D_orifices(h_losslaunder, Q_plant, D_launder, n_orifices, HW_sedtank, n_sedtanks)
    SedPipe_length ← L_sedtank
    orifice_dist ← 2*lamella_spacing
    Q_orifice ← Q_tank/n_orifices
    h_orifice ← (Q_orifice/(K_orifice*A_circle(D_orifice)))^2*(1/(2*g))
    HL_laundorif ← h_orifice*n_orifices*n_sedtanks
    HL_launder ← h_losslaunder*n_sedtanks
    HL_laundertotal ← HL_launder + HL_laundorif
    return [SedPipe_length/m, D_orifice/m, orifice_dist/m, manifold_depth/m, D_launder/m, n_orifices, HL_laundertotal/m]
# The orifices will be located on the sides of the launder and will be spaced at twice the lamella spacing
# The launder will be located between the top of the lamella and the surface of the water in the sedimentation tank, the orifices will be at the center of the launders
# Using the iterative program from above, and the available pipe sizes from the pipe database, the launder diameter is determined
# The head loss through the launder is calculated by using the orifice equation,and the manifold head loss equation found the Fluids Functions file. By multiplying by the number of sedtanks, the total head loss is determined, and the water level in the plant leveling tank can be determined.
# This file is a little too difficult for me to follow. I think it needs to be documented more - and explain at the top what this file is used for. A graphic would be good too!
Launder(470*L/min, 3, 2.5 m, 0.05 m, 1.96 m) = [2.5, 0.00494774, 0.1, 0.5, 0.0590042, 25, 284.422]
