# AguaClara Water Treatment Plants
# Automated Design
# References
# [reference: Plant Elevation Design.xmcd]
# [reference: HydraulicDesign.xmcd]
# [reference: Flocculation Function.xmcd]
# [reference: GritChamber.xmcd]
# [reference: Launder.xmcd]
# [reference: plantleveltank.xmcd]
# [reference: Sedimentation Function.xmcd]
# [reference: UnitProcesses.xmcd]
# User Inputs:
# Choose either a Pipe Schedule Number or an SDR rating:
# [component: outputs PipeSpecification]
# Engineer Entered Values: | Values used to Draw Plant:
tank_thick := 20 cm
Q_plant := 470*L/min
lvltank_thick := 20 cm
# sed tank parameters
stockplat_thick := lvltank_thick
β := 45 deg
grit_thick := lvltank_thick
SedTank_width := 42 in  # Width of the lamella
platform_thick := .5 m
# length of the lamella
channel_thick := 10 cm
L_lamella := 80 cm
lamella_spacing := 5 cm  # lamella spacing
walkway_width := 1 m
# grit chamber parameters
# Would you like to use Metric of English drill bits?
# [component: outputs DrillSize]
# Calls Functions Here:
# Channel Design
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Channel_dim := Channel(Q_plant, SedTank_width, tank_thick) = [3.6004; 0.315952; 0.7] m
# Sedimentation Tank Design
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SedTank := SedTankDesign(Q_plant, SedTank_width, lamella_spacing, L_lamella, β, Channel_dim) = [[2.51474; 1.0668; 2.05952], 31, 1.95952, 1.35952, 12.6132]
[SedTank_dim, N_lamella, water_depth, z_plat, v_c] := SedTankDesign(Q_plant, SedTank_width, lamella_spacing, L_lamella, β, Channel_dim) = [[2.51474; 1.0668; 2.05952], 31, 1.95952, 1.35952, 12.6132]
# outputs:
[sedtank_dim/m, N_lamella, water_depth/m, z_plat/m, v_c*day/m]
# Flocculator Design
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Flocculator := flocculator(Q_plant, SedTank[:, 0][0]) = [[5.02947; 0.5334; 2.16632], [0.0963566; 0.201393; 0.284812], 1.5, [28; 7; 4], 0.106804, [0.0663566; 2.28943], [1.81499; 1.65743; 1.5323], [[
    0.0963566, 0, 1.81499;
    0.192713, 2.16632, 0.351339;
    0.28907, 0, 1.81499;
    0.385426, 2.16632, 0.351339;
    0.481783, 0, 1.81499;
    0.57814, 2.16632, 0.351339;
    0.674496, 0, 1.81499;
    0.770853, 2.16632, 0.351339;
    0.867209, 0, 1.81499;
    0.963566, 2.16632, 0.351339;
    1.05992, 0, 1.81499;
    1.15628, 2.16632, 0.351339;
    1.25264, 0, 1.81499;
    1.34899, 2.16632, 0.351339;
    1.44535, 0, 1.81499;
    1.54171, 2.16632, 0.351339;
    1.63806, 0, 1.81499;
    1.73442, 2.16632, 0.351339;
    1.83078, 0, 1.81499;
    1.92713, 2.16632, 0.351339;
    2.02349, 0, 1.81499;
    2.11985, 2.16632, 0.351339;
    2.2162, 0, 1.81499;
    2.31256, 2.16632, 0.351339;
    2.40892, 0, 1.81499
], [
    2.41838, 2.16632, 0.351339;
    2.32202, 0, 1.81499;
    2.22567, 2.16632, 0.351339;
    2.02427, 0, 1.81499;
    1.82288, 2.16632, 0.508893;
    1.62149, 0, 1.65743;
    1.4201, 2.16632, 0.508893;
    1.2187, 0, 1.65743;
    1.01731, 2.16632, 0.508893;
    0.815917, 0, 1.65743;
    0.531105, 2.16632, 0.508893
]]]
# The baffle positions are reported in the following way:
# There is one matrix for each channel. The first column is the x position
# of the baffle. The 2nd column is the starting y position of a baffle (ie top of the tank (0),
# or bottom of tank), the 3rd column is the final position of the baffle.
# Therefore a baffle at position x extends between the two y coordinates.
[floc_dim/m, baffle_spacing/m, floc_inleth/m, n_baffle, total_hl/m, uturnhole_dim/m, baffle_length/m, bafflepositions]
[floc_dim, baffle_spacing, floc_inleth, n_baffle, total_hl, uturnhole_dim, baffle_length, baffleposition] := flocculator(Q_plant, SedTank_dim) = [[5.02947; 0.5334; 2.16632], [0.0963566; 0.201393; 0.284812], 1.5, [28; 7; 4], 0.106804, [0.0663566; 2.28943], [1.81499; 1.65743; 1.5323], [[
    0.0963566, 0, 1.81499;
    0.192713, 2.16632, 0.351339;
    0.28907, 0, 1.81499;
    0.385426, 2.16632, 0.351339;
    0.481783, 0, 1.81499;
    0.57814, 2.16632, 0.351339;
    0.674496, 0, 1.81499;
    0.770853, 2.16632, 0.351339;
    0.867209, 0, 1.81499;
    0.963566, 2.16632, 0.351339;
    1.05992, 0, 1.81499;
    1.15628, 2.16632, 0.351339;
    1.25264, 0, 1.81499;
    1.34899, 2.16632, 0.351339;
    1.44535, 0, 1.81499;
    1.54171, 2.16632, 0.351339;
    1.63806, 0, 1.81499;
    1.73442, 2.16632, 0.351339;
    1.83078, 0, 1.81499;
    1.92713, 2.16632, 0.351339;
    2.02349, 0, 1.81499;
    2.11985, 2.16632, 0.351339;
    2.2162, 0, 1.81499;
    2.31256, 2.16632, 0.351339;
    2.40892, 0, 1.81499
], [
    2.41838, 2.16632, 0.351339;
    2.32202, 0, 1.81499;
    2.22567, 2.16632, 0.351339;
    2.02427, 0, 1.81499;
    1.82288, 2.16632, 0.508893;
    1.62149, 0, 1.65743;
    1.4201, 2.16632, 0.508893;
    1.2187, 0, 1.65743;
    1.01731, 2.16632, 0.508893;
    0.815917, 0, 1.65743;
    0.531105, 2.16632, 0.508893
]]]
# Chemical Feed Design
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Q_alum := ChemicalFeed(Q_plant) = 235 mL/min
# Launderer Design
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Laund := Launder(Q_plant, PipeSpecification, SedTank[:, 0][0][0]*m, L_lamella)  # error: This variable is undefined.
[SedPipe_length/m, D_orifice/m, orifice_dist/m, manifold_depth/m, D_launder/m, n_orifices]
# Sludge Pipe Design
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SludgePipe := Sludge(Q_plant, PipeSpecification, SedTank[:, 0][0][0]*m, lamella_spacing) = [0.082804, 0.0053914, 0.1] m
[waste_inr, D_orifice, orifice_dist] := Sludge(Q_plant, PipeSpecification, SedTank_dim[0]*m, lamella_spacing) = [0.082804, 0.0053914, 0.1] m
# Plant Leveling Tank
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PLT := PlantLevelingTank(Q_plant, PipeSpecification, 8 cm) = [0.4, 0.0547878, [0.283781; 0.3; 0.7], 0.5] m
[lvltank_dim, D_weir, H_weir, HW_plantleveling] := PlantLevelingTank(Q_plant, PipeSpecification, 8 cm) = [0.4, 0.0547878, [0.283781; 0.3; 0.7], 0.5] m
# Grit Chamber Design
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Grit == gritchamber(Q_plant, PipeSpecification, □) =  # error: This placeholder is empty.
[grit_dim/m, n_risers, n_orifices, D_riser/m, D_orifice/m]
# Plant Elevation Design
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PlantElevations(Q_plant, Grit, Laund, PLT, SedTank, Q_alum, Flocculator, L_lamella, HL_Launder) =  # error: This variable is undefined.
Z_elevation := PlantElevations(Q_plant, [[1; 1; 1], 4, [1; 1; 1], 3, .75], [3.9, 2.5, 5, 10, 7, 40], PLT, SedTank, Q_alum, Flocculator, L_lamella, 5 in)  # error: This value has units: Length, but must have units: Unitless.
# Constructing Tables of Parameters:
headerrow := ["Parameter"; "Value"; "Units"]
Units := [" "; " meter"; "meter"]
headercolumn := ["Number of Sedimentation Tanks"; "Lamella Spacing in Sedimentation Tank"; "Number of Lamella in Sedimenation Tank"]
Z := [n_sedtanks; lamella_spacing/m; SedTank[:, 1][0]]
length(headercolumn) = 3
length(Z) = 3
table(headerrow, headercolumn, Z) :=
    for i ∈ 0 .. length(headercolumn)
        for j ∈ 0 .. last(headerrow)
            table[i, j] ← headerrow[j] if i == 0
            otherwise
                table[i, j] ← headercolumn[i - 1] if j == 0
                table[i, j] ← Z[i - 1] if j == 1
                table[i, j] ← Units[i - 1] if j == 2
    return table
headercolumn_Dim := [" Sedimentation Tank"; "Dimensions of Flocculator"; "Dimensions of Grit Chamber"; "Dimensions of Leveling Tank"; "Dimensions of Channel"]
headerrow_Dim := ["Component"; "Length"; "Width"; "Height"; "Units"]
Dim_y := [SedTank[:, 0][0][1]; Flocculator[:, 0][0][1]; Grit[:, 0][0][1]; PLT[:, 2][0][1]; Channel_dim[1]/m]  # error: This variable is undefined.
Dim_z := [SedTank[:, 0][0][2]; Flocculator[:, 0][0][1]; Grit[:, 0][0][2]; PLT[:, 2][0][2]; Channel_dim[2]/m]  # error: This variable is undefined.
Dim_x := [SedTank[:, 0][0][0]; Flocculator[:, 0][0][0]; Grit[:, 0][0][0]; PLT[:, 2][0][0]; Channel_dim[0]/m]  # error: This variable is undefined.
Units2 := ["meter"; "meter"; "meter"; "meter"; "meter"]
tableDim(headerrow_Dim, headercolumn_Dim, Dim_x, Dim_y, Dim_z, Units2) :=
    for i ∈ 0 .. length(headercolumn_Dim)
        for j ∈ 0 .. last(headerrow_Dim)
            tableDim[i, j] ← headerrow_Dim[j] if i == 0
            otherwise
                tableDim[i, j] ← headercolumn_Dim[i - 1] if j == 0
                tableDim[i, j] ← Dim_x[i - 1] if j == 1
                tableDim[i, j] ← Dim_y[i - 1] if j == 2
                tableDim[i, j] ← Dim_z[i - 1] if j == 3
                tableDim[i, j] ← Units2[i - 1] if j == 4
    return tableDim
# Construct Plant Elevation Tables
headerrow_elevation := ["Element"; "Elevation from bottom of the sed tank (m)"; "Elevation from platform (m)"]
# top of alum stock tank
# port on alum stock tank
# bottom of alum stock tank
# alum platform height
# valve level in the FCM
# water level in the FCM
# end of the FCM tube at maximum alum dose
# grit chamber wall
# grit chamber maximum water level
# orifice elevation in the grit chamber
# horizontal pipe centerline where it leaves the grit chamber
# water level in rapid mix
# wall height for beginning of flocculator
# water level at beginning of flocculator
# wall height for the sedimentation tank
# water level in the sedimentation tank and channel
# top of the effluent launder
# top of the plate settlers
# bottom of the plate settlers
# platform height
# weir height
# level control water height
headercolumn_elevation := [
    "top of alum stock tank";
    "port on alum stock tank";
    "bottom of alum stock tank";
    "alum platform height";
    "valve level in the FCM";
    "water level in the FCM";
    "end of the FCM tube at maximum alum dose";
    "grit chamber wall";
    "grit chamber maximum water level";
    "orifice elevation in the grit chamber";
    "horizontal pipe centerline where it leaves the grit chamber";
    "water level in rapid mix";
    "wall height for beginning of flocculator";
    "water level at beginning of flocculator";
    "wall height for the sedimentation tank";
    "water level in the sedimentation tank and channel";
    "centerline of the effluent launder";
    "top of the plate settlers";
    "bottom of the plate settlers";
    "platform height";
    "weir height";
    "level control water height";
    "level control wall height"
]
tableElevation(headerrow_elevation, headercolumn_elevation, Z_elevation) :=
    for i ∈ 0 .. length(headercolumn_elevation)
        for j ∈ 0 .. last(headerrow_elevation)
            table[i, j] ← headerrow_elevation[j] if i == 0
            otherwise
                table[i, j] ← headercolumn_elevation[i - 1] if j == 0
                table[i, j] ← Z_elevation[i - 1] if j == 1
                table[i, j] ← Z_elevation[i - 1] - Z_elevation[22] if j == 2
    return table
# Table of Parameters:
# top
# [component: inputs table(headerrow, headercolumn, Z)]
# [component: inputs tableDim(headerrow_Dim, headercolumn_Dim, Dim_x, Dim_y, Dim_z, Units2)]
# [component: inputs tableelevation(headerrow_elevation, headercolumn_elevation, Z_elevation)]
